# [reference: mf_ReadExcelData.mcdx]
SheetName := "Foglio"  # Sheet Name
# Columns Name
_vColumnsName := ["A", "B", "C", "D", "E", "F", "G", "H", "I", "J", "K", "L", "M", "N", "O"]
f_read(end, vec) :=
    supp[0] ← "A"
    for i ∈ 1 .. end - 1
        supp[i] ← vec[i]
    supp
FilePath := ".\c_sc_on_c_HT_r_vs_te.xlsx"
FinalColumn := _mf_ReadExcelData(FilePath, SheetName, 1, "P", 3, 3) = [2]
FinalRow := _mf_ReadExcelData(FilePath, SheetName, 1, "P", 2, 2) = [33]
_vColumnsName := f_read(FinalColumn[0], transpose(_vColumnsName))
_mDATA := _mf_ReadExcelData(FilePath, SheetName, 1, _vColumnsName, 2, FinalRow[0])
f__mname(num1, num2) :=
    _mnames ← [num1[0], num2[0]]
    for i ∈ 1 .. length(num2) - 1
        _mnames ← stack(_mnames, [num1[i], num2[i]])
    _mnames
FILE :=
    for i ∈ 1 .. FinalColumn[0] - 1
        spline ← supsmooth(_mDATA[:, 0], _mDATA[:, i])
        A ← f__mname(_mDATA[:, 0], spline)
        name ← concat("prova", num2str(i), ".dat")
        B ← WRITETEXT(name, A)
