<?xml version="1.0" encoding="UTF-8"?>
<fdm_config name="D150 AGILE" release="BETA" version="2.0">
   <metrics>
      <wingarea unit="M2">130.514</wingarea>
      <wingspan unit="M">33.914</wingspan>
      <chord unit="M">4.192</chord>
      <htailarea unit="M2">32.758</htailarea>
      <htailarm unit="M">17.727</htailarm>
      <vtailarea unit="M2">46.589</vtailarea>
      <htailarm unit="M2">16.961</htailarm>
      <location name="AERORP" unit="M">
         <x>29.0738</x>
         <y>0.000000</y>
         <z>-1.136280</z>
      </location>
      <location name="EYEPOINT" unit="M">
         <x>575.6000</x>
         <y>0.000000</y>
         <z>-5.000000</z>
      </location>
      <location name="VRP" unit="M">
         <x>29.0738</x>
         <y>0.000000</y>
         <z>-1.136280</z>
      </location>
   </metrics>
   <mass_balance>
      <ixx unit="KG*M2">761969.688</ixx>
      <iyy unit="KG*M2">1997119.840</iyy>
      <izz unit="KG*M2">2567919.197</izz>
      <ixy unit="KG*M2">0.000000</ixy>
      <ixz unit="KG*M2">8000.000</ixz>
      <iyz unit="KG*M2">0.000000</iyz>
      <emptywt unit="KG">40926.030</emptywt>
      <location name="CG" unit="M">
         <x>16.0519</x>
         <y>0.000000</y>
         <z>0.000000</z>
      </location>
   </mass_balance>
   <ground_reactions>
      <contact name="Nose Gear" type="BOGEY">
         <location unit="M">
            <x>5.0720</x>
            <y>0.000000</y>
            <z>-1.690730</z>
            <brake_group>NONE</brake_group>
            <retractable>1.0000</retractable>
         </location>
         <static_friction>0.8000</static_friction>
         <dynamic_friction>0.5000</dynamic_friction>
         <rolling_friction>0.0200</rolling_friction>
         <spring_coeff unit="LBS/FT">133934.750</spring_coeff>
         <dynamic_coeff unit="LBS/FT">5952.656</dynamic_coeff>
         <damping_coeff_rebound unit="LBS/FT/SEC">11905.311</damping_coeff_rebound>
         <max_steer unit="DEG">35.000</max_steer>
      </contact>
      <contact name="Right Main Gear" type="BOGEY">
         <location unit="M">
            <x>16.1264</x>
            <y>3.7814</y>
            <z>-1.305452</z>
            <brake_group>RIGHT</brake_group>
            <retractable>1.0000</retractable>
         </location>
         <static_friction>0.8000</static_friction>
         <dynamic_friction>0.5000</dynamic_friction>
         <rolling_friction>0.0200</rolling_friction>
         <spring_coeff unit="LBS/FT">178579.673</spring_coeff>
         <dynamic_coeff unit="LBS/FT">14881.640</dynamic_coeff>
         <damping_coeff_rebound unit="LBS/FT/SEC">29763.270</damping_coeff_rebound>
         <max_steer unit="DEG">0.000000</max_steer>
      </contact>
      <contact name="Left Main Gear" type="BOGEY">
         <location unit="M">
            <x>16.1264</x>
            <y>-3.781379</y>
            <z>-1.305452</z>
            <brake_group>LEFT</brake_group>
            <retractable>1.0000</retractable>
         </location>
         <static_friction>0.8000</static_friction>
         <dynamic_friction>0.5000</dynamic_friction>
         <rolling_friction>0.0200</rolling_friction>
         <spring_coeff unit="LBS/FT">178579.673</spring_coeff>
         <dynamic_coeff unit="LBS/FT">14881.640</dynamic_coeff>
         <damping_coeff_rebound unit="LBS/FT/SEC">29763.270</damping_coeff_rebound>
         <max_steer unit="DEG">0.000000</max_steer>
      </contact>
   </ground_reactions>
   <propulsion>
      <engine file="D150_AGILE_engine">
         <location unit="M">
            <x>13.6765</x>
            <y>5.7482</y>
            <z>-2.338950</z>
         </location>
         <orient unit="DEG">
            <roll>0.000000</roll>
            <pitch>0.000000</pitch>
            <yaw>0.000000</yaw>
         </orient>
         <feed>0</feed>
         <feed>1</feed>
         <feed>2</feed>
         <thruster file="direct">
            <location unit="M">
               <x>13.6765</x>
               <y>5.7482</y>
               <z>-2.338950</z>
            </location>
            <orient unit="DEG">
               <roll>0.000000</roll>
               <pitch>0.000000</pitch>
               <yaw>0.000000</yaw>
            </orient>
         </thruster>
      </engine>
      <engine file="D150_AGILE_engine">
         <location unit="M">
            <x>13.6765</x>
            <y>-5.748200</y>
            <z>-2.338950</z>
         </location>
         <orient unit="DEG">
            <roll>0.000000</roll>
            <pitch>0.000000</pitch>
            <yaw>0.000000</yaw>
         </orient>
         <feed>3</feed>
         <feed>4</feed>
         <feed>5</feed>
         <thruster file="direct">
            <location unit="M">
               <x>13.6765</x>
               <y>-5.748200</y>
               <z>-2.338950</z>
            </location>
            <orient unit="DEG">
               <roll>0.000000</roll>
               <pitch>0.000000</pitch>
               <yaw>0.000000</yaw>
            </orient>
         </thruster>
      </engine>
      <tank type="FUEL">
         <location unit="M">
            <x>14.7736</x>
            <y>0.9362</y>
            <z>-1.212579</z>
         </location>
         <capacity unit="KG">3271.985</capacity>
         <contents unit="KG">3271.985</contents>
      </tank>
      <tank type="FUEL">
         <location unit="M">
            <x>15.9503</x>
            <z>-0.881934</z>
            <y>4.7680</y>
         </location>
         <capacity unit="KG">5532.997</capacity>
         <contents unit="KG">5532.997</contents>
      </tank>
      <tank type="FUEL">
         <location unit="M">
            <x>18.8026</x>
            <z>-0.241955</z>
            <y>11.3816</y>
         </location>
         <capacity unit="KG">707.706</capacity>
         <contents unit="KG">707.706</contents>
      </tank>
      <tank type="FUEL">
         <location unit="M">
            <x>14.7736</x>
            <y>-0.936171</y>
            <z>-1.212579</z>
         </location>
         <capacity unit="KG">3271.985</capacity>
         <contents unit="KG">3271.985</contents>
      </tank>
      <tank type="FUEL">
         <location unit="M">
            <x>15.9503</x>
            <z>-0.881934</z>
            <y>-4.767959</y>
         </location>
         <capacity unit="KG">5532.997</capacity>
         <contents unit="KG">5532.997</contents>
      </tank>
      <tank type="FUEL">
         <location unit="M">
            <x>18.8026</x>
            <z>-0.241955</z>
            <y>-11.381596</y>
         </location>
         <capacity unit="KG">707.706</capacity>
         <contents unit="KG">707.706</contents>
      </tank>
   </propulsion>
   <flight_control name="FCS :D150 AGILE">
      <channel name="Pitch">
         <summer name="fcs/pitch-trim-sum">
            <input>fcs/elevator-cmd-norm</input>
            <input>fcs/pitch-trim-cmd-norm</input>
            <clipto>
               <min>-1</min>
               <max>1</max>
            </clipto>
         </summer>
         <aerosurface_scale name="Elevator Control">
            <input>fcs/pitch-trim-sum</input>
            <range>
               <min>-15.0</min>
               <max>30.0</max>
            </range>
            <output>fcs/elevator-pos-deg</output>
         </aerosurface_scale>
         <aerosurface_scale name="Elevator Normalized">
            <input>fcs/elevator-pos-deg</input>
            <domain>
               <min>-15.0</min>
               <max>30.0</max>
            </domain>
            <range>
               <min> -1</min>
               <max> 1</max>
            </range>
            <output>fcs/elevator-pos-norm</output>
         </aerosurface_scale>
      </channel>
      <channel name="Yaw">
         <summer name="fcs/yaw-trim-sum">
            <input>fcs/rudder-cmd-norm</input>
            <input>fcs/yaw-trim-cmd-norm</input>
            <clipto>
               <min>-1</min>
               <max>1</max>
            </clipto>
         </summer>
         <aerosurface_scale name="Rudder Control">
            <input>fcs/yaw-trim-sum</input>
            <range>
               <min>-30.0</min>
               <max>30.0</max>
            </range>
            <output>fcs/rudder-pos-deg</output>
         </aerosurface_scale>
         <aerosurface_scale name="Rudder Normalized">
            <input>fcs/rudder-pos-deg</input>
            <domain>
               <min>-30.0</min>
               <max>30.0</max>
            </domain>
            <range>
               <min> -1</min>
               <max> 1</max>
            </range>
            <output>fcs/rudder-pos-norm</output>
         </aerosurface_scale>
      </channel>
      <channel name="roll">
         <summer name="Roll Trim Sum">
            <input>fcs/aileron-cmd-norm</input>
            <input>fcs/roll-trim-cmd-norm</input>
            <clipto>
               <min>-1</min>
               <max>1</max>
            </clipto>
         </summer>
         <aerosurface_scale name="Right Aileron Control">
            <input>fcs/roll-trim-sum</input>
            <output>fcs/right-aileron-pos-deg</output>
            <range>
               <min>-25.0</min>
               <max>25.0</max>
            </range>
         </aerosurface_scale>
         <aerosurface_scale name="Right Aileron Normalized">
            <input>fcs/right-aileron-pos-deg</input>
            <domain>
               <min>-25.0</min>
               <max>25.0</max>
            </domain>
            <range>
               <min> -1</min>
               <max> 1</max>
            </range>
            <output>fcs/right-aileron-pos-norm</output>
         </aerosurface_scale>
         <aerosurface_scale name="Left Aileron Control">
            <input>fcs/roll-trim-sum</input>
            <output>fcs/left-aileron-pos-rad</output>
            <range>
               <min>-25.0</min>
               <max>25.0</max>
            </range>
            <gain>0.0175</gain>
         </aerosurface_scale>
         <aerosurface_scale name="Left Aileron position normalized">
            <input>fcs/left-aileron-pos-deg</input>
            <domain>
               <min>-25.0</min>
               <max>25.0</max>
            </domain>
            <range>
               <min> -1</min>
               <max> 1</max>
            </range>
            <output>fcs/left-aileron-pos-norm</output>
         </aerosurface_scale>
      </channel>
	          <channel name="Flaps">
            <kinematic name="fcs/flaps-control">
                <input>fcs/flap-cmd-norm</input>
                <traverse>
                    <setting>
                       <position> 0 </position>
                       <time> 0 </time>
                    </setting>
                    <setting>
                       <position> 10 </position>
                       <time> 2 </time>
                    </setting>
                    <setting>
                       <position> 20 </position>
                       <time> 1 </time>
                    </setting>
                    <setting>
                       <position> 30 </position>
                       <time> 1 </time>
                    </setting>
                </traverse>
                <output>fcs/flap-pos-deg</output>
            </kinematic>
            <aerosurface_scale name="fcs/flap-position-normalizer">
              <input>fcs/flap-pos-deg</input>
              <domain>
                <min>0</min>  <!-- Flaps actual minimum position -->
                <max>30</max>  <!-- Flaps actual maximum position -->
              </domain>
              <range>
                <min>0</min>  <!-- Flaps normalized minimum position -->
                <max>1</max>  <!-- Flaps normalized maximum position -->
              </range>
              <output>fcs/flap-pos-norm</output>
            </aerosurface_scale>
        </channel>
   </flight_control>
   <aerodynamics>
      <axis name="X">
         <function name="aero/function/axial_coeff_basic_Mach">
            <description>Lift coefficient due to alpha, beta, Reynolds, Mach</description>
            <product>
               <interpolate1d>
                  <p>velocities/mach</p>
                  <v>0.200</v>
                  <p>aero/function/axial_coeff_basic_M0</p>
                  <v>0.780</v>
                  <p>aero/function/axial_coeff_basic_M1</p>
               </interpolate1d>
            </product>
         </function>
         <function name="aero/function/axial_coeff_basic_M0">
            <description>CL = f(alpha, beta, Re) at M = 0.2</description>
            <product>
               <table>
                  <independentVar lookup="row">aero/alpha-deg</independentVar>
                  <independentVar lookup="column">aero/beta-deg</independentVar>
                  <independentVar lookup="table">aero/Re</independentVar>
                  <tableData breakPoint="1.0E7">
 	-5.0	0.0	5.0
-7.5	-0.047213	-0.047183	-0.047213
-5.0	-0.0093551	-0.0093241	-0.0093551
-2.5	0.011819	0.011849	0.011819
0.0	0.016307	0.016338	0.016307
0.5	0.015203	0.015233	0.015203
1.0	0.013431	0.013461	0.013431
1.5	0.010991	0.011022	0.010991
2.0	0.0078845	0.007915	0.0078845
2.5	0.0041103	0.0041408	0.0041103
3.0	-3.3134E-4	-3.0084E-4	-3.3134E-4
3.25	-0.0028021	-0.0027721	-0.0028021
3.5	-0.0054401	-0.0054101	-0.0054401
4.0	-0.011217	-0.011186	-0.011217
4.5	-0.017661	-0.01763	-0.017661
5.0	-0.024772	-0.024741	-0.024772
6.0	-0.040997	-0.040966	-0.040997
7.5	-0.070339	-0.070309	-0.070339
10.0	-0.13259	-0.13256	-0.13259
12.5	-0.21153	-0.2115	-0.21153
15.0	-0.30716	-0.30713	-0.30716
</tableData>
                  <tableData breakPoint="2.77E7">
 	-5.0	0.0	5.0
-7.5	-0.048418	-0.048392	-0.048418
-5.0	-0.010564	-0.010539	-0.010564
-2.5	0.010605	0.010631	0.010605
0.0	0.015093	0.015119	0.015093
0.5	0.013988	0.014014	0.013988
1.0	0.012216	0.012242	0.012216
1.5	0.0097772	0.0098031	0.0097772
2.0	0.0066707	0.0066966	0.0066707
2.5	0.0028969	0.0029228	0.0028969
3.0	-0.0015442	-0.0015183	-0.0015442
3.25	-0.0040151	-0.0039891	-0.0040151
3.5	-0.0066531	-0.0066271	-0.0066531
4.0	-0.012428	-0.012402	-0.012428
4.5	-0.018871	-0.018846	-0.018871
5.0	-0.025982	-0.025956	-0.025982
6.0	-0.042204	-0.042179	-0.042204
7.5	-0.071543	-0.071518	-0.071543
10.0	-0.13379	-0.13377	-0.13379
12.5	-0.21272	-0.21269	-0.21272
15.0	-0.30833	-0.3083	-0.30833
</tableData>
                  <tableData breakPoint="3.0E7">
 	-5.0	0.0	5.0
-7.5	-0.048501	-0.048475	-0.048501
-5.0	-0.010648	-0.010622	-0.010648
-2.5	0.010522	0.010547	0.010522
0.0	0.015009	0.015034	0.015009
0.5	0.013904	0.01393	0.013904
1.0	0.012133	0.012158	0.012133
1.5	0.0096935	0.009719	0.0096935
2.0	0.006587	0.0066126	0.006587
2.5	0.0028132	0.0028388	0.0028132
3.0	-0.0016278	-0.0016023	-0.0016278
3.25	-0.0040991	-0.0040731	-0.0040991
3.5	-0.0067361	-0.0067111	-0.0067361
4.0	-0.012512	-0.012486	-0.012512
4.5	-0.018955	-0.018929	-0.018955
5.0	-0.026065	-0.02604	-0.026065
6.0	-0.042288	-0.042262	-0.042288
7.5	-0.071626	-0.071601	-0.071626
10.0	-0.13387	-0.13385	-0.13387
12.5	-0.2128	-0.21278	-0.2128
15.0	-0.30841	-0.30838	-0.30841
</tableData>
               </table>
            </product>
         </function>
         <function name="aero/function/axial_coeff_basic_M1">
            <description>CL = f(alpha, beta, Re) at M = 0.78</description>
            <product>
               <table>
                  <independentVar lookup="row">aero/alpha-deg</independentVar>
                  <independentVar lookup="column">aero/beta-deg</independentVar>
                  <independentVar lookup="table">aero/Re</independentVar>
                  <tableData breakPoint="1.0E7">
 	-5.0	0.0	5.0
-7.5	-0.045507	-0.04547	-0.045507
-5.0	-0.0076401	-0.0076031	-0.0076401
-2.5	0.013539	0.013576	0.013539
0.0	0.018029	0.018066	0.018029
0.5	0.016924	0.016961	0.016924
1.0	0.015152	0.015189	0.015152
1.5	0.012712	0.012749	0.012712
2.0	0.0096049	0.009642	0.0096049
2.5	0.0058301	0.0058672	0.0058301
3.0	0.0013878	0.0014249	0.0013878
3.25	-0.0010837	-0.0010467	-0.0010837
3.5	-0.0037221	-0.0036851	-0.0037221
4.0	-0.0094991	-0.0094621	-0.0094991
4.5	-0.015944	-0.015907	-0.015944
5.0	-0.023057	-0.02302	-0.023057
6.0	-0.039285	-0.039248	-0.039285
7.5	-0.068633	-0.068596	-0.068633
10.0	-0.1309	-0.13086	-0.1309
12.5	-0.20985	-0.20982	-0.20985
15.0	-0.30549	-0.30546	-0.30549
</tableData>
                  <tableData breakPoint="2.77E7">
 	-5.0	0.0	5.0
-7.5	-0.046972	-0.046941	-0.046972
-5.0	-0.0091121	-0.0090811	-0.0091121
-2.5	0.012062	0.012093	0.012062
0.0	0.016551	0.016582	0.016551
0.5	0.015446	0.015477	0.015446
1.0	0.013674	0.013705	0.013674
1.5	0.011235	0.011266	0.011235
2.0	0.0081277	0.0081592	0.0081277
2.5	0.0043535	0.0043849	0.0043535
3.0	-8.8344E-5	-5.6844E-5	-8.8344E-5
3.25	-0.0025591	-0.0025281	-0.0025591
3.5	-0.0051971	-0.0051661	-0.0051971
4.0	-0.010974	-0.010943	-0.010974
4.5	-0.017418	-0.017387	-0.017418
5.0	-0.024529	-0.024498	-0.024529
6.0	-0.040755	-0.040723	-0.040755
7.5	-0.070098	-0.070067	-0.070098
10.0	-0.13236	-0.13232	-0.13236
12.5	-0.21129	-0.21126	-0.21129
15.0	-0.30692	-0.30689	-0.30692
</tableData>
                  <tableData breakPoint="3.0E7">
 	-5.0	0.0	5.0
-7.5	-0.047073	-0.047042	-0.047073
-5.0	-0.0092141	-0.0091831	-0.0092141
-2.5	0.01196	0.011991	0.01196
0.0	0.016449	0.01648	0.016449
0.5	0.015344	0.015375	0.015344
1.0	0.013572	0.013603	0.013572
1.5	0.011133	0.011164	0.011133
2.0	0.0080259	0.0080569	0.0080259
2.5	0.0042517	0.0042827	0.0042517
3.0	-1.9004E-4	-1.5904E-4	-1.9004E-4
3.25	-0.0026611	-0.0026301	-0.0026611
3.5	-0.0052991	-0.0052681	-0.0052991
4.0	-0.011076	-0.011045	-0.011076
4.5	-0.017519	-0.017489	-0.017519
5.0	-0.024631	-0.0246	-0.024631
6.0	-0.040856	-0.040825	-0.040856
7.5	-0.070199	-0.070168	-0.070199
10.0	-0.13246	-0.13242	-0.13246
12.5	-0.21139	-0.21136	-0.21139
15.0	-0.30702	-0.30699	-0.30702
</tableData>
               </table>
            </product>
         </function>
      </axis>
      <axis name="Y">
         <function name="aero/function/normal_coeff_basic_Mach">
            <description>Lift coefficient due to alpha, beta, Reynolds, Mach</description>
            <product>
               <interpolate1d>
                  <p>velocities/mach</p>
                  <v>0.200</v>
                  <p>aero/function/normal_coeff_basic_M0</p>
                  <v>0.780</v>
                  <p>aero/function/normal_coeff_basic_M1</p>
               </interpolate1d>
            </product>
         </function>
         <function name="aero/function/normal_coeff_basic_M0">
            <description>CL = f(alpha, beta, Re) at M = 0.2</description>
            <product>
               <table>
                  <independentVar lookup="row">aero/alpha-deg</independentVar>
                  <independentVar lookup="column">aero/beta-deg</independentVar>
                  <independentVar lookup="table">aero/Re</independentVar>
                  <tableData breakPoint="1.0E7">
 	-5.0	0.0	5.0
-7.5	6.944E-4	-5.183E-6	-7.0477E-4
-5.0	6.9613E-4	-3.4581E-6	-7.0304E-4
-2.5	6.979E-4	-1.6846E-6	-7.0127E-4
0.0	6.9972E-4	1.3771E-7	-6.9945E-4
0.5	7.0009E-4	5.0802E-7	-6.9908E-4
1.0	7.0046E-4	8.8027E-7	-6.987E-4
1.5	7.0084E-4	1.2545E-6	-6.9833E-4
2.0	7.0122E-4	1.6306E-6	-6.9795E-4
2.5	7.0159E-4	2.0087E-6	-6.9758E-4
3.0	7.0197E-4	2.3888E-6	-6.972E-4
3.25	7.0216E-4	2.5795E-6	-6.9701E-4
3.5	7.0236E-4	2.7707E-6	-6.9681E-4
4.0	7.0274E-4	3.1547E-6	-6.9643E-4
4.5	7.0313E-4	3.5406E-6	-6.9604E-4
5.0	7.0351E-4	3.9284E-6	-6.9566E-4
6.0	7.0429E-4	4.7099E-6	-6.9487E-4
7.5	7.0548E-4	5.8968E-6	-6.9369E-4
10.0	7.075E-4	7.914E-6	-6.9167E-4
12.5	7.0956E-4	9.9798E-6	-6.896E-4
15.0	7.1168E-4	1.2094E-5	-6.8749E-4
</tableData>
                  <tableData breakPoint="2.77E7">
 	-5.0	0.0	5.0
-7.5	5.8814E-4	-5.183E-6	-5.9851E-4
-5.0	5.8987E-4	-3.4581E-6	-5.9678E-4
-2.5	5.9164E-4	-1.6846E-6	-5.9501E-4
0.0	5.9346E-4	1.3771E-7	-5.9319E-4
0.5	5.9383E-4	5.0802E-7	-5.9282E-4
1.0	5.9421E-4	8.8027E-7	-5.9245E-4
1.5	5.9458E-4	1.2545E-6	-5.9207E-4
2.0	5.9496E-4	1.6306E-6	-5.9169E-4
2.5	5.9533E-4	2.0087E-6	-5.9132E-4
3.0	5.9571E-4	2.3888E-6	-5.9094E-4
3.25	5.9591E-4	2.5795E-6	-5.9075E-4
3.5	5.961E-4	2.7707E-6	-5.9055E-4
4.0	5.9648E-4	3.1547E-6	-5.9017E-4
4.5	5.9687E-4	3.5406E-6	-5.8978E-4
5.0	5.9725E-4	3.9284E-6	-5.894E-4
6.0	5.9804E-4	4.7099E-6	-5.8862E-4
7.5	5.9922E-4	5.8968E-6	-5.8743E-4
10.0	6.0124E-4	7.914E-6	-5.8541E-4
12.5	6.0331E-4	9.9798E-6	-5.8335E-4
15.0	6.0542E-4	1.2094E-5	-5.8123E-4
</tableData>
                  <tableData breakPoint="3.0E7">
 	-5.0	0.0	5.0
-7.5	5.8081E-4	-5.183E-6	-5.9118E-4
-5.0	5.8254E-4	-3.4581E-6	-5.8946E-4
-2.5	5.8431E-4	-1.6846E-6	-5.8768E-4
0.0	5.8614E-4	1.3771E-7	-5.8586E-4
0.5	5.8651E-4	5.0802E-7	-5.8549E-4
1.0	5.8688E-4	8.8027E-7	-5.8512E-4
1.5	5.8725E-4	1.2545E-6	-5.8474E-4
2.0	5.8763E-4	1.6306E-6	-5.8437E-4
2.5	5.8801E-4	2.0087E-6	-5.8399E-4
3.0	5.8839E-4	2.3888E-6	-5.8361E-4
3.25	5.8858E-4	2.5795E-6	-5.8342E-4
3.5	5.8877E-4	2.7707E-6	-5.8323E-4
4.0	5.8915E-4	3.1547E-6	-5.8284E-4
4.5	5.8954E-4	3.5406E-6	-5.8246E-4
5.0	5.8993E-4	3.9284E-6	-5.8207E-4
6.0	5.9071E-4	4.7099E-6	-5.8129E-4
7.5	5.9189E-4	5.8968E-6	-5.801E-4
10.0	5.9391E-4	7.914E-6	-5.7808E-4
12.5	5.9598E-4	9.9798E-6	-5.7602E-4
15.0	5.9809E-4	1.2094E-5	-5.739E-4
</tableData>
               </table>
            </product>
         </function>
         <function name="aero/function/normal_coeff_basic_M1">
            <description>CL = f(alpha, beta, Re) at M = 0.78</description>
            <product>
               <table>
                  <independentVar lookup="row">aero/alpha-deg</independentVar>
                  <independentVar lookup="column">aero/beta-deg</independentVar>
                  <independentVar lookup="table">aero/Re</independentVar>
                  <tableData breakPoint="1.0E7">
 	-5.0	0.0	5.0
-7.5	8.4501E-4	-5.183E-6	-8.5537E-4
-5.0	8.4673E-4	-3.4581E-6	-8.5365E-4
-2.5	8.4851E-4	-1.6846E-6	-8.5188E-4
0.0	8.5033E-4	1.3771E-7	-8.5005E-4
0.5	8.507E-4	5.0802E-7	-8.4968E-4
1.0	8.5107E-4	8.8027E-7	-8.4931E-4
1.5	8.5145E-4	1.2545E-6	-8.4894E-4
2.0	8.5182E-4	1.6306E-6	-8.4856E-4
2.5	8.522E-4	2.0087E-6	-8.4818E-4
3.0	8.5258E-4	2.3888E-6	-8.478E-4
3.25	8.5277E-4	2.5795E-6	-8.4761E-4
3.5	8.5296E-4	2.7707E-6	-8.4742E-4
4.0	8.5335E-4	3.1547E-6	-8.4704E-4
4.5	8.5373E-4	3.5406E-6	-8.4665E-4
5.0	8.5412E-4	3.9284E-6	-8.4626E-4
6.0	8.549E-4	4.7099E-6	-8.4548E-4
7.5	8.5609E-4	5.8968E-6	-8.443E-4
10.0	8.5811E-4	7.914E-6	-8.4228E-4
12.5	8.6017E-4	9.9798E-6	-8.4021E-4
15.0	8.6229E-4	1.2094E-5	-8.381E-4
</tableData>
                  <tableData breakPoint="2.77E7">
 	-5.0	0.0	5.0
-7.5	7.1569E-4	-5.183E-6	-7.2606E-4
-5.0	7.1742E-4	-3.4581E-6	-7.2434E-4
-2.5	7.1919E-4	-1.6846E-6	-7.2256E-4
0.0	7.2102E-4	1.3771E-7	-7.2074E-4
0.5	7.2139E-4	5.0802E-7	-7.2037E-4
1.0	7.2176E-4	8.8027E-7	-7.2E-4
1.5	7.2213E-4	1.2545E-6	-7.1962E-4
2.0	7.2251E-4	1.6306E-6	-7.1925E-4
2.5	7.2289E-4	2.0087E-6	-7.1887E-4
3.0	7.2327E-4	2.3888E-6	-7.1849E-4
3.25	7.2346E-4	2.5795E-6	-7.183E-4
3.5	7.2365E-4	2.7707E-6	-7.1811E-4
4.0	7.2403E-4	3.1547E-6	-7.1772E-4
4.5	7.2442E-4	3.5406E-6	-7.1734E-4
5.0	7.2481E-4	3.9284E-6	-7.1695E-4
6.0	7.2559E-4	4.7099E-6	-7.1617E-4
7.5	7.2677E-4	5.8968E-6	-7.1498E-4
10.0	7.2879E-4	7.914E-6	-7.1296E-4
12.5	7.3086E-4	9.9798E-6	-7.109E-4
15.0	7.3297E-4	1.2094E-5	-7.0878E-4
</tableData>
                  <tableData breakPoint="3.0E7">
 	-5.0	0.0	5.0
-7.5	7.0678E-4	-5.183E-6	-7.1715E-4
-5.0	7.085E-4	-3.4581E-6	-7.1542E-4
-2.5	7.1028E-4	-1.6846E-6	-7.1365E-4
0.0	7.121E-4	1.3771E-7	-7.1183E-4
0.5	7.1247E-4	5.0802E-7	-7.1145E-4
1.0	7.1284E-4	8.8027E-7	-7.1108E-4
1.5	7.1322E-4	1.2545E-6	-7.1071E-4
2.0	7.1359E-4	1.6306E-6	-7.1033E-4
2.5	7.1397E-4	2.0087E-6	-7.0995E-4
3.0	7.1435E-4	2.3888E-6	-7.0957E-4
3.25	7.1454E-4	2.5795E-6	-7.0938E-4
3.5	7.1473E-4	2.7707E-6	-7.0919E-4
4.0	7.1512E-4	3.1547E-6	-7.0881E-4
4.5	7.155E-4	3.5406E-6	-7.0842E-4
5.0	7.1589E-4	3.9284E-6	-7.0803E-4
6.0	7.1667E-4	4.7099E-6	-7.0725E-4
7.5	7.1786E-4	5.8968E-6	-7.0607E-4
10.0	7.1988E-4	7.914E-6	-7.0405E-4
12.5	7.2194E-4	9.9798E-6	-7.0198E-4
15.0	7.2406E-4	1.2094E-5	-6.9987E-4
</tableData>
               </table>
            </product>
         </function>
      </axis>
      <axis name="Z">
         <function name="aero/function/side_coeff_basic_Mach">
            <description>Lift coefficient due to alpha, beta, Reynolds, Mach</description>
            <product>
               <interpolate1d>
                  <p>velocities/mach</p>
                  <v>0.200</v>
                  <p>aero/function/side_coeff_basic_M0</p>
                  <v>0.780</v>
                  <p>aero/function/side_coeff_basic_M1</p>
               </interpolate1d>
            </product>
         </function>
         <function name="aero/function/side_coeff_basic_M0">
            <description>CL = f(alpha, beta, Re) at M = 0.2</description>
            <product>
               <table>
                  <independentVar lookup="row">aero/alpha-deg</independentVar>
                  <independentVar lookup="column">aero/beta-deg</independentVar>
                  <independentVar lookup="table">aero/Re</independentVar>
                  <tableData breakPoint="1.0E7">
 	-5.0	0.0	5.0
-7.5	-0.58739	-0.5874	-0.58739
-5.0	-0.34483	-0.34484	-0.34483
-2.5	-0.10395	-0.10395	-0.10395
0.0	0.13527	0.13527	0.13527
0.5	0.18291	0.18291	0.18291
1.0	0.23049	0.23049	0.23049
1.5	0.278	0.278	0.278
2.0	0.32544	0.32544	0.32544
2.5	0.37281	0.37281	0.37281
3.0	0.42012	0.42012	0.42012
3.25	0.44375	0.44375	0.44375
3.5	0.46736	0.46736	0.46736
4.0	0.51454	0.51454	0.51454
4.5	0.56164	0.56165	0.56164
5.0	0.60869	0.60869	0.60869
6.0	0.70257	0.70257	0.70257
7.5	0.84288	0.84289	0.84288
10.0	1.0754	1.0754	1.0754
12.5	1.3063	1.3063	1.3063
15.0	1.5354	1.5354	1.5354
</tableData>
                  <tableData breakPoint="2.77E7">
 	-5.0	0.0	5.0
-7.5	-0.58723	-0.58724	-0.58723
-5.0	-0.34473	-0.34473	-0.34473
-2.5	-0.10389	-0.1039	-0.10389
0.0	0.13527	0.13527	0.13527
0.5	0.1829	0.1829	0.1829
1.0	0.23047	0.23047	0.23047
1.5	0.27796	0.27797	0.27796
2.0	0.3254	0.3254	0.3254
2.5	0.37276	0.37276	0.37276
3.0	0.42006	0.42006	0.42006
3.25	0.44368	0.44368	0.44368
3.5	0.46729	0.46729	0.46729
4.0	0.51445	0.51445	0.51445
4.5	0.56155	0.56155	0.56155
5.0	0.60858	0.60858	0.60858
6.0	0.70244	0.70244	0.70244
7.5	0.84273	0.84273	0.84273
10.0	1.0752	1.0752	1.0752
12.5	1.306	1.306	1.306
15.0	1.5351	1.5351	1.5351
</tableData>
                  <tableData breakPoint="3.0E7">
 	-5.0	0.0	5.0
-7.5	-0.58722	-0.58722	-0.58722
-5.0	-0.34472	-0.34472	-0.34472
-2.5	-0.10389	-0.10389	-0.10389
0.0	0.13527	0.13527	0.13527
0.5	0.1829	0.1829	0.1829
1.0	0.23046	0.23047	0.23046
1.5	0.27796	0.27796	0.27796
2.0	0.32539	0.32539	0.32539
2.5	0.37276	0.37276	0.37276
3.0	0.42005	0.42006	0.42005
3.25	0.44368	0.44368	0.44368
3.5	0.46728	0.46729	0.46728
4.0	0.51445	0.51445	0.51445
4.5	0.56154	0.56155	0.56154
5.0	0.60857	0.60857	0.60857
6.0	0.70243	0.70243	0.70243
7.5	0.84272	0.84272	0.84272
10.0	1.0752	1.0752	1.0752
12.5	1.306	1.306	1.306
15.0	1.5351	1.5351	1.5351
</tableData>
               </table>
            </product>
         </function>
         <function name="aero/function/side_coeff_basic_M1">
            <description>CL = f(alpha, beta, Re) at M = 0.78</description>
            <product>
               <table>
                  <independentVar lookup="row">aero/alpha-deg</independentVar>
                  <independentVar lookup="column">aero/beta-deg</independentVar>
                  <independentVar lookup="table">aero/Re</independentVar>
                  <tableData breakPoint="1.0E7">
 	-5.0	0.0	5.0
-7.5	-0.58762	-0.58762	-0.58762
-5.0	-0.34498	-0.34499	-0.34498
-2.5	-0.10402	-0.10402	-0.10402
0.0	0.13527	0.13527	0.13527
0.5	0.18293	0.18293	0.18293
1.0	0.23052	0.23052	0.23052
1.5	0.27804	0.27804	0.27804
2.0	0.3255	0.3255	0.3255
2.5	0.37289	0.37289	0.37289
3.0	0.42021	0.42021	0.42021
3.25	0.44385	0.44385	0.44385
3.5	0.46747	0.46747	0.46747
4.0	0.51466	0.51466	0.51466
4.5	0.56178	0.56178	0.56178
5.0	0.60884	0.60884	0.60884
6.0	0.70275	0.70275	0.70275
7.5	0.84311	0.84311	0.84311
10.0	1.0757	1.0757	1.0757
12.5	1.3066	1.3066	1.3066
15.0	1.5359	1.5359	1.5359
</tableData>
                  <tableData breakPoint="2.77E7">
 	-5.0	0.0	5.0
-7.5	-0.58742	-0.58743	-0.58742
-5.0	-0.34486	-0.34486	-0.34486
-2.5	-0.10396	-0.10396	-0.10396
0.0	0.13527	0.13527	0.13527
0.5	0.18291	0.18291	0.18291
1.0	0.23049	0.23049	0.23049
1.5	0.278	0.278	0.278
2.0	0.32545	0.32545	0.32545
2.5	0.37282	0.37283	0.37282
3.0	0.42013	0.42014	0.42013
3.25	0.44376	0.44377	0.44376
3.5	0.46738	0.46738	0.46738
4.0	0.51455	0.51456	0.51455
4.5	0.56166	0.56167	0.56166
5.0	0.60871	0.60871	0.60871
6.0	0.70259	0.70259	0.70259
7.5	0.84292	0.84292	0.84292
10.0	1.0755	1.0755	1.0755
12.5	1.3063	1.3063	1.3063
15.0	1.5355	1.5355	1.5355
</tableData>
                  <tableData breakPoint="3.0E7">
 	-5.0	0.0	5.0
-7.5	-0.58741	-0.58741	-0.58741
-5.0	-0.34485	-0.34485	-0.34485
-2.5	-0.10395	-0.10395	-0.10395
0.0	0.13527	0.13527	0.13527
0.5	0.18291	0.18291	0.18291
1.0	0.23049	0.23049	0.23049
1.5	0.278	0.278	0.278
2.0	0.32544	0.32544	0.32544
2.5	0.37282	0.37282	0.37282
3.0	0.42013	0.42013	0.42013
3.25	0.44376	0.44376	0.44376
3.5	0.46737	0.46737	0.46737
4.0	0.51455	0.51455	0.51455
4.5	0.56166	0.56166	0.56166
5.0	0.6087	0.6087	0.6087
6.0	0.70258	0.70258	0.70258
7.5	0.8429	0.84291	0.8429
10.0	1.0754	1.0754	1.0754
12.5	1.3063	1.3063	1.3063
15.0	1.5355	1.5355	1.5355
</tableData>
               </table>
            </product>
         </function>
      </axis>
      <axis name="ROLL">
         <function name="aero/function/roll_coeff_basic_Mach">
            <description>Lift coefficient due to alpha, beta, Reynolds, Mach</description>
            <product>
               <interpolate1d>
                  <p>velocities/mach</p>
                  <v>0.200</v>
                  <p>aero/function/roll_coeff_basic_M0</p>
                  <v>0.780</v>
                  <p>aero/function/roll_coeff_basic_M1</p>
               </interpolate1d>
            </product>
         </function>
         <function name="aero/function/roll_coeff_basic_M0">
            <description>CL = f(alpha, beta, Re) at M = 0.2</description>
            <product>
               <table>
                  <independentVar lookup="row">aero/alpha-deg</independentVar>
                  <independentVar lookup="column">aero/beta-deg</independentVar>
                  <independentVar lookup="table">aero/Re</independentVar>
                  <tableData breakPoint="1.0E7">
 	-5.0	0.0	5.0
-7.5	4.6751E-6	4.6751E-6	4.6751E-6
-5.0	3.0794E-6	3.0794E-6	3.0794E-6
-2.5	1.4653E-6	1.4653E-6	1.4653E-6
0.0	-1.6704E-7	-1.6704E-7	-1.6704E-7
0.5	-4.9571E-7	-4.9571E-7	-4.9571E-7
1.0	-8.2511E-7	-8.2511E-7	-8.2511E-7
1.5	-1.1553E-6	-1.1553E-6	-1.1553E-6
2.0	-1.4861E-6	-1.4861E-6	-1.4861E-6
2.5	-1.8177E-6	-1.8177E-6	-1.8177E-6
3.0	-2.1501E-6	-2.1501E-6	-2.1501E-6
3.25	-2.3165E-6	-2.3165E-6	-2.3165E-6
3.5	-2.4831E-6	-2.4831E-6	-2.4831E-6
4.0	-2.8169E-6	-2.8169E-6	-2.8169E-6
4.5	-3.1514E-6	-3.1514E-6	-3.1514E-6
5.0	-3.4867E-6	-3.4867E-6	-3.4867E-6
6.0	-4.1594E-6	-4.1594E-6	-4.1594E-6
7.5	-5.174E-6	-5.174E-6	-5.174E-6
10.0	-6.8796E-6	-6.8796E-6	-6.8796E-6
12.5	-8.6036E-6	-8.6036E-6	-8.6036E-6
15.0	-1.0346E-5	-1.0346E-5	-1.0346E-5
</tableData>
                  <tableData breakPoint="2.77E7">
 	-5.0	0.0	5.0
-7.5	4.6751E-6	4.6751E-6	4.6751E-6
-5.0	3.0794E-6	3.0794E-6	3.0794E-6
-2.5	1.4653E-6	1.4653E-6	1.4653E-6
0.0	-1.6704E-7	-1.6704E-7	-1.6704E-7
0.5	-4.9571E-7	-4.9571E-7	-4.9571E-7
1.0	-8.2511E-7	-8.2511E-7	-8.2511E-7
1.5	-1.1553E-6	-1.1553E-6	-1.1553E-6
2.0	-1.4861E-6	-1.4861E-6	-1.4861E-6
2.5	-1.8177E-6	-1.8177E-6	-1.8177E-6
3.0	-2.1501E-6	-2.1501E-6	-2.1501E-6
3.25	-2.3165E-6	-2.3165E-6	-2.3165E-6
3.5	-2.4831E-6	-2.4831E-6	-2.4831E-6
4.0	-2.8169E-6	-2.8169E-6	-2.8169E-6
4.5	-3.1514E-6	-3.1514E-6	-3.1514E-6
5.0	-3.4867E-6	-3.4867E-6	-3.4867E-6
6.0	-4.1594E-6	-4.1594E-6	-4.1594E-6
7.5	-5.174E-6	-5.174E-6	-5.174E-6
10.0	-6.8796E-6	-6.8796E-6	-6.8796E-6
12.5	-8.6036E-6	-8.6036E-6	-8.6036E-6
15.0	-1.0346E-5	-1.0346E-5	-1.0346E-5
</tableData>
                  <tableData breakPoint="3.0E7">
 	-5.0	0.0	5.0
-7.5	4.6751E-6	4.6751E-6	4.6751E-6
-5.0	3.0794E-6	3.0794E-6	3.0794E-6
-2.5	1.4653E-6	1.4653E-6	1.4653E-6
0.0	-1.6704E-7	-1.6704E-7	-1.6704E-7
0.5	-4.9571E-7	-4.9571E-7	-4.9571E-7
1.0	-8.2511E-7	-8.2511E-7	-8.2511E-7
1.5	-1.1553E-6	-1.1553E-6	-1.1553E-6
2.0	-1.4861E-6	-1.4861E-6	-1.4861E-6
2.5	-1.8177E-6	-1.8177E-6	-1.8177E-6
3.0	-2.1501E-6	-2.1501E-6	-2.1501E-6
3.25	-2.3165E-6	-2.3165E-6	-2.3165E-6
3.5	-2.4831E-6	-2.4831E-6	-2.4831E-6
4.0	-2.8169E-6	-2.8169E-6	-2.8169E-6
4.5	-3.1514E-6	-3.1514E-6	-3.1514E-6
5.0	-3.4867E-6	-3.4867E-6	-3.4867E-6
6.0	-4.1594E-6	-4.1594E-6	-4.1594E-6
7.5	-5.174E-6	-5.174E-6	-5.174E-6
10.0	-6.8796E-6	-6.8796E-6	-6.8796E-6
12.5	-8.6036E-6	-8.6036E-6	-8.6036E-6
15.0	-1.0346E-5	-1.0346E-5	-1.0346E-5
</tableData>
               </table>
            </product>
         </function>
         <function name="aero/function/roll_coeff_basic_M1">
            <description>CL = f(alpha, beta, Re) at M = 0.78</description>
            <product>
               <table>
                  <independentVar lookup="row">aero/alpha-deg</independentVar>
                  <independentVar lookup="column">aero/beta-deg</independentVar>
                  <independentVar lookup="table">aero/Re</independentVar>
                  <tableData breakPoint="1.0E7">
 	-5.0	0.0	5.0
-7.5	4.6751E-6	4.6751E-6	4.6751E-6
-5.0	3.0794E-6	3.0794E-6	3.0794E-6
-2.5	1.4653E-6	1.4653E-6	1.4653E-6
0.0	-1.6704E-7	-1.6704E-7	-1.6704E-7
0.5	-4.9571E-7	-4.9571E-7	-4.9571E-7
1.0	-8.2511E-7	-8.2511E-7	-8.2511E-7
1.5	-1.1553E-6	-1.1553E-6	-1.1553E-6
2.0	-1.4861E-6	-1.4861E-6	-1.4861E-6
2.5	-1.8177E-6	-1.8177E-6	-1.8177E-6
3.0	-2.1501E-6	-2.1501E-6	-2.1501E-6
3.25	-2.3165E-6	-2.3165E-6	-2.3165E-6
3.5	-2.4831E-6	-2.4831E-6	-2.4831E-6
4.0	-2.8169E-6	-2.8169E-6	-2.8169E-6
4.5	-3.1514E-6	-3.1514E-6	-3.1514E-6
5.0	-3.4867E-6	-3.4867E-6	-3.4867E-6
6.0	-4.1594E-6	-4.1594E-6	-4.1594E-6
7.5	-5.174E-6	-5.174E-6	-5.174E-6
10.0	-6.8796E-6	-6.8796E-6	-6.8796E-6
12.5	-8.6036E-6	-8.6036E-6	-8.6036E-6
15.0	-1.0346E-5	-1.0346E-5	-1.0346E-5
</tableData>
                  <tableData breakPoint="2.77E7">
 	-5.0	0.0	5.0
-7.5	4.6751E-6	4.6751E-6	4.6751E-6
-5.0	3.0794E-6	3.0794E-6	3.0794E-6
-2.5	1.4653E-6	1.4653E-6	1.4653E-6
0.0	-1.6704E-7	-1.6704E-7	-1.6704E-7
0.5	-4.9571E-7	-4.9571E-7	-4.9571E-7
1.0	-8.2511E-7	-8.2511E-7	-8.2511E-7
1.5	-1.1553E-6	-1.1553E-6	-1.1553E-6
2.0	-1.4861E-6	-1.4861E-6	-1.4861E-6
2.5	-1.8177E-6	-1.8177E-6	-1.8177E-6
3.0	-2.1501E-6	-2.1501E-6	-2.1501E-6
3.25	-2.3165E-6	-2.3165E-6	-2.3165E-6
3.5	-2.4831E-6	-2.4831E-6	-2.4831E-6
4.0	-2.8169E-6	-2.8169E-6	-2.8169E-6
4.5	-3.1514E-6	-3.1514E-6	-3.1514E-6
5.0	-3.4867E-6	-3.4867E-6	-3.4867E-6
6.0	-4.1594E-6	-4.1594E-6	-4.1594E-6
7.5	-5.174E-6	-5.174E-6	-5.174E-6
10.0	-6.8796E-6	-6.8796E-6	-6.8796E-6
12.5	-8.6036E-6	-8.6036E-6	-8.6036E-6
15.0	-1.0346E-5	-1.0346E-5	-1.0346E-5
</tableData>
                  <tableData breakPoint="3.0E7">
 	-5.0	0.0	5.0
-7.5	4.6751E-6	4.6751E-6	4.6751E-6
-5.0	3.0794E-6	3.0794E-6	3.0794E-6
-2.5	1.4653E-6	1.4653E-6	1.4653E-6
0.0	-1.6704E-7	-1.6704E-7	-1.6704E-7
0.5	-4.9571E-7	-4.9571E-7	-4.9571E-7
1.0	-8.2511E-7	-8.2511E-7	-8.2511E-7
1.5	-1.1553E-6	-1.1553E-6	-1.1553E-6
2.0	-1.4861E-6	-1.4861E-6	-1.4861E-6
2.5	-1.8177E-6	-1.8177E-6	-1.8177E-6
3.0	-2.1501E-6	-2.1501E-6	-2.1501E-6
3.25	-2.3165E-6	-2.3165E-6	-2.3165E-6
3.5	-2.4831E-6	-2.4831E-6	-2.4831E-6
4.0	-2.8169E-6	-2.8169E-6	-2.8169E-6
4.5	-3.1514E-6	-3.1514E-6	-3.1514E-6
5.0	-3.4867E-6	-3.4867E-6	-3.4867E-6
6.0	-4.1594E-6	-4.1594E-6	-4.1594E-6
7.5	-5.174E-6	-5.174E-6	-5.174E-6
10.0	-6.8796E-6	-6.8796E-6	-6.8796E-6
12.5	-8.6036E-6	-8.6036E-6	-8.6036E-6
15.0	-1.0346E-5	-1.0346E-5	-1.0346E-5
</tableData>
               </table>
            </product>
         </function>
      </axis>
      <axis name="PITCH">
         <function name="aero/function/pitch_coeff_basic_Mach">
            <description>Lift coefficient due to alpha, beta, Reynolds, Mach</description>
            <product>
               <interpolate1d>
                  <p>velocities/mach</p>
                  <v>0.200</v>
                  <p>aero/function/pitch_coeff_basic_M0</p>
                  <v>0.780</v>
                  <p>aero/function/pitch_coeff_basic_M1</p>
               </interpolate1d>
            </product>
         </function>
         <function name="aero/function/pitch_coeff_basic_M0">
            <description>CL = f(alpha, beta, Re) at M = 0.2</description>
            <product>
               <table>
                  <independentVar lookup="row">aero/alpha-deg</independentVar>
                  <independentVar lookup="column">aero/beta-deg</independentVar>
                  <independentVar lookup="table">aero/Re</independentVar>
                  <tableData breakPoint="1.0E7">
 	-5.0	0.0	5.0
-7.5	2.7589	2.7589	2.7589
-5.0	1.6627	1.6627	1.6627
-2.5	0.58264	0.58264	0.58264
0.0	-0.48143	-0.48143	-0.48143
0.5	-0.69231	-0.69231	-0.69231
1.0	-0.90256	-0.90256	-0.90256
1.5	-1.1122	-1.1122	-1.1122
2.0	-1.3211	-1.3211	-1.3211
2.5	-1.5294	-1.5294	-1.5294
3.0	-1.7371	-1.7371	-1.7371
3.25	-1.8407	-1.8407	-1.8407
3.5	-1.9442	-1.9442	-1.9442
4.0	-2.1506	-2.1506	-2.1506
4.5	-2.3563	-2.3563	-2.3563
5.0	-2.5614	-2.5614	-2.5614
6.0	-2.9697	-2.9697	-2.9697
7.5	-3.5773	-3.5773	-3.5773
10.0	-4.5772	-4.5772	-4.5772
12.5	-5.5611	-5.5611	-5.5611
15.0	-6.5289	-6.5289	-6.5289
</tableData>
                  <tableData breakPoint="2.77E7">
 	-5.0	0.0	5.0
-7.5	2.7589	2.7589	2.7589
-5.0	1.6627	1.6627	1.6627
-2.5	0.58264	0.58264	0.58264
0.0	-0.48143	-0.48143	-0.48143
0.5	-0.69231	-0.69231	-0.69231
1.0	-0.90256	-0.90256	-0.90256
1.5	-1.1122	-1.1122	-1.1122
2.0	-1.3211	-1.3211	-1.3211
2.5	-1.5294	-1.5294	-1.5294
3.0	-1.7371	-1.7371	-1.7371
3.25	-1.8407	-1.8407	-1.8407
3.5	-1.9442	-1.9442	-1.9442
4.0	-2.1506	-2.1506	-2.1506
4.5	-2.3563	-2.3563	-2.3563
5.0	-2.5614	-2.5614	-2.5614
6.0	-2.9697	-2.9697	-2.9697
7.5	-3.5773	-3.5773	-3.5773
10.0	-4.5772	-4.5772	-4.5772
12.5	-5.5611	-5.5611	-5.5611
15.0	-6.5289	-6.5289	-6.5289
</tableData>
                  <tableData breakPoint="3.0E7">
 	-5.0	0.0	5.0
-7.5	2.7589	2.7589	2.7589
-5.0	1.6627	1.6627	1.6627
-2.5	0.58264	0.58264	0.58264
0.0	-0.48143	-0.48143	-0.48143
0.5	-0.69231	-0.69231	-0.69231
1.0	-0.90256	-0.90256	-0.90256
1.5	-1.1122	-1.1122	-1.1122
2.0	-1.3211	-1.3211	-1.3211
2.5	-1.5294	-1.5294	-1.5294
3.0	-1.7371	-1.7371	-1.7371
3.25	-1.8407	-1.8407	-1.8407
3.5	-1.9442	-1.9442	-1.9442
4.0	-2.1506	-2.1506	-2.1506
4.5	-2.3563	-2.3563	-2.3563
5.0	-2.5614	-2.5614	-2.5614
6.0	-2.9697	-2.9697	-2.9697
7.5	-3.5773	-3.5773	-3.5773
10.0	-4.5772	-4.5772	-4.5772
12.5	-5.5611	-5.5611	-5.5611
15.0	-6.5289	-6.5289	-6.5289
</tableData>
               </table>
            </product>
         </function>
         <function name="aero/function/pitch_coeff_basic_M1">
            <description>CL = f(alpha, beta, Re) at M = 0.78</description>
            <product>
               <table>
                  <independentVar lookup="row">aero/alpha-deg</independentVar>
                  <independentVar lookup="column">aero/beta-deg</independentVar>
                  <independentVar lookup="table">aero/Re</independentVar>
                  <tableData breakPoint="1.0E7">
 	-5.0	0.0	5.0
-7.5	2.7589	2.7589	2.7589
-5.0	1.6627	1.6627	1.6627
-2.5	0.58264	0.58264	0.58264
0.0	-0.48143	-0.48143	-0.48143
0.5	-0.69231	-0.69231	-0.69231
1.0	-0.90256	-0.90256	-0.90256
1.5	-1.1122	-1.1122	-1.1122
2.0	-1.3211	-1.3211	-1.3211
2.5	-1.5294	-1.5294	-1.5294
3.0	-1.7371	-1.7371	-1.7371
3.25	-1.8407	-1.8407	-1.8407
3.5	-1.9442	-1.9442	-1.9442
4.0	-2.1506	-2.1506	-2.1506
4.5	-2.3563	-2.3563	-2.3563
5.0	-2.5614	-2.5614	-2.5614
6.0	-2.9697	-2.9697	-2.9697
7.5	-3.5773	-3.5773	-3.5773
10.0	-4.5772	-4.5772	-4.5772
12.5	-5.5611	-5.5611	-5.5611
15.0	-6.5289	-6.5289	-6.5289
</tableData>
                  <tableData breakPoint="2.77E7">
 	-5.0	0.0	5.0
-7.5	2.7589	2.7589	2.7589
-5.0	1.6627	1.6627	1.6627
-2.5	0.58264	0.58264	0.58264
0.0	-0.48143	-0.48143	-0.48143
0.5	-0.69231	-0.69231	-0.69231
1.0	-0.90256	-0.90256	-0.90256
1.5	-1.1122	-1.1122	-1.1122
2.0	-1.3211	-1.3211	-1.3211
2.5	-1.5294	-1.5294	-1.5294
3.0	-1.7371	-1.7371	-1.7371
3.25	-1.8407	-1.8407	-1.8407
3.5	-1.9442	-1.9442	-1.9442
4.0	-2.1506	-2.1506	-2.1506
4.5	-2.3563	-2.3563	-2.3563
5.0	-2.5614	-2.5614	-2.5614
6.0	-2.9697	-2.9697	-2.9697
7.5	-3.5773	-3.5773	-3.5773
10.0	-4.5772	-4.5772	-4.5772
12.5	-5.5611	-5.5611	-5.5611
15.0	-6.5289	-6.5289	-6.5289
</tableData>
                  <tableData breakPoint="3.0E7">
 	-5.0	0.0	5.0
-7.5	2.7589	2.7589	2.7589
-5.0	1.6627	1.6627	1.6627
-2.5	0.58264	0.58264	0.58264
0.0	-0.48143	-0.48143	-0.48143
0.5	-0.69231	-0.69231	-0.69231
1.0	-0.90256	-0.90256	-0.90256
1.5	-1.1122	-1.1122	-1.1122
2.0	-1.3211	-1.3211	-1.3211
2.5	-1.5294	-1.5294	-1.5294
3.0	-1.7371	-1.7371	-1.7371
3.25	-1.8407	-1.8407	-1.8407
3.5	-1.9442	-1.9442	-1.9442
4.0	-2.1506	-2.1506	-2.1506
4.5	-2.3563	-2.3563	-2.3563
5.0	-2.5614	-2.5614	-2.5614
6.0	-2.9697	-2.9697	-2.9697
7.5	-3.5773	-3.5773	-3.5773
10.0	-4.5772	-4.5772	-4.5772
12.5	-5.5611	-5.5611	-5.5611
15.0	-6.5289	-6.5289	-6.5289
</tableData>
               </table>
            </product>
         </function>
      </axis>
      <axis name="YAW">
         <function name="aero/function/yaw_coeff_basic_Mach">
            <description>Lift coefficient due to alpha, beta, Reynolds, Mach</description>
            <product>
               <interpolate1d>
                  <p>velocities/mach</p>
                  <v>0.200</v>
                  <p>aero/function/yaw_coeff_basic_M0</p>
                  <v>0.780</v>
                  <p>aero/function/yaw_coeff_basic_M1</p>
               </interpolate1d>
            </product>
         </function>
         <function name="aero/function/yaw_coeff_basic_M0">
            <description>CL = f(alpha, beta, Re) at M = 0.2</description>
            <product>
               <table>
                  <independentVar lookup="row">aero/alpha-deg</independentVar>
                  <independentVar lookup="column">aero/beta-deg</independentVar>
                  <independentVar lookup="table">aero/Re</independentVar>
                  <tableData breakPoint="1.0E7">
 	-5.0	0.0	5.0
-7.5	-4.0277E-5	-4.0277E-5	-4.0277E-5
-5.0	-2.6913E-5	-2.6913E-5	-2.6913E-5
-2.5	-1.3113E-5	-1.3113E-5	-1.3113E-5
0.0	1.1223E-6	1.1223E-6	1.1223E-6
0.5	4.0217E-6	4.0217E-6	4.0217E-6
1.0	6.9385E-6	6.9385E-6	6.9385E-6
1.5	9.8728E-6	9.8728E-6	9.8728E-6
2.0	1.2824E-5	1.2824E-5	1.2824E-5
2.5	1.5794E-5	1.5794E-5	1.5794E-5
3.0	1.878E-5	1.878E-5	1.878E-5
3.25	2.028E-5	2.028E-5	2.028E-5
3.5	2.1784E-5	2.1784E-5	2.1784E-5
4.0	2.4805E-5	2.4805E-5	2.4805E-5
4.5	2.7844E-5	2.7844E-5	2.7844E-5
5.0	3.0901E-5	3.0901E-5	3.0901E-5
6.0	3.7065E-5	3.7065E-5	3.7065E-5
7.5	4.6443E-5	4.6443E-5	4.6443E-5
10.0	6.2422E-5	6.2422E-5	6.2422E-5
12.5	7.8836E-5	7.8836E-5	7.8836E-5
15.0	9.5686E-5	9.5686E-5	9.5686E-5
</tableData>
                  <tableData breakPoint="2.77E7">
 	-5.0	0.0	5.0
-7.5	-4.0277E-5	-4.0277E-5	-4.0277E-5
-5.0	-2.6913E-5	-2.6913E-5	-2.6913E-5
-2.5	-1.3113E-5	-1.3113E-5	-1.3113E-5
0.0	1.1223E-6	1.1223E-6	1.1223E-6
0.5	4.0217E-6	4.0217E-6	4.0217E-6
1.0	6.9385E-6	6.9385E-6	6.9385E-6
1.5	9.8728E-6	9.8728E-6	9.8728E-6
2.0	1.2824E-5	1.2824E-5	1.2824E-5
2.5	1.5794E-5	1.5794E-5	1.5794E-5
3.0	1.878E-5	1.878E-5	1.878E-5
3.25	2.028E-5	2.028E-5	2.028E-5
3.5	2.1784E-5	2.1784E-5	2.1784E-5
4.0	2.4805E-5	2.4805E-5	2.4805E-5
4.5	2.7844E-5	2.7844E-5	2.7844E-5
5.0	3.0901E-5	3.0901E-5	3.0901E-5
6.0	3.7065E-5	3.7065E-5	3.7065E-5
7.5	4.6443E-5	4.6443E-5	4.6443E-5
10.0	6.2422E-5	6.2422E-5	6.2422E-5
12.5	7.8836E-5	7.8836E-5	7.8836E-5
15.0	9.5686E-5	9.5686E-5	9.5686E-5
</tableData>
                  <tableData breakPoint="3.0E7">
 	-5.0	0.0	5.0
-7.5	-4.0277E-5	-4.0277E-5	-4.0277E-5
-5.0	-2.6913E-5	-2.6913E-5	-2.6913E-5
-2.5	-1.3113E-5	-1.3113E-5	-1.3113E-5
0.0	1.1223E-6	1.1223E-6	1.1223E-6
0.5	4.0217E-6	4.0217E-6	4.0217E-6
1.0	6.9385E-6	6.9385E-6	6.9385E-6
1.5	9.8728E-6	9.8728E-6	9.8728E-6
2.0	1.2824E-5	1.2824E-5	1.2824E-5
2.5	1.5794E-5	1.5794E-5	1.5794E-5
3.0	1.878E-5	1.878E-5	1.878E-5
3.25	2.028E-5	2.028E-5	2.028E-5
3.5	2.1784E-5	2.1784E-5	2.1784E-5
4.0	2.4805E-5	2.4805E-5	2.4805E-5
4.5	2.7844E-5	2.7844E-5	2.7844E-5
5.0	3.0901E-5	3.0901E-5	3.0901E-5
6.0	3.7065E-5	3.7065E-5	3.7065E-5
7.5	4.6443E-5	4.6443E-5	4.6443E-5
10.0	6.2422E-5	6.2422E-5	6.2422E-5
12.5	7.8836E-5	7.8836E-5	7.8836E-5
15.0	9.5686E-5	9.5686E-5	9.5686E-5
</tableData>
               </table>
            </product>
         </function>
         <function name="aero/function/yaw_coeff_basic_M1">
            <description>CL = f(alpha, beta, Re) at M = 0.78</description>
            <product>
               <table>
                  <independentVar lookup="row">aero/alpha-deg</independentVar>
                  <independentVar lookup="column">aero/beta-deg</independentVar>
                  <independentVar lookup="table">aero/Re</independentVar>
                  <tableData breakPoint="1.0E7">
 	-5.0	0.0	5.0
-7.5	-4.0277E-5	-4.0277E-5	-4.0277E-5
-5.0	-2.6913E-5	-2.6913E-5	-2.6913E-5
-2.5	-1.3113E-5	-1.3113E-5	-1.3113E-5
0.0	1.1223E-6	1.1223E-6	1.1223E-6
0.5	4.0217E-6	4.0217E-6	4.0217E-6
1.0	6.9385E-6	6.9385E-6	6.9385E-6
1.5	9.8728E-6	9.8728E-6	9.8728E-6
2.0	1.2824E-5	1.2824E-5	1.2824E-5
2.5	1.5794E-5	1.5794E-5	1.5794E-5
3.0	1.878E-5	1.878E-5	1.878E-5
3.25	2.028E-5	2.028E-5	2.028E-5
3.5	2.1784E-5	2.1784E-5	2.1784E-5
4.0	2.4805E-5	2.4805E-5	2.4805E-5
4.5	2.7844E-5	2.7844E-5	2.7844E-5
5.0	3.0901E-5	3.0901E-5	3.0901E-5
6.0	3.7065E-5	3.7065E-5	3.7065E-5
7.5	4.6443E-5	4.6443E-5	4.6443E-5
10.0	6.2422E-5	6.2422E-5	6.2422E-5
12.5	7.8836E-5	7.8836E-5	7.8836E-5
15.0	9.5686E-5	9.5686E-5	9.5686E-5
</tableData>
                  <tableData breakPoint="2.77E7">
 	-5.0	0.0	5.0
-7.5	-4.0277E-5	-4.0277E-5	-4.0277E-5
-5.0	-2.6913E-5	-2.6913E-5	-2.6913E-5
-2.5	-1.3113E-5	-1.3113E-5	-1.3113E-5
0.0	1.1223E-6	1.1223E-6	1.1223E-6
0.5	4.0217E-6	4.0217E-6	4.0217E-6
1.0	6.9385E-6	6.9385E-6	6.9385E-6
1.5	9.8728E-6	9.8728E-6	9.8728E-6
2.0	1.2824E-5	1.2824E-5	1.2824E-5
2.5	1.5794E-5	1.5794E-5	1.5794E-5
3.0	1.878E-5	1.878E-5	1.878E-5
3.25	2.028E-5	2.028E-5	2.028E-5
3.5	2.1784E-5	2.1784E-5	2.1784E-5
4.0	2.4805E-5	2.4805E-5	2.4805E-5
4.5	2.7844E-5	2.7844E-5	2.7844E-5
5.0	3.0901E-5	3.0901E-5	3.0901E-5
6.0	3.7065E-5	3.7065E-5	3.7065E-5
7.5	4.6443E-5	4.6443E-5	4.6443E-5
10.0	6.2422E-5	6.2422E-5	6.2422E-5
12.5	7.8836E-5	7.8836E-5	7.8836E-5
15.0	9.5686E-5	9.5686E-5	9.5686E-5
</tableData>
                  <tableData breakPoint="3.0E7">
 	-5.0	0.0	5.0
-7.5	-4.0277E-5	-4.0277E-5	-4.0277E-5
-5.0	-2.6913E-5	-2.6913E-5	-2.6913E-5
-2.5	-1.3113E-5	-1.3113E-5	-1.3113E-5
0.0	1.1223E-6	1.1223E-6	1.1223E-6
0.5	4.0217E-6	4.0217E-6	4.0217E-6
1.0	6.9385E-6	6.9385E-6	6.9385E-6
1.5	9.8728E-6	9.8728E-6	9.8728E-6
2.0	1.2824E-5	1.2824E-5	1.2824E-5
2.5	1.5794E-5	1.5794E-5	1.5794E-5
3.0	1.878E-5	1.878E-5	1.878E-5
3.25	2.028E-5	2.028E-5	2.028E-5
3.5	2.1784E-5	2.1784E-5	2.1784E-5
4.0	2.4805E-5	2.4805E-5	2.4805E-5
4.5	2.7844E-5	2.7844E-5	2.7844E-5
5.0	3.0901E-5	3.0901E-5	3.0901E-5
6.0	3.7065E-5	3.7065E-5	3.7065E-5
7.5	4.6443E-5	4.6443E-5	4.6443E-5
10.0	6.2422E-5	6.2422E-5	6.2422E-5
12.5	7.8836E-5	7.8836E-5	7.8836E-5
15.0	9.5686E-5	9.5686E-5	9.5686E-5
</tableData>
               </table>
            </product>
         </function>
      </axis>
   </aerodynamics>
   <output name="D150 AGILE.csv" rate="10" type="CSV">
      <property>aero/function/axial_coeff_basic_M0</property>
      <property>aero/function/axial_coeff_basic_M1</property>
      <property>aero/function/normal_coeff_basic_M0</property>
      <property>aero/function/normal_coeff_basic_M1</property>
      <property>aero/function/side_coeff_basic_M0</property>
      <property>aero/function/side_coeff_basic_M1</property>
      <property>aero/function/roll_coeff_basic_M0</property>
      <property>aero/function/roll_coeff_basic_M1</property>
      <property>aero/function/pitch_coeff_basic_M0</property>
      <property>aero/function/pitch_coeff_basic_M1</property>
      <property>aero/function/yaw_coeff_basic_M0</property>
      <property>aero/function/yaw_coeff_basic_M1</property>
      <property>aero/alpha-deg</property>
      <property>aero/beta-deg</property>
      <property>aero/Re</property>
      <property>velocities/mach</property>
      <property>aero/forces/lift_basic_Mach</property>
   </output>
</fdm_config>
