<?xml version="1.0" encoding="UTF-8"?>
<fdm_config name="D150 AGILE" release="BETA" version="2.0">
   <metrics>
      <wingarea unit="M2">130.514</wingarea>
      <wingspan unit="M">33.914</wingspan>
      <chord unit="M">4.192</chord>
      <htailarea unit="M2">32.758</htailarea>
      <htailarm unit="M">17.727</htailarm>
      <vtailarea unit="M2">46.589</vtailarea>
      <htailarm unit="M2">16.961</htailarm>
      <location name="AERORP" unit="M">
         <x>16.3282</x>
         <y>0.000000</y>
         <z>-1.136280</z>
      </location>
      <location name="EYEPOINT" unit="M">
         <x>14.6200</x>
         <y>0.000000</y>
         <z>-0.100000</z>
      </location>
      <location name="VRP" unit="M">
         <x>16.3282</x>
         <y>0.000000</y>
         <z>-1.136280</z>
      </location>
   </metrics>
   <mass_balance>
      <ixx unit="KG*M2">761969.688</ixx>
      <iyy unit="KG*M2">1997119.840</iyy>
      <izz unit="KG*M2">2567919.197</izz>
      <ixy unit="KG*M2">0.000000</ixy>
      <ixz unit="KG*M2">8000.000</ixz>
      <iyz unit="KG*M2">0.000000</iyz>
      <emptywt unit="KG">37340.020</emptywt>
      <location name="CG" unit="M">
         <x>16.0519</x>
         <y>0.000000</y>
         <z>0.000000</z>
      </location>
   </mass_balance>
   <ground_reactions>
      <contact name="Nose Gear" type="BOGEY">
         <location unit="M">
            <x>5.0720</x>
            <y>0.000000</y>
            <z>-1.690730</z>
         </location>
         <static_friction>0.8000</static_friction>
         <dynamic_friction>0.5000</dynamic_friction>
         <rolling_friction>0.0200</rolling_friction>
         <spring_coeff unit="LBS/FT">90000.750</spring_coeff>
         <dynamic_coeff unit="LBS/FT">4000.656</dynamic_coeff>
         <damping_coeff_rebound unit="LBS/FT/SEC">8000.311</damping_coeff_rebound>
         <max_steer unit="DEG">35.000</max_steer>
         <brake_group>NONE</brake_group>
         <retractable>1.0000</retractable>
      </contact>
      <contact name="Right Main Gear" type="BOGEY">
         <location unit="M">
            <x>16.1264</x>
            <y>3.7814</y>
            <z>-1.305452</z>
         </location>
         <static_friction>0.8000</static_friction>
         <dynamic_friction>0.5000</dynamic_friction>
         <rolling_friction>0.0200</rolling_friction>
         <spring_coeff unit="LBS/FT">120000.673</spring_coeff>
         <dynamic_coeff unit="LBS/FT">10000.640</dynamic_coeff>
         <damping_coeff_rebound unit="LBS/FT/SEC">20000.270</damping_coeff_rebound>
         <max_steer unit="DEG">0.000000</max_steer>
         <brake_group>RIGHT</brake_group>
         <retractable>1.0000</retractable>
      </contact>
      <contact name="Left Main Gear" type="BOGEY">
         <location unit="M">
            <x>16.1264</x>
            <y>-3.781379</y>
            <z>-1.305452</z>
         </location>
         <static_friction>0.8000</static_friction>
         <dynamic_friction>0.5000</dynamic_friction>
         <rolling_friction>0.0200</rolling_friction>
         <spring_coeff unit="LBS/FT">120000.673</spring_coeff>
         <dynamic_coeff unit="LBS/FT">10000.640</dynamic_coeff>
         <damping_coeff_rebound unit="LBS/FT/SEC">20000.270</damping_coeff_rebound>
         <max_steer unit="DEG">0.000000</max_steer>
         <brake_group>LEFT</brake_group>
         <retractable>1.0000</retractable>
      </contact>
   </ground_reactions>
   <propulsion>
      <engine file="D150_AGILE_engine">
         <location unit="M">
            <x>13.6765</x>
            <y>5.7482</y>
            <z>-2.338950</z>
         </location>
         <orient unit="DEG">
            <roll>0.000000</roll>
            <pitch>0.000000</pitch>
            <yaw>0.000000</yaw>
         </orient>
         <feed>0</feed>
         <feed>1</feed>
         <feed>2</feed>
         <thruster file="direct">
            <location unit="M">
               <x>13.6765</x>
               <y>5.7482</y>
               <z>-2.338950</z>
            </location>
            <orient unit="DEG">
               <roll>0.000000</roll>
               <pitch>0.000000</pitch>
               <yaw>0.000000</yaw>
            </orient>
         </thruster>
      </engine>
      <engine file="D150_AGILE_engine">
         <location unit="M">
            <x>13.6765</x>
            <y>-5.748200</y>
            <z>-2.338950</z>
         </location>
         <orient unit="DEG">
            <roll>0.000000</roll>
            <pitch>0.000000</pitch>
            <yaw>0.000000</yaw>
         </orient>
         <feed>3</feed>
         <feed>4</feed>
         <feed>5</feed>
         <thruster file="direct">
            <location unit="M">
               <x>13.6765</x>
               <y>-5.748200</y>
               <z>-2.338950</z>
            </location>
            <orient unit="DEG">
               <roll>0.000000</roll>
               <pitch>0.000000</pitch>
               <yaw>0.000000</yaw>
            </orient>
         </thruster>
      </engine>
      <tank type="FUEL">
         <location unit="M">
            <x>14.7736</x>
            <y>0.9362</y>
            <z>-1.212579</z>
         </location>
         <capacity unit="KG">3271.985</capacity>
         <contents unit="KG">3271.985</contents>
      </tank>
      <tank type="FUEL">
         <location unit="M">
            <x>15.9503</x>
            <z>-0.881934</z>
            <y>4.7680</y>
         </location>
         <capacity unit="KG">5532.997</capacity>
         <contents unit="KG">5532.997</contents>
      </tank>
      <tank type="FUEL">
         <location unit="M">
            <x>18.8026</x>
            <z>-0.241955</z>
            <y>11.3816</y>
         </location>
         <capacity unit="KG">707.706</capacity>
         <contents unit="KG">707.706</contents>
      </tank>
      <tank type="FUEL">
         <location unit="M">
            <x>14.7736</x>
            <y>-0.936171</y>
            <z>-1.212579</z>
         </location>
         <capacity unit="KG">3271.985</capacity>
         <contents unit="KG">3271.985</contents>
      </tank>
      <tank type="FUEL">
         <location unit="M">
            <x>15.9503</x>
            <z>-0.881934</z>
            <y>-4.767959</y>
         </location>
         <capacity unit="KG">5532.997</capacity>
         <contents unit="KG">5532.997</contents>
      </tank>
      <tank type="FUEL">
         <location unit="M">
            <x>18.8026</x>
            <z>-0.241955</z>
            <y>-11.381596</y>
         </location>
         <capacity unit="KG">707.706</capacity>
         <contents unit="KG">707.706</contents>
      </tank>
   </propulsion>
   <flight_control name="FCS :D150 AGILE">
      <channel name="Pitch">
         <summer name="fcs/pitch-trim-sum">
            <input>fcs/elevator-cmd-norm</input>
            <input>fcs/pitch-trim-cmd-norm</input>
            <clipto>
               <min>-1</min>
               <max>1</max>
            </clipto>
         </summer>
         <aerosurface_scale name="Elevator Control">
            <input>fcs/pitch-trim-sum</input>
            <range>
               <min>-15.0</min>
               <max>30.0</max>
            </range>
            <output>fcs/elevator-pos-deg</output>
         </aerosurface_scale>
         <aerosurface_scale name="Elevator Normalized">
            <input>fcs/elevator-pos-deg</input>
            <domain>
               <min>-15.0</min>
               <max>30.0</max>
            </domain>
            <range>
               <min> -1</min>
               <max> 1</max>
            </range>
            <output>fcs/elevator-pos-norm</output>
         </aerosurface_scale>
      </channel>
      <channel name="Yaw">
         <summer name="fcs/yaw-trim-sum">
            <input>fcs/rudder-cmd-norm</input>
            <input>fcs/yaw-trim-cmd-norm</input>
            <clipto>
               <min>-1</min>
               <max>1</max>
            </clipto>
         </summer>
         <aerosurface_scale name="Rudder Control">
            <input>fcs/yaw-trim-sum</input>
            <range>
               <min>-30.0</min>
               <max>30.0</max>
            </range>
            <output>fcs/rudder-pos-deg</output>
         </aerosurface_scale>
         <aerosurface_scale name="Rudder Normalized">
            <input>fcs/rudder-pos-deg</input>
            <domain>
               <min>-30.0</min>
               <max>30.0</max>
            </domain>
            <range>
               <min> -1</min>
               <max> 1</max>
            </range>
            <output>fcs/rudder-pos-norm</output>
         </aerosurface_scale>
      </channel>
      <channel name="Roll">
         <summer name="roll Trim Sum">
            <input>fcs/aileron-cmd-norm</input>
            <input>fcs/roll-trim-cmd-norm</input>
            <clipto>
               <min>-1</min>
               <max>1</max>
            </clipto>
         </summer>
         <aerosurface_scale name="Right Aileron Control">
            <input>fcs/roll-trim-sum</input>
            <output>fcs/right-aileron-pos-deg</output>
            <range>
               <min>-25.0</min>
               <max>25.0</max>
            </range>
         </aerosurface_scale>
         <aerosurface_scale name="Right Aileron Normalized">
            <input>fcs/right-aileron-pos-deg</input>
            <domain>
               <min>-25.0</min>
               <max>25.0</max>
            </domain>
            <range>
               <min> -1</min>
               <max> 1</max>
            </range>
            <output>fcs/right-aileron-pos-norm</output>
         </aerosurface_scale>
         <aerosurface_scale name="Left Aileron Control">
            <input>fcs/roll-trim-sum</input>
            <output>fcs/left-aileron-pos-rad</output>
            <range>
               <min>-25.0</min>
               <max>25.0</max>
            </range>
            <gain>0.0175</gain>
         </aerosurface_scale>
         <aerosurface_scale name="Left Aileron position normalized">
            <input>fcs/left-aileron-pos-deg</input>
            <domain>
               <min>-25.0</min>
               <max>25.0</max>
            </domain>
            <range>
               <min> -1</min>
               <max> 1</max>
            </range>
            <output>fcs/left-aileron-pos-norm</output>
         </aerosurface_scale>
      </channel>
      <channel name="Flap">
         <aerosurface_scale name="Flap Position Normalizer">
            <input>fcs/flap-pos-deg</input>
            <domain>
               <min>0</min>
               <max>35.0</max>
            </domain>
            <range>
               <min> 0</min>
               <max> 1</max>
            </range>
            <output>fcs/flap-pos-norm</output>
         </aerosurface_scale>
         <kinematic name="fcs/flaps-control">
            <input>fcs/flap-cmd-norm</input>
            <traverse>
               <setting>
                  <position>0</position>
                  <time>0</time>
               </setting>
               <setting>
                  <position>35.0</position>
                  <time>1</time>
               </setting>
            </traverse>
            <output>fcs/flap-pos-deg</output>
         </kinematic>
      </channel>
   </flight_control>
   <output name="D150 AGILE.csv" rate="10" type="CSV">
      <property>aero/function/x_coeff_basic_Mach</property>
      <property>aero/forces/x_basic_Mach</property>
      <property>aero/function/y_coeff_basic_Mach</property>
      <property>aero/forces/y_basic_Mach</property>
      <property>aero/function/z_coeff_basic_Mach</property>
      <property>aero/forces/z_basic_Mach</property>
      <property>aero/function/roll_coeff_basic_Mach</property>
      <property>aero/forces/roll_basic_Mach</property>
      <property>aero/function/pitch_coeff_basic_Mach</property>
      <property>aero/forces/pitch_basic_Mach</property>
      <property>aero/function/yaw_coeff_basic_Mach</property>
      <property>aero/forces/yaw_basic_Mach</property>
      <property>aero/function/flap_inner_x_coeff_basic_Mach</property>
      <property>aero/forces/flap_inner_x_basic_Mach</property>
      <property>aero/function/flap_inner_y_coeff_basic_Mach</property>
      <property>aero/forces/flap_inner_y_basic_Mach</property>
      <property>aero/function/flap_inner_z_coeff_basic_Mach</property>
      <property>aero/forces/flap_inner_z_basic_Mach</property>
      <property>aero/function/flap_inner_roll_coeff_basic_Mach</property>
      <property>aero/forces/flap_inner_roll_basic_Mach</property>
      <property>aero/function/flap_inner_pitch_coeff_basic_Mach</property>
      <property>aero/forces/flap_inner_pitch_basic_Mach</property>
      <property>aero/function/flap_inner_yaw_coeff_basic_Mach</property>
      <property>aero/forces/flap_inner_yaw_basic_Mach</property>
      <property>aero/function/flap_outer_x_coeff_basic_Mach</property>
      <property>aero/forces/flap_outer_x_basic_Mach</property>
      <property>aero/function/flap_outer_y_coeff_basic_Mach</property>
      <property>aero/forces/flap_outer_y_basic_Mach</property>
      <property>aero/function/flap_outer_z_coeff_basic_Mach</property>
      <property>aero/forces/flap_outer_z_basic_Mach</property>
      <property>aero/function/flap_outer_roll_coeff_basic_Mach</property>
      <property>aero/forces/flap_outer_roll_basic_Mach</property>
      <property>aero/function/flap_outer_pitch_coeff_basic_Mach</property>
      <property>aero/forces/flap_outer_pitch_basic_Mach</property>
      <property>aero/function/flap_outer_yaw_coeff_basic_Mach</property>
      <property>aero/forces/flap_outer_yaw_basic_Mach</property>
      <property>aero/function/aileron_x_coeff_basic_Mach</property>
      <property>aero/forces/aileron_x_basic_Mach</property>
      <property>aero/function/aileron_y_coeff_basic_Mach</property>
      <property>aero/forces/aileron_y_basic_Mach</property>
      <property>aero/function/aileron_z_coeff_basic_Mach</property>
      <property>aero/forces/aileron_z_basic_Mach</property>
      <property>aero/function/aileron_roll_coeff_basic_Mach</property>
      <property>aero/forces/aileron_roll_basic_Mach</property>
      <property>aero/function/aileron_pitch_coeff_basic_Mach</property>
      <property>aero/forces/aileron_pitch_basic_Mach</property>
      <property>aero/function/aileron_yaw_coeff_basic_Mach</property>
      <property>aero/forces/aileron_yaw_basic_Mach</property>
      <property>aero/function/elevator_x_coeff_basic_Mach</property>
      <property>aero/forces/elevator_x_basic_Mach</property>
      <property>aero/function/elevator_y_coeff_basic_Mach</property>
      <property>aero/forces/elevator_y_basic_Mach</property>
      <property>aero/function/elevator_z_coeff_basic_Mach</property>
      <property>aero/forces/elevator_z_basic_Mach</property>
      <property>aero/function/elevator_roll_coeff_basic_Mach</property>
      <property>aero/forces/elevator_roll_basic_Mach</property>
      <property>aero/function/elevator_pitch_coeff_basic_Mach</property>
      <property>aero/forces/elevator_pitch_basic_Mach</property>
      <property>aero/function/elevator_yaw_coeff_basic_Mach</property>
      <property>aero/forces/elevator_yaw_basic_Mach</property>
      <property>aero/function/rudder_x_coeff_basic_Mach</property>
      <property>aero/forces/rudder_x_basic_Mach</property>
      <property>aero/function/rudder_y_coeff_basic_Mach</property>
      <property>aero/forces/rudder_y_basic_Mach</property>
      <property>aero/function/rudder_z_coeff_basic_Mach</property>
      <property>aero/forces/rudder_z_basic_Mach</property>
      <property>aero/function/rudder_roll_coeff_basic_Mach</property>
      <property>aero/forces/rudder_roll_basic_Mach</property>
      <property>aero/function/rudder_pitch_coeff_basic_Mach</property>
      <property>aero/forces/rudder_pitch_basic_Mach</property>
      <property>aero/function/rudder_yaw_coeff_basic_Mach</property>
      <property>aero/forces/rudder_yaw_basic_Mach</property>
      <property>aero/function/p-x_coeff_basic_Mach</property>
      <property>aero/forces/p-x_basic_Mach</property>
      <property>aero/function/p-y_coeff_basic_Mach</property>
      <property>aero/forces/p-y_basic_Mach</property>
      <property>aero/function/p-z_coeff_basic_Mach</property>
      <property>aero/forces/p-z_basic_Mach</property>
      <property>aero/function/p-roll_coeff_basic_Mach</property>
      <property>aero/forces/p-roll_basic_Mach</property>
      <property>aero/function/p-pitch_coeff_basic_Mach</property>
      <property>aero/forces/p-pitch_basic_Mach</property>
      <property>aero/function/p-yaw_coeff_basic_Mach</property>
      <property>aero/forces/p-yaw_basic_Mach</property>
      <property>aero/function/q-x_coeff_basic_Mach</property>
      <property>aero/forces/q-x_basic_Mach</property>
      <property>aero/function/q-y_coeff_basic_Mach</property>
      <property>aero/forces/q-y_basic_Mach</property>
      <property>aero/function/q-z_coeff_basic_Mach</property>
      <property>aero/forces/q-z_basic_Mach</property>
      <property>aero/function/q-roll_coeff_basic_Mach</property>
      <property>aero/forces/q-roll_basic_Mach</property>
      <property>aero/function/q-pitch_coeff_basic_Mach</property>
      <property>aero/forces/q-pitch_basic_Mach</property>
      <property>aero/function/q-yaw_coeff_basic_Mach</property>
      <property>aero/forces/q-yaw_basic_Mach</property>
      <property>aero/function/r-x_coeff_basic_Mach</property>
      <property>aero/forces/r-x_basic_Mach</property>
      <property>aero/function/r-y_coeff_basic_Mach</property>
      <property>aero/forces/r-y_basic_Mach</property>
      <property>aero/function/r-z_coeff_basic_Mach</property>
      <property>aero/forces/r-z_basic_Mach</property>
      <property>aero/function/r-roll_coeff_basic_Mach</property>
      <property>aero/forces/r-roll_basic_Mach</property>
      <property>aero/function/r-pitch_coeff_basic_Mach</property>
      <property>aero/forces/r-pitch_basic_Mach</property>
      <property>aero/function/r-yaw_coeff_basic_Mach</property>
      <property>aero/forces/r-yaw_basic_Mach</property>
      <property>aero/alpha-deg</property>
      <property>aero/beta-deg</property>
      <property>aero/Re</property>
      <property>velocities/mach</property>
      <property>propulsion/engine[0]/thrust-lbs</property>
      <property>propulsion/engine[1]/thrust-lbs</property>
      <property>position/h-sl-meters</property>
      <property>attitude/phi-deg</property>
      <property>attitude/theta-deg</property>
      <property>attitude/psi-deg</property>
      <property>velocities/vtrue-kts</property>
      <property>velocities/h-dot-fps</property>
      <property>velocities/p-rad_sec</property>
      <property>velocities/q-rad_sec</property>
      <property>velocities/r-rad_sec</property>
   </output>
   <aerodynamics>
      <function name="aero/function/x_coeff_basic_M0">
         <description>x_coefficient as function of alpha beta Reynolds, fixed Mach = 0.2</description>
         <table>
            <independentVar lookup="row">aero/alpha-deg</independentVar>
            <independentVar lookup="column">aero/beta-deg</independentVar>
            <independentVar lookup="table">aero/Re</independentVar>
            <tableData breakPoint="1.12018250784E7">
 	-10.0	0.0	10.0
-5.0	-0.02093	-0.012347	-0.02093
-2.5	-0.0060718	0.0031876	-0.0060718
0.0	-0.0068801	0.0026414	-0.0068801
1.0	-0.011572	-0.0020478	-0.011572
2.0	-0.018746	-0.009266	-0.018746
3.0	-0.028388	-0.018986	-0.028388
4.0	-0.040478	-0.031168	-0.040478
5.0	-0.054984	-0.045756	-0.054984
6.0	-0.071897	-0.062694	-0.071897
7.5	-0.10363	-0.092544	-0.10363
10.0	-0.16322	-0.15528	-0.16322
12.5	-0.2395	-0.2344	-0.2395
</tableData>
            <tableData breakPoint="3.36054752352E7">
 	-10.0	0.0	10.0
-5.0	-0.02093	-0.012347	-0.02093
-2.5	-0.0060718	0.0031876	-0.0060718
0.0	-0.0068801	0.0026414	-0.0068801
1.0	-0.011572	-0.0020478	-0.011572
2.0	-0.018746	-0.009266	-0.018746
3.0	-0.028388	-0.018986	-0.028388
4.0	-0.040478	-0.031168	-0.040478
5.0	-0.054984	-0.045756	-0.054984
6.0	-0.071897	-0.062694	-0.071897
7.5	-0.10363	-0.092544	-0.10363
10.0	-0.16322	-0.15528	-0.16322
12.5	-0.2395	-0.2344	-0.2395
</tableData>
            <tableData breakPoint="4.36871178058E7">
 	-10.0	0.0	10.0
-5.0	-0.02093	-0.012347	-0.02093
-2.5	-0.0060718	0.0031876	-0.0060718
0.0	-0.0068801	0.0026414	-0.0068801
1.0	-0.011572	-0.0020478	-0.011572
2.0	-0.018746	-0.009266	-0.018746
3.0	-0.028388	-0.018986	-0.028388
4.0	-0.040478	-0.031168	-0.040478
5.0	-0.054984	-0.045756	-0.054984
6.0	-0.071897	-0.062694	-0.071897
7.5	-0.10363	-0.092544	-0.10363
10.0	-0.16322	-0.15528	-0.16322
12.5	-0.2395	-0.2344	-0.2395
</tableData>
            <tableData breakPoint="4.48073003136E7">
 	-10.0	0.0	10.0
-5.0	-0.02093	-0.012347	-0.02093
-2.5	-0.0060718	0.0031876	-0.0060718
0.0	-0.0068801	0.0026414	-0.0068801
1.0	-0.011572	-0.0020478	-0.011572
2.0	-0.018746	-0.009266	-0.018746
3.0	-0.028388	-0.018986	-0.028388
4.0	-0.040478	-0.031168	-0.040478
5.0	-0.054984	-0.045756	-0.054984
6.0	-0.071897	-0.062694	-0.071897
7.5	-0.10363	-0.092544	-0.10363
10.0	-0.16322	-0.15528	-0.16322
12.5	-0.2395	-0.2344	-0.2395
</tableData>
         </table>
      </function>
      <function name="aero/function/x_coeff_basic_M1">
         <description>x_coefficient as function of alpha beta Reynolds, fixed Mach = 0.6</description>
         <table>
            <independentVar lookup="row">aero/alpha-deg</independentVar>
            <independentVar lookup="column">aero/beta-deg</independentVar>
            <independentVar lookup="table">aero/Re</independentVar>
            <tableData breakPoint="1.12018250784E7">
 	-10.0	0.0	10.0
-5.0	-0.025634	-0.015122	-0.025634
-2.5	-0.0074364	0.003904	-0.0074364
0.0	-0.0084264	0.0032351	-0.0084264
1.0	-0.014173	-0.002508	-0.014173
2.0	-0.022959	-0.011348	-0.022959
3.0	-0.034768	-0.023253	-0.034768
4.0	-0.049576	-0.038172	-0.049576
5.0	-0.067342	-0.056039	-0.067342
6.0	-0.088056	-0.076784	-0.088056
7.5	-0.12691	-0.11334	-0.12691
10.0	-0.1999	-0.19017	-0.1999
12.5	-0.29333	-0.28708	-0.29333
</tableData>
            <tableData breakPoint="3.36054752352E7">
 	-10.0	0.0	10.0
-5.0	-0.025634	-0.015122	-0.025634
-2.5	-0.0074364	0.003904	-0.0074364
0.0	-0.0084264	0.0032351	-0.0084264
1.0	-0.014173	-0.002508	-0.014173
2.0	-0.022959	-0.011348	-0.022959
3.0	-0.034768	-0.023253	-0.034768
4.0	-0.049576	-0.038172	-0.049576
5.0	-0.067342	-0.056039	-0.067342
6.0	-0.088056	-0.076784	-0.088056
7.5	-0.12691	-0.11334	-0.12691
10.0	-0.1999	-0.19017	-0.1999
12.5	-0.29333	-0.28708	-0.29333
</tableData>
            <tableData breakPoint="4.36871178058E7">
 	-10.0	0.0	10.0
-5.0	-0.025634	-0.015122	-0.025634
-2.5	-0.0074364	0.003904	-0.0074364
0.0	-0.0084264	0.0032351	-0.0084264
1.0	-0.014173	-0.002508	-0.014173
2.0	-0.022959	-0.011348	-0.022959
3.0	-0.034768	-0.023253	-0.034768
4.0	-0.049576	-0.038172	-0.049576
5.0	-0.067342	-0.056039	-0.067342
6.0	-0.088056	-0.076784	-0.088056
7.5	-0.12691	-0.11334	-0.12691
10.0	-0.1999	-0.19017	-0.1999
12.5	-0.29333	-0.28708	-0.29333
</tableData>
            <tableData breakPoint="4.48073003136E7">
 	-10.0	0.0	10.0
-5.0	-0.025634	-0.015122	-0.025634
-2.5	-0.0074364	0.003904	-0.0074364
0.0	-0.0084264	0.0032351	-0.0084264
1.0	-0.014173	-0.002508	-0.014173
2.0	-0.022959	-0.011348	-0.022959
3.0	-0.034768	-0.023253	-0.034768
4.0	-0.049576	-0.038172	-0.049576
5.0	-0.067342	-0.056039	-0.067342
6.0	-0.088056	-0.076784	-0.088056
7.5	-0.12691	-0.11334	-0.12691
10.0	-0.1999	-0.19017	-0.1999
12.5	-0.29333	-0.28708	-0.29333
</tableData>
         </table>
      </function>
      <function name="aero/function/x_coeff_basic_M2">
         <description>x_coefficient as function of alpha beta Reynolds, fixed Mach = 0.78</description>
         <table>
            <independentVar lookup="row">aero/alpha-deg</independentVar>
            <independentVar lookup="column">aero/beta-deg</independentVar>
            <independentVar lookup="table">aero/Re</independentVar>
            <tableData breakPoint="1.12018250784E7">
 	-10.0	0.0	10.0
-5.0	-0.032771	-0.019332	-0.032771
-2.5	-0.0095068	0.0049909	-0.0095068
0.0	-0.010772	0.0041358	-0.010772
1.0	-0.018119	-0.0032063	-0.018119
2.0	-0.029351	-0.014508	-0.029351
3.0	-0.044448	-0.029727	-0.044448
4.0	-0.063378	-0.0488	-0.063378
5.0	-0.08609	-0.071641	-0.08609
6.0	-0.11257	-0.098162	-0.11257
7.5	-0.16225	-0.1449	-0.16225
10.0	-0.25555	-0.24312	-0.25555
12.5	-0.375	-0.36701	-0.375
</tableData>
            <tableData breakPoint="3.36054752352E7">
 	-10.0	0.0	10.0
-5.0	-0.032771	-0.019332	-0.032771
-2.5	-0.0095068	0.0049909	-0.0095068
0.0	-0.010772	0.0041358	-0.010772
1.0	-0.018119	-0.0032063	-0.018119
2.0	-0.029351	-0.014508	-0.029351
3.0	-0.044448	-0.029727	-0.044448
4.0	-0.063378	-0.0488	-0.063378
5.0	-0.08609	-0.071641	-0.08609
6.0	-0.11257	-0.098162	-0.11257
7.5	-0.16225	-0.1449	-0.16225
10.0	-0.25555	-0.24312	-0.25555
12.5	-0.375	-0.36701	-0.375
</tableData>
            <tableData breakPoint="4.36871178058E7">
 	-10.0	0.0	10.0
-5.0	-0.032771	-0.019332	-0.032771
-2.5	-0.0095068	0.0049909	-0.0095068
0.0	-0.010772	0.0041358	-0.010772
1.0	-0.018119	-0.0032063	-0.018119
2.0	-0.029351	-0.014508	-0.029351
3.0	-0.044448	-0.029727	-0.044448
4.0	-0.063378	-0.0488	-0.063378
5.0	-0.08609	-0.071641	-0.08609
6.0	-0.11257	-0.098162	-0.11257
7.5	-0.16225	-0.1449	-0.16225
10.0	-0.25555	-0.24312	-0.25555
12.5	-0.375	-0.36701	-0.375
</tableData>
            <tableData breakPoint="4.48073003136E7">
 	-10.0	0.0	10.0
-5.0	-0.032771	-0.019332	-0.032771
-2.5	-0.0095068	0.0049909	-0.0095068
0.0	-0.010772	0.0041358	-0.010772
1.0	-0.018119	-0.0032063	-0.018119
2.0	-0.029351	-0.014508	-0.029351
3.0	-0.044448	-0.029727	-0.044448
4.0	-0.063378	-0.0488	-0.063378
5.0	-0.08609	-0.071641	-0.08609
6.0	-0.11257	-0.098162	-0.11257
7.5	-0.16225	-0.1449	-0.16225
10.0	-0.25555	-0.24312	-0.25555
12.5	-0.375	-0.36701	-0.375
</tableData>
         </table>
      </function>
      <function name="aero/function/x_coeff_basic_M3">
         <description>x_coefficient as function of alpha beta Reynolds, fixed Mach = 0.8</description>
         <table>
            <independentVar lookup="row">aero/alpha-deg</independentVar>
            <independentVar lookup="column">aero/beta-deg</independentVar>
            <independentVar lookup="table">aero/Re</independentVar>
            <tableData breakPoint="1.12018250784E7">
 	-10.0	0.0	10.0
-5.0	-0.034179	-0.020162	-0.034179
-2.5	-0.0099152	0.0052054	-0.0099152
0.0	-0.011235	0.0043135	-0.011235
1.0	-0.018897	-0.003344	-0.018897
2.0	-0.030612	-0.015131	-0.030612
3.0	-0.046358	-0.031004	-0.046358
4.0	-0.066101	-0.050896	-0.066101
5.0	-0.089789	-0.074719	-0.089789
6.0	-0.11741	-0.10238	-0.11741
7.5	-0.16922	-0.15112	-0.16922
10.0	-0.26653	-0.25356	-0.26653
12.5	-0.39111	-0.38278	-0.39111
</tableData>
            <tableData breakPoint="3.36054752352E7">
 	-10.0	0.0	10.0
-5.0	-0.034179	-0.020162	-0.034179
-2.5	-0.0099152	0.0052054	-0.0099152
0.0	-0.011235	0.0043135	-0.011235
1.0	-0.018897	-0.003344	-0.018897
2.0	-0.030612	-0.015131	-0.030612
3.0	-0.046358	-0.031004	-0.046358
4.0	-0.066101	-0.050896	-0.066101
5.0	-0.089789	-0.074719	-0.089789
6.0	-0.11741	-0.10238	-0.11741
7.5	-0.16922	-0.15112	-0.16922
10.0	-0.26653	-0.25356	-0.26653
12.5	-0.39111	-0.38278	-0.39111
</tableData>
            <tableData breakPoint="4.36871178058E7">
 	-10.0	0.0	10.0
-5.0	-0.034179	-0.020162	-0.034179
-2.5	-0.0099152	0.0052054	-0.0099152
0.0	-0.011235	0.0043135	-0.011235
1.0	-0.018897	-0.003344	-0.018897
2.0	-0.030612	-0.015131	-0.030612
3.0	-0.046358	-0.031004	-0.046358
4.0	-0.066101	-0.050896	-0.066101
5.0	-0.089789	-0.074719	-0.089789
6.0	-0.11741	-0.10238	-0.11741
7.5	-0.16922	-0.15112	-0.16922
10.0	-0.26653	-0.25356	-0.26653
12.5	-0.39111	-0.38278	-0.39111
</tableData>
            <tableData breakPoint="4.48073003136E7">
 	-10.0	0.0	10.0
-5.0	-0.034179	-0.020162	-0.034179
-2.5	-0.0099152	0.0052054	-0.0099152
0.0	-0.011235	0.0043135	-0.011235
1.0	-0.018897	-0.003344	-0.018897
2.0	-0.030612	-0.015131	-0.030612
3.0	-0.046358	-0.031004	-0.046358
4.0	-0.066101	-0.050896	-0.066101
5.0	-0.089789	-0.074719	-0.089789
6.0	-0.11741	-0.10238	-0.11741
7.5	-0.16922	-0.15112	-0.16922
10.0	-0.26653	-0.25356	-0.26653
12.5	-0.39111	-0.38278	-0.39111
</tableData>
         </table>
      </function>
      <function name="aero/function/x_coeff_basic_Mach">
         <description>x_coefficient as function of alpha beta Reynolds and Mach</description>
         <interpolate1d>
            <p>velocities/mach</p>
            <v>0.2000</v>
            <p>aero/function/x_coeff_basic_M0</p>
            <v>0.6000</v>
            <p>aero/function/x_coeff_basic_M1</p>
            <v>0.7800</v>
            <p>aero/function/x_coeff_basic_M2</p>
            <v>0.8000</v>
            <p>aero/function/x_coeff_basic_M3</p>
         </interpolate1d>
      </function>
      <function name="aero/function/y_coeff_basic_M0">
         <description>y_coefficient as function of alpha beta Reynolds, fixed Mach = 0.2</description>
         <table>
            <independentVar lookup="row">aero/alpha-deg</independentVar>
            <independentVar lookup="column">aero/beta-deg</independentVar>
            <independentVar lookup="table">aero/Re</independentVar>
            <tableData breakPoint="1.12018250784E7">
 	-10.0	0.0	10.0
-5.0	0.079768	3.0561E-7	-0.079768
-2.5	0.079593	3.0249E-7	-0.079593
0.0	0.079824	2.9894E-7	-0.079824
1.0	0.080048	2.9741E-7	-0.080048
2.0	0.080364	2.9579E-7	-0.080364
3.0	0.080799	2.9405E-7	-0.080799
4.0	0.081415	2.9213E-7	-0.081415
5.0	0.082357	2.8995E-7	-0.082357
6.0	0.083962	2.8753E-7	-0.083962
7.5	0.084018	2.8457E-7	-0.084018
10.0	0.083931	2.8667E-7	-0.083931
12.5	0.076536	2.9322E-7	-0.076536
</tableData>
            <tableData breakPoint="3.36054752352E7">
 	-10.0	0.0	10.0
-5.0	0.079768	3.0561E-7	-0.079768
-2.5	0.079593	3.0249E-7	-0.079593
0.0	0.079824	2.9894E-7	-0.079824
1.0	0.080048	2.9741E-7	-0.080048
2.0	0.080364	2.9579E-7	-0.080364
3.0	0.080799	2.9405E-7	-0.080799
4.0	0.081415	2.9213E-7	-0.081415
5.0	0.082357	2.8995E-7	-0.082357
6.0	0.083962	2.8753E-7	-0.083962
7.5	0.084018	2.8457E-7	-0.084018
10.0	0.083931	2.8667E-7	-0.083931
12.5	0.076536	2.9322E-7	-0.076536
</tableData>
            <tableData breakPoint="4.36871178058E7">
 	-10.0	0.0	10.0
-5.0	0.079768	3.0561E-7	-0.079768
-2.5	0.079593	3.0249E-7	-0.079593
0.0	0.079824	2.9894E-7	-0.079824
1.0	0.080048	2.9741E-7	-0.080048
2.0	0.080364	2.9579E-7	-0.080364
3.0	0.080799	2.9405E-7	-0.080799
4.0	0.081415	2.9213E-7	-0.081415
5.0	0.082357	2.8995E-7	-0.082357
6.0	0.083962	2.8753E-7	-0.083962
7.5	0.084018	2.8457E-7	-0.084018
10.0	0.083931	2.8667E-7	-0.083931
12.5	0.076536	2.9322E-7	-0.076536
</tableData>
            <tableData breakPoint="4.48073003136E7">
 	-10.0	0.0	10.0
-5.0	0.079768	3.0561E-7	-0.079768
-2.5	0.079593	3.0249E-7	-0.079593
0.0	0.079824	2.9894E-7	-0.079824
1.0	0.080048	2.9741E-7	-0.080048
2.0	0.080364	2.9579E-7	-0.080364
3.0	0.080799	2.9405E-7	-0.080799
4.0	0.081415	2.9213E-7	-0.081415
5.0	0.082357	2.8995E-7	-0.082357
6.0	0.083962	2.8753E-7	-0.083962
7.5	0.084018	2.8457E-7	-0.084018
10.0	0.083931	2.8667E-7	-0.083931
12.5	0.076536	2.9322E-7	-0.076536
</tableData>
         </table>
      </function>
      <function name="aero/function/y_coeff_basic_M1">
         <description>y_coefficient as function of alpha beta Reynolds, fixed Mach = 0.6</description>
         <table>
            <independentVar lookup="row">aero/alpha-deg</independentVar>
            <independentVar lookup="column">aero/beta-deg</independentVar>
            <independentVar lookup="table">aero/Re</independentVar>
            <tableData breakPoint="1.12018250784E7">
 	-10.0	0.0	10.0
-5.0	0.097696	3.743E-7	-0.097696
-2.5	0.097481	3.7047E-7	-0.097481
0.0	0.097764	3.6613E-7	-0.097764
1.0	0.098038	3.6425E-7	-0.098038
2.0	0.098425	3.6227E-7	-0.098425
3.0	0.098959	3.6014E-7	-0.098959
4.0	0.099713	3.5779E-7	-0.099713
5.0	0.10087	3.5511E-7	-0.10087
6.0	0.10283	3.5215E-7	-0.10283
7.5	0.1029	3.4852E-7	-0.1029
10.0	0.10279	3.511E-7	-0.10279
12.5	0.093737	3.5912E-7	-0.093737
</tableData>
            <tableData breakPoint="3.36054752352E7">
 	-10.0	0.0	10.0
-5.0	0.097696	3.743E-7	-0.097696
-2.5	0.097481	3.7047E-7	-0.097481
0.0	0.097764	3.6613E-7	-0.097764
1.0	0.098038	3.6425E-7	-0.098038
2.0	0.098425	3.6227E-7	-0.098425
3.0	0.098959	3.6014E-7	-0.098959
4.0	0.099713	3.5779E-7	-0.099713
5.0	0.10087	3.5511E-7	-0.10087
6.0	0.10283	3.5215E-7	-0.10283
7.5	0.1029	3.4852E-7	-0.1029
10.0	0.10279	3.511E-7	-0.10279
12.5	0.093737	3.5912E-7	-0.093737
</tableData>
            <tableData breakPoint="4.36871178058E7">
 	-10.0	0.0	10.0
-5.0	0.097696	3.743E-7	-0.097696
-2.5	0.097481	3.7047E-7	-0.097481
0.0	0.097764	3.6613E-7	-0.097764
1.0	0.098038	3.6425E-7	-0.098038
2.0	0.098425	3.6227E-7	-0.098425
3.0	0.098959	3.6014E-7	-0.098959
4.0	0.099713	3.5779E-7	-0.099713
5.0	0.10087	3.5511E-7	-0.10087
6.0	0.10283	3.5215E-7	-0.10283
7.5	0.1029	3.4852E-7	-0.1029
10.0	0.10279	3.511E-7	-0.10279
12.5	0.093737	3.5912E-7	-0.093737
</tableData>
            <tableData breakPoint="4.48073003136E7">
 	-10.0	0.0	10.0
-5.0	0.097696	3.743E-7	-0.097696
-2.5	0.097481	3.7047E-7	-0.097481
0.0	0.097764	3.6613E-7	-0.097764
1.0	0.098038	3.6425E-7	-0.098038
2.0	0.098425	3.6227E-7	-0.098425
3.0	0.098959	3.6014E-7	-0.098959
4.0	0.099713	3.5779E-7	-0.099713
5.0	0.10087	3.5511E-7	-0.10087
6.0	0.10283	3.5215E-7	-0.10283
7.5	0.1029	3.4852E-7	-0.1029
10.0	0.10279	3.511E-7	-0.10279
12.5	0.093737	3.5912E-7	-0.093737
</tableData>
         </table>
      </function>
      <function name="aero/function/y_coeff_basic_M2">
         <description>y_coefficient as function of alpha beta Reynolds, fixed Mach = 0.78</description>
         <table>
            <independentVar lookup="row">aero/alpha-deg</independentVar>
            <independentVar lookup="column">aero/beta-deg</independentVar>
            <independentVar lookup="table">aero/Re</independentVar>
            <tableData breakPoint="1.12018250784E7">
 	-10.0	0.0	10.0
-5.0	0.12489	4.785E-7	-0.12489
-2.5	0.12462	4.7362E-7	-0.12462
0.0	0.12498	4.6806E-7	-0.12498
1.0	0.12533	4.6566E-7	-0.12533
2.0	0.12583	4.6313E-7	-0.12583
3.0	0.12651	4.6041E-7	-0.12651
4.0	0.12747	4.574E-7	-0.12747
5.0	0.12895	4.5398E-7	-0.12895
6.0	0.13146	4.5019E-7	-0.13146
7.5	0.13155	4.4555E-7	-0.13155
10.0	0.13141	4.4885E-7	-0.13141
12.5	0.11983	4.5909E-7	-0.11983
</tableData>
            <tableData breakPoint="3.36054752352E7">
 	-10.0	0.0	10.0
-5.0	0.12489	4.785E-7	-0.12489
-2.5	0.12462	4.7362E-7	-0.12462
0.0	0.12498	4.6806E-7	-0.12498
1.0	0.12533	4.6566E-7	-0.12533
2.0	0.12583	4.6313E-7	-0.12583
3.0	0.12651	4.6041E-7	-0.12651
4.0	0.12747	4.574E-7	-0.12747
5.0	0.12895	4.5398E-7	-0.12895
6.0	0.13146	4.5019E-7	-0.13146
7.5	0.13155	4.4555E-7	-0.13155
10.0	0.13141	4.4885E-7	-0.13141
12.5	0.11983	4.5909E-7	-0.11983
</tableData>
            <tableData breakPoint="4.36871178058E7">
 	-10.0	0.0	10.0
-5.0	0.12489	4.785E-7	-0.12489
-2.5	0.12462	4.7362E-7	-0.12462
0.0	0.12498	4.6806E-7	-0.12498
1.0	0.12533	4.6566E-7	-0.12533
2.0	0.12583	4.6313E-7	-0.12583
3.0	0.12651	4.6041E-7	-0.12651
4.0	0.12747	4.574E-7	-0.12747
5.0	0.12895	4.5398E-7	-0.12895
6.0	0.13146	4.5019E-7	-0.13146
7.5	0.13155	4.4555E-7	-0.13155
10.0	0.13141	4.4885E-7	-0.13141
12.5	0.11983	4.5909E-7	-0.11983
</tableData>
            <tableData breakPoint="4.48073003136E7">
 	-10.0	0.0	10.0
-5.0	0.12489	4.785E-7	-0.12489
-2.5	0.12462	4.7362E-7	-0.12462
0.0	0.12498	4.6806E-7	-0.12498
1.0	0.12533	4.6566E-7	-0.12533
2.0	0.12583	4.6313E-7	-0.12583
3.0	0.12651	4.6041E-7	-0.12651
4.0	0.12747	4.574E-7	-0.12747
5.0	0.12895	4.5398E-7	-0.12895
6.0	0.13146	4.5019E-7	-0.13146
7.5	0.13155	4.4555E-7	-0.13155
10.0	0.13141	4.4885E-7	-0.13141
12.5	0.11983	4.5909E-7	-0.11983
</tableData>
         </table>
      </function>
      <function name="aero/function/y_coeff_basic_M3">
         <description>y_coefficient as function of alpha beta Reynolds, fixed Mach = 0.8</description>
         <table>
            <independentVar lookup="row">aero/alpha-deg</independentVar>
            <independentVar lookup="column">aero/beta-deg</independentVar>
            <independentVar lookup="table">aero/Re</independentVar>
            <tableData breakPoint="1.12018250784E7">
 	-10.0	0.0	10.0
-5.0	0.13026	4.9906E-7	-0.13026
-2.5	0.12998	4.9397E-7	-0.12998
0.0	0.13035	4.8817E-7	-0.13035
1.0	0.13072	4.8567E-7	-0.13072
2.0	0.13123	4.8302E-7	-0.13123
3.0	0.13194	4.8019E-7	-0.13194
4.0	0.13295	4.7705E-7	-0.13295
5.0	0.13449	4.7348E-7	-0.13449
6.0	0.13711	4.6953E-7	-0.13711
7.5	0.1372	4.647E-7	-0.1372
10.0	0.13706	4.6813E-7	-0.13706
12.5	0.12498	4.7882E-7	-0.12498
</tableData>
            <tableData breakPoint="3.36054752352E7">
 	-10.0	0.0	10.0
-5.0	0.13026	4.9906E-7	-0.13026
-2.5	0.12998	4.9397E-7	-0.12998
0.0	0.13035	4.8817E-7	-0.13035
1.0	0.13072	4.8567E-7	-0.13072
2.0	0.13123	4.8302E-7	-0.13123
3.0	0.13194	4.8019E-7	-0.13194
4.0	0.13295	4.7705E-7	-0.13295
5.0	0.13449	4.7348E-7	-0.13449
6.0	0.13711	4.6953E-7	-0.13711
7.5	0.1372	4.647E-7	-0.1372
10.0	0.13706	4.6813E-7	-0.13706
12.5	0.12498	4.7882E-7	-0.12498
</tableData>
            <tableData breakPoint="4.36871178058E7">
 	-10.0	0.0	10.0
-5.0	0.13026	4.9906E-7	-0.13026
-2.5	0.12998	4.9397E-7	-0.12998
0.0	0.13035	4.8817E-7	-0.13035
1.0	0.13072	4.8567E-7	-0.13072
2.0	0.13123	4.8302E-7	-0.13123
3.0	0.13194	4.8019E-7	-0.13194
4.0	0.13295	4.7705E-7	-0.13295
5.0	0.13449	4.7348E-7	-0.13449
6.0	0.13711	4.6953E-7	-0.13711
7.5	0.1372	4.647E-7	-0.1372
10.0	0.13706	4.6813E-7	-0.13706
12.5	0.12498	4.7882E-7	-0.12498
</tableData>
            <tableData breakPoint="4.48073003136E7">
 	-10.0	0.0	10.0
-5.0	0.13026	4.9906E-7	-0.13026
-2.5	0.12998	4.9397E-7	-0.12998
0.0	0.13035	4.8817E-7	-0.13035
1.0	0.13072	4.8567E-7	-0.13072
2.0	0.13123	4.8302E-7	-0.13123
3.0	0.13194	4.8019E-7	-0.13194
4.0	0.13295	4.7705E-7	-0.13295
5.0	0.13449	4.7348E-7	-0.13449
6.0	0.13711	4.6953E-7	-0.13711
7.5	0.1372	4.647E-7	-0.1372
10.0	0.13706	4.6813E-7	-0.13706
12.5	0.12498	4.7882E-7	-0.12498
</tableData>
         </table>
      </function>
      <function name="aero/function/y_coeff_basic_Mach">
         <description>y_coefficient as function of alpha beta Reynolds and Mach</description>
         <interpolate1d>
            <p>velocities/mach</p>
            <v>0.2000</v>
            <p>aero/function/y_coeff_basic_M0</p>
            <v>0.6000</v>
            <p>aero/function/y_coeff_basic_M1</p>
            <v>0.7800</v>
            <p>aero/function/y_coeff_basic_M2</p>
            <v>0.8000</v>
            <p>aero/function/y_coeff_basic_M3</p>
         </interpolate1d>
      </function>
      <function name="aero/function/z_coeff_basic_M0">
         <description>z_coefficient as function of alpha beta Reynolds, fixed Mach = 0.2</description>
         <table>
            <independentVar lookup="row">aero/alpha-deg</independentVar>
            <independentVar lookup="column">aero/beta-deg</independentVar>
            <independentVar lookup="table">aero/Re</independentVar>
            <tableData breakPoint="1.12018250784E7">
 	-10.0	0.0	10.0
-5.0	-0.14883	-0.16782	-0.14883
-2.5	0.070387	0.057893	0.070387
0.0	0.28952	0.28312	0.28952
1.0	0.37677	0.37264	0.37677
2.0	0.46359	0.46156	0.46359
3.0	0.5497	0.54965	0.5497
4.0	0.63452	0.63651	0.63452
5.0	0.71643	0.72169	0.71643
6.0	0.7906	0.80506	0.7906
7.5	0.90862	0.92991	0.90862
10.0	1.1422	1.1501	1.1422
12.5	1.3519	1.3696	1.3519
</tableData>
            <tableData breakPoint="3.36054752352E7">
 	-10.0	0.0	10.0
-5.0	-0.14883	-0.16782	-0.14883
-2.5	0.070387	0.057893	0.070387
0.0	0.28952	0.28312	0.28952
1.0	0.37677	0.37264	0.37677
2.0	0.46359	0.46156	0.46359
3.0	0.5497	0.54965	0.5497
4.0	0.63452	0.63651	0.63452
5.0	0.71643	0.72169	0.71643
6.0	0.7906	0.80506	0.7906
7.5	0.90862	0.92991	0.90862
10.0	1.1422	1.1501	1.1422
12.5	1.3519	1.3696	1.3519
</tableData>
            <tableData breakPoint="4.36871178058E7">
 	-10.0	0.0	10.0
-5.0	-0.14883	-0.16782	-0.14883
-2.5	0.070387	0.057893	0.070387
0.0	0.28952	0.28312	0.28952
1.0	0.37677	0.37264	0.37677
2.0	0.46359	0.46156	0.46359
3.0	0.5497	0.54965	0.5497
4.0	0.63452	0.63651	0.63452
5.0	0.71643	0.72169	0.71643
6.0	0.7906	0.80506	0.7906
7.5	0.90862	0.92991	0.90862
10.0	1.1422	1.1501	1.1422
12.5	1.3519	1.3696	1.3519
</tableData>
            <tableData breakPoint="4.48073003136E7">
 	-10.0	0.0	10.0
-5.0	-0.14883	-0.16782	-0.14883
-2.5	0.070387	0.057893	0.070387
0.0	0.28952	0.28312	0.28952
1.0	0.37677	0.37264	0.37677
2.0	0.46359	0.46156	0.46359
3.0	0.5497	0.54965	0.5497
4.0	0.63452	0.63651	0.63452
5.0	0.71643	0.72169	0.71643
6.0	0.7906	0.80506	0.7906
7.5	0.90862	0.92991	0.90862
10.0	1.1422	1.1501	1.1422
12.5	1.3519	1.3696	1.3519
</tableData>
         </table>
      </function>
      <function name="aero/function/z_coeff_basic_M1">
         <description>z_coefficient as function of alpha beta Reynolds, fixed Mach = 0.6</description>
         <table>
            <independentVar lookup="row">aero/alpha-deg</independentVar>
            <independentVar lookup="column">aero/beta-deg</independentVar>
            <independentVar lookup="table">aero/Re</independentVar>
            <tableData breakPoint="1.12018250784E7">
 	-10.0	0.0	10.0
-5.0	-0.18228	-0.20554	-0.18228
-2.5	0.086206	0.070904	0.086206
0.0	0.35458	0.34675	0.35458
1.0	0.46145	0.45638	0.46145
2.0	0.56778	0.5653	0.56778
3.0	0.67324	0.67318	0.67324
4.0	0.77713	0.77956	0.77713
5.0	0.87745	0.88389	0.87745
6.0	0.96828	0.98599	0.96828
7.5	1.1128	1.1389	1.1128
10.0	1.3988	1.4085	1.3988
12.5	1.6557	1.6774	1.6557
</tableData>
            <tableData breakPoint="3.36054752352E7">
 	-10.0	0.0	10.0
-5.0	-0.18228	-0.20554	-0.18228
-2.5	0.086206	0.070904	0.086206
0.0	0.35458	0.34675	0.35458
1.0	0.46145	0.45638	0.46145
2.0	0.56778	0.5653	0.56778
3.0	0.67324	0.67318	0.67324
4.0	0.77713	0.77956	0.77713
5.0	0.87745	0.88389	0.87745
6.0	0.96828	0.98599	0.96828
7.5	1.1128	1.1389	1.1128
10.0	1.3988	1.4085	1.3988
12.5	1.6557	1.6774	1.6557
</tableData>
            <tableData breakPoint="4.36871178058E7">
 	-10.0	0.0	10.0
-5.0	-0.18228	-0.20554	-0.18228
-2.5	0.086206	0.070904	0.086206
0.0	0.35458	0.34675	0.35458
1.0	0.46145	0.45638	0.46145
2.0	0.56778	0.5653	0.56778
3.0	0.67324	0.67318	0.67324
4.0	0.77713	0.77956	0.77713
5.0	0.87745	0.88389	0.87745
6.0	0.96828	0.98599	0.96828
7.5	1.1128	1.1389	1.1128
10.0	1.3988	1.4085	1.3988
12.5	1.6557	1.6774	1.6557
</tableData>
            <tableData breakPoint="4.48073003136E7">
 	-10.0	0.0	10.0
-5.0	-0.18228	-0.20554	-0.18228
-2.5	0.086206	0.070904	0.086206
0.0	0.35458	0.34675	0.35458
1.0	0.46145	0.45638	0.46145
2.0	0.56778	0.5653	0.56778
3.0	0.67324	0.67318	0.67324
4.0	0.77713	0.77956	0.77713
5.0	0.87745	0.88389	0.87745
6.0	0.96828	0.98599	0.96828
7.5	1.1128	1.1389	1.1128
10.0	1.3988	1.4085	1.3988
12.5	1.6557	1.6774	1.6557
</tableData>
         </table>
      </function>
      <function name="aero/function/z_coeff_basic_M2">
         <description>z_coefficient as function of alpha beta Reynolds, fixed Mach = 0.78</description>
         <table>
            <independentVar lookup="row">aero/alpha-deg</independentVar>
            <independentVar lookup="column">aero/beta-deg</independentVar>
            <independentVar lookup="table">aero/Re</independentVar>
            <tableData breakPoint="1.12018250784E7">
 	-10.0	0.0	10.0
-5.0	-0.23302	-0.26277	-0.23302
-2.5	0.11021	0.090644	0.11021
0.0	0.4533	0.44329	0.4533
1.0	0.58992	0.58344	0.58992
2.0	0.72585	0.72268	0.72585
3.0	0.86068	0.86059	0.86068
4.0	0.99348	0.99659	0.99348
5.0	1.1217	1.13	1.1217
6.0	1.2379	1.2605	1.2379
7.5	1.4227	1.456	1.4227
10.0	1.7883	1.8007	1.7883
12.5	2.1166	2.1444	2.1166
</tableData>
            <tableData breakPoint="3.36054752352E7">
 	-10.0	0.0	10.0
-5.0	-0.23302	-0.26277	-0.23302
-2.5	0.11021	0.090644	0.11021
0.0	0.4533	0.44329	0.4533
1.0	0.58992	0.58344	0.58992
2.0	0.72585	0.72268	0.72585
3.0	0.86068	0.86059	0.86068
4.0	0.99348	0.99659	0.99348
5.0	1.1217	1.13	1.1217
6.0	1.2379	1.2605	1.2379
7.5	1.4227	1.456	1.4227
10.0	1.7883	1.8007	1.7883
12.5	2.1166	2.1444	2.1166
</tableData>
            <tableData breakPoint="4.36871178058E7">
 	-10.0	0.0	10.0
-5.0	-0.23302	-0.26277	-0.23302
-2.5	0.11021	0.090644	0.11021
0.0	0.4533	0.44329	0.4533
1.0	0.58992	0.58344	0.58992
2.0	0.72585	0.72268	0.72585
3.0	0.86068	0.86059	0.86068
4.0	0.99348	0.99659	0.99348
5.0	1.1217	1.13	1.1217
6.0	1.2379	1.2605	1.2379
7.5	1.4227	1.456	1.4227
10.0	1.7883	1.8007	1.7883
12.5	2.1166	2.1444	2.1166
</tableData>
            <tableData breakPoint="4.48073003136E7">
 	-10.0	0.0	10.0
-5.0	-0.23302	-0.26277	-0.23302
-2.5	0.11021	0.090644	0.11021
0.0	0.4533	0.44329	0.4533
1.0	0.58992	0.58344	0.58992
2.0	0.72585	0.72268	0.72585
3.0	0.86068	0.86059	0.86068
4.0	0.99348	0.99659	0.99348
5.0	1.1217	1.13	1.1217
6.0	1.2379	1.2605	1.2379
7.5	1.4227	1.456	1.4227
10.0	1.7883	1.8007	1.7883
12.5	2.1166	2.1444	2.1166
</tableData>
         </table>
      </function>
      <function name="aero/function/z_coeff_basic_M3">
         <description>z_coefficient as function of alpha beta Reynolds, fixed Mach = 0.8</description>
         <table>
            <independentVar lookup="row">aero/alpha-deg</independentVar>
            <independentVar lookup="column">aero/beta-deg</independentVar>
            <independentVar lookup="table">aero/Re</independentVar>
            <tableData breakPoint="1.12018250784E7">
 	-10.0	0.0	10.0
-5.0	-0.24304	-0.27406	-0.24304
-2.5	0.11494	0.094539	0.11494
0.0	0.47278	0.46234	0.47278
1.0	0.61527	0.60851	0.61527
2.0	0.75704	0.75373	0.75704
3.0	0.89766	0.89757	0.89766
4.0	1.0362	1.0394	1.0362
5.0	1.1699	1.1785	1.1699
6.0	1.291	1.3147	1.291
7.5	1.4838	1.5185	1.4838
10.0	1.8651	1.878	1.8651
12.5	2.2076	2.2366	2.2076
</tableData>
            <tableData breakPoint="3.36054752352E7">
 	-10.0	0.0	10.0
-5.0	-0.24304	-0.27406	-0.24304
-2.5	0.11494	0.094539	0.11494
0.0	0.47278	0.46234	0.47278
1.0	0.61527	0.60851	0.61527
2.0	0.75704	0.75373	0.75704
3.0	0.89766	0.89757	0.89766
4.0	1.0362	1.0394	1.0362
5.0	1.1699	1.1785	1.1699
6.0	1.291	1.3147	1.291
7.5	1.4838	1.5185	1.4838
10.0	1.8651	1.878	1.8651
12.5	2.2076	2.2366	2.2076
</tableData>
            <tableData breakPoint="4.36871178058E7">
 	-10.0	0.0	10.0
-5.0	-0.24304	-0.27406	-0.24304
-2.5	0.11494	0.094539	0.11494
0.0	0.47278	0.46234	0.47278
1.0	0.61527	0.60851	0.61527
2.0	0.75704	0.75373	0.75704
3.0	0.89766	0.89757	0.89766
4.0	1.0362	1.0394	1.0362
5.0	1.1699	1.1785	1.1699
6.0	1.291	1.3147	1.291
7.5	1.4838	1.5185	1.4838
10.0	1.8651	1.878	1.8651
12.5	2.2076	2.2366	2.2076
</tableData>
            <tableData breakPoint="4.48073003136E7">
 	-10.0	0.0	10.0
-5.0	-0.24304	-0.27406	-0.24304
-2.5	0.11494	0.094539	0.11494
0.0	0.47278	0.46234	0.47278
1.0	0.61527	0.60851	0.61527
2.0	0.75704	0.75373	0.75704
3.0	0.89766	0.89757	0.89766
4.0	1.0362	1.0394	1.0362
5.0	1.1699	1.1785	1.1699
6.0	1.291	1.3147	1.291
7.5	1.4838	1.5185	1.4838
10.0	1.8651	1.878	1.8651
12.5	2.2076	2.2366	2.2076
</tableData>
         </table>
      </function>
      <function name="aero/function/z_coeff_basic_Mach">
         <description>z_coefficient as function of alpha beta Reynolds and Mach</description>
         <interpolate1d>
            <p>velocities/mach</p>
            <v>0.2000</v>
            <p>aero/function/z_coeff_basic_M0</p>
            <v>0.6000</v>
            <p>aero/function/z_coeff_basic_M1</p>
            <v>0.7800</v>
            <p>aero/function/z_coeff_basic_M2</p>
            <v>0.8000</v>
            <p>aero/function/z_coeff_basic_M3</p>
         </interpolate1d>
      </function>
      <function name="aero/function/roll_coeff_basic_M0">
         <description>roll_coefficient as function of alpha beta Reynolds, fixed Mach = 0.2</description>
         <table>
            <independentVar lookup="row">aero/alpha-deg</independentVar>
            <independentVar lookup="column">aero/beta-deg</independentVar>
            <independentVar lookup="table">aero/Re</independentVar>
            <tableData breakPoint="1.12018250784E7">
 	-10.0	0.0	10.0
-5.0	0.040397	1.4073E-7	-0.040397
-2.5	0.039853	1.3971E-7	-0.039853
0.0	0.039544	1.3846E-7	-0.039544
1.0	0.039495	1.379E-7	-0.039495
2.0	0.039498	1.3728E-7	-0.039498
3.0	0.039567	1.366E-7	-0.039567
4.0	0.039736	1.3582E-7	-0.039736
5.0	0.040087	1.3489E-7	-0.040087
6.0	0.040802	1.3382E-7	-0.040802
7.5	0.040748	1.3252E-7	-0.040748
10.0	0.040211	1.3399E-7	-0.040211
12.5	0.035925	1.3777E-7	-0.035925
</tableData>
            <tableData breakPoint="3.36054752352E7">
 	-10.0	0.0	10.0
-5.0	0.040397	1.4073E-7	-0.040397
-2.5	0.039853	1.3971E-7	-0.039853
0.0	0.039544	1.3846E-7	-0.039544
1.0	0.039495	1.379E-7	-0.039495
2.0	0.039498	1.3728E-7	-0.039498
3.0	0.039567	1.366E-7	-0.039567
4.0	0.039736	1.3582E-7	-0.039736
5.0	0.040087	1.3489E-7	-0.040087
6.0	0.040802	1.3382E-7	-0.040802
7.5	0.040748	1.3252E-7	-0.040748
10.0	0.040211	1.3399E-7	-0.040211
12.5	0.035925	1.3777E-7	-0.035925
</tableData>
            <tableData breakPoint="4.36871178058E7">
 	-10.0	0.0	10.0
-5.0	0.040397	1.4073E-7	-0.040397
-2.5	0.039853	1.3971E-7	-0.039853
0.0	0.039544	1.3846E-7	-0.039544
1.0	0.039495	1.379E-7	-0.039495
2.0	0.039498	1.3728E-7	-0.039498
3.0	0.039567	1.366E-7	-0.039567
4.0	0.039736	1.3582E-7	-0.039736
5.0	0.040087	1.3489E-7	-0.040087
6.0	0.040802	1.3382E-7	-0.040802
7.5	0.040748	1.3252E-7	-0.040748
10.0	0.040211	1.3399E-7	-0.040211
12.5	0.035925	1.3777E-7	-0.035925
</tableData>
            <tableData breakPoint="4.48073003136E7">
 	-10.0	0.0	10.0
-5.0	0.040397	1.4073E-7	-0.040397
-2.5	0.039853	1.3971E-7	-0.039853
0.0	0.039544	1.3846E-7	-0.039544
1.0	0.039495	1.379E-7	-0.039495
2.0	0.039498	1.3728E-7	-0.039498
3.0	0.039567	1.366E-7	-0.039567
4.0	0.039736	1.3582E-7	-0.039736
5.0	0.040087	1.3489E-7	-0.040087
6.0	0.040802	1.3382E-7	-0.040802
7.5	0.040748	1.3252E-7	-0.040748
10.0	0.040211	1.3399E-7	-0.040211
12.5	0.035925	1.3777E-7	-0.035925
</tableData>
         </table>
      </function>
      <function name="aero/function/roll_coeff_basic_M1">
         <description>roll_coefficient as function of alpha beta Reynolds, fixed Mach = 0.6</description>
         <table>
            <independentVar lookup="row">aero/alpha-deg</independentVar>
            <independentVar lookup="column">aero/beta-deg</independentVar>
            <independentVar lookup="table">aero/Re</independentVar>
            <tableData breakPoint="1.12018250784E7">
 	-10.0	0.0	10.0
-5.0	0.049476	1.7236E-7	-0.049476
-2.5	0.048809	1.7111E-7	-0.048809
0.0	0.048431	1.6958E-7	-0.048431
1.0	0.048371	1.6889E-7	-0.048371
2.0	0.048375	1.6814E-7	-0.048375
3.0	0.04846	1.6731E-7	-0.04846
4.0	0.048667	1.6634E-7	-0.048667
5.0	0.049096	1.652E-7	-0.049096
6.0	0.049972	1.6389E-7	-0.049972
7.5	0.049906	1.623E-7	-0.049906
10.0	0.049248	1.641E-7	-0.049248
12.5	0.043999	1.6874E-7	-0.043999
</tableData>
            <tableData breakPoint="3.36054752352E7">
 	-10.0	0.0	10.0
-5.0	0.049476	1.7236E-7	-0.049476
-2.5	0.048809	1.7111E-7	-0.048809
0.0	0.048431	1.6958E-7	-0.048431
1.0	0.048371	1.6889E-7	-0.048371
2.0	0.048375	1.6814E-7	-0.048375
3.0	0.04846	1.6731E-7	-0.04846
4.0	0.048667	1.6634E-7	-0.048667
5.0	0.049096	1.652E-7	-0.049096
6.0	0.049972	1.6389E-7	-0.049972
7.5	0.049906	1.623E-7	-0.049906
10.0	0.049248	1.641E-7	-0.049248
12.5	0.043999	1.6874E-7	-0.043999
</tableData>
            <tableData breakPoint="4.36871178058E7">
 	-10.0	0.0	10.0
-5.0	0.049476	1.7236E-7	-0.049476
-2.5	0.048809	1.7111E-7	-0.048809
0.0	0.048431	1.6958E-7	-0.048431
1.0	0.048371	1.6889E-7	-0.048371
2.0	0.048375	1.6814E-7	-0.048375
3.0	0.04846	1.6731E-7	-0.04846
4.0	0.048667	1.6634E-7	-0.048667
5.0	0.049096	1.652E-7	-0.049096
6.0	0.049972	1.6389E-7	-0.049972
7.5	0.049906	1.623E-7	-0.049906
10.0	0.049248	1.641E-7	-0.049248
12.5	0.043999	1.6874E-7	-0.043999
</tableData>
            <tableData breakPoint="4.48073003136E7">
 	-10.0	0.0	10.0
-5.0	0.049476	1.7236E-7	-0.049476
-2.5	0.048809	1.7111E-7	-0.048809
0.0	0.048431	1.6958E-7	-0.048431
1.0	0.048371	1.6889E-7	-0.048371
2.0	0.048375	1.6814E-7	-0.048375
3.0	0.04846	1.6731E-7	-0.04846
4.0	0.048667	1.6634E-7	-0.048667
5.0	0.049096	1.652E-7	-0.049096
6.0	0.049972	1.6389E-7	-0.049972
7.5	0.049906	1.623E-7	-0.049906
10.0	0.049248	1.641E-7	-0.049248
12.5	0.043999	1.6874E-7	-0.043999
</tableData>
         </table>
      </function>
      <function name="aero/function/roll_coeff_basic_M2">
         <description>roll_coefficient as function of alpha beta Reynolds, fixed Mach = 0.78</description>
         <table>
            <independentVar lookup="row">aero/alpha-deg</independentVar>
            <independentVar lookup="column">aero/beta-deg</independentVar>
            <independentVar lookup="table">aero/Re</independentVar>
            <tableData breakPoint="1.12018250784E7">
 	-10.0	0.0	10.0
-5.0	0.063251	2.2035E-7	-0.063251
-2.5	0.062398	2.1875E-7	-0.062398
0.0	0.061914	2.1679E-7	-0.061914
1.0	0.061838	2.1591E-7	-0.061838
2.0	0.061843	2.1495E-7	-0.061843
3.0	0.061951	2.1388E-7	-0.061951
4.0	0.062216	2.1266E-7	-0.062216
5.0	0.062765	2.112E-7	-0.062765
6.0	0.063885	2.0952E-7	-0.063885
7.5	0.0638	2.0749E-7	-0.0638
10.0	0.062959	2.0979E-7	-0.062959
12.5	0.056249	2.1572E-7	-0.056249
</tableData>
            <tableData breakPoint="3.36054752352E7">
 	-10.0	0.0	10.0
-5.0	0.063251	2.2035E-7	-0.063251
-2.5	0.062398	2.1875E-7	-0.062398
0.0	0.061914	2.1679E-7	-0.061914
1.0	0.061838	2.1591E-7	-0.061838
2.0	0.061843	2.1495E-7	-0.061843
3.0	0.061951	2.1388E-7	-0.061951
4.0	0.062216	2.1266E-7	-0.062216
5.0	0.062765	2.112E-7	-0.062765
6.0	0.063885	2.0952E-7	-0.063885
7.5	0.0638	2.0749E-7	-0.0638
10.0	0.062959	2.0979E-7	-0.062959
12.5	0.056249	2.1572E-7	-0.056249
</tableData>
            <tableData breakPoint="4.36871178058E7">
 	-10.0	0.0	10.0
-5.0	0.063251	2.2035E-7	-0.063251
-2.5	0.062398	2.1875E-7	-0.062398
0.0	0.061914	2.1679E-7	-0.061914
1.0	0.061838	2.1591E-7	-0.061838
2.0	0.061843	2.1495E-7	-0.061843
3.0	0.061951	2.1388E-7	-0.061951
4.0	0.062216	2.1266E-7	-0.062216
5.0	0.062765	2.112E-7	-0.062765
6.0	0.063885	2.0952E-7	-0.063885
7.5	0.0638	2.0749E-7	-0.0638
10.0	0.062959	2.0979E-7	-0.062959
12.5	0.056249	2.1572E-7	-0.056249
</tableData>
            <tableData breakPoint="4.48073003136E7">
 	-10.0	0.0	10.0
-5.0	0.063251	2.2035E-7	-0.063251
-2.5	0.062398	2.1875E-7	-0.062398
0.0	0.061914	2.1679E-7	-0.061914
1.0	0.061838	2.1591E-7	-0.061838
2.0	0.061843	2.1495E-7	-0.061843
3.0	0.061951	2.1388E-7	-0.061951
4.0	0.062216	2.1266E-7	-0.062216
5.0	0.062765	2.112E-7	-0.062765
6.0	0.063885	2.0952E-7	-0.063885
7.5	0.0638	2.0749E-7	-0.0638
10.0	0.062959	2.0979E-7	-0.062959
12.5	0.056249	2.1572E-7	-0.056249
</tableData>
         </table>
      </function>
      <function name="aero/function/roll_coeff_basic_M3">
         <description>roll_coefficient as function of alpha beta Reynolds, fixed Mach = 0.8</description>
         <table>
            <independentVar lookup="row">aero/alpha-deg</independentVar>
            <independentVar lookup="column">aero/beta-deg</independentVar>
            <independentVar lookup="table">aero/Re</independentVar>
            <tableData breakPoint="1.12018250784E7">
 	-10.0	0.0	10.0
-5.0	0.065969	2.2981E-7	-0.065969
-2.5	0.065079	2.2815E-7	-0.065079
0.0	0.064575	2.2611E-7	-0.064575
1.0	0.064495	2.2518E-7	-0.064495
2.0	0.0645	2.2418E-7	-0.0645
3.0	0.064613	2.2307E-7	-0.064613
4.0	0.064889	2.2179E-7	-0.064889
5.0	0.065462	2.2027E-7	-0.065462
6.0	0.066629	2.1852E-7	-0.066629
7.5	0.066541	2.1641E-7	-0.066541
10.0	0.065664	2.188E-7	-0.065664
12.5	0.058665	2.2499E-7	-0.058665
</tableData>
            <tableData breakPoint="3.36054752352E7">
 	-10.0	0.0	10.0
-5.0	0.065969	2.2981E-7	-0.065969
-2.5	0.065079	2.2815E-7	-0.065079
0.0	0.064575	2.2611E-7	-0.064575
1.0	0.064495	2.2518E-7	-0.064495
2.0	0.0645	2.2418E-7	-0.0645
3.0	0.064613	2.2307E-7	-0.064613
4.0	0.064889	2.2179E-7	-0.064889
5.0	0.065462	2.2027E-7	-0.065462
6.0	0.066629	2.1852E-7	-0.066629
7.5	0.066541	2.1641E-7	-0.066541
10.0	0.065664	2.188E-7	-0.065664
12.5	0.058665	2.2499E-7	-0.058665
</tableData>
            <tableData breakPoint="4.36871178058E7">
 	-10.0	0.0	10.0
-5.0	0.065969	2.2981E-7	-0.065969
-2.5	0.065079	2.2815E-7	-0.065079
0.0	0.064575	2.2611E-7	-0.064575
1.0	0.064495	2.2518E-7	-0.064495
2.0	0.0645	2.2418E-7	-0.0645
3.0	0.064613	2.2307E-7	-0.064613
4.0	0.064889	2.2179E-7	-0.064889
5.0	0.065462	2.2027E-7	-0.065462
6.0	0.066629	2.1852E-7	-0.066629
7.5	0.066541	2.1641E-7	-0.066541
10.0	0.065664	2.188E-7	-0.065664
12.5	0.058665	2.2499E-7	-0.058665
</tableData>
            <tableData breakPoint="4.48073003136E7">
 	-10.0	0.0	10.0
-5.0	0.065969	2.2981E-7	-0.065969
-2.5	0.065079	2.2815E-7	-0.065079
0.0	0.064575	2.2611E-7	-0.064575
1.0	0.064495	2.2518E-7	-0.064495
2.0	0.0645	2.2418E-7	-0.0645
3.0	0.064613	2.2307E-7	-0.064613
4.0	0.064889	2.2179E-7	-0.064889
5.0	0.065462	2.2027E-7	-0.065462
6.0	0.066629	2.1852E-7	-0.066629
7.5	0.066541	2.1641E-7	-0.066541
10.0	0.065664	2.188E-7	-0.065664
12.5	0.058665	2.2499E-7	-0.058665
</tableData>
         </table>
      </function>
      <function name="aero/function/roll_coeff_basic_Mach">
         <description>roll_coefficient as function of alpha beta Reynolds and Mach</description>
         <interpolate1d>
            <p>velocities/mach</p>
            <v>0.2000</v>
            <p>aero/function/roll_coeff_basic_M0</p>
            <v>0.6000</v>
            <p>aero/function/roll_coeff_basic_M1</p>
            <v>0.7800</v>
            <p>aero/function/roll_coeff_basic_M2</p>
            <v>0.8000</v>
            <p>aero/function/roll_coeff_basic_M3</p>
         </interpolate1d>
      </function>
      <function name="aero/function/pitch_coeff_basic_M0">
         <description>pitch_coefficient as function of alpha beta Reynolds, fixed Mach = 0.2</description>
         <table>
            <independentVar lookup="row">aero/alpha-deg</independentVar>
            <independentVar lookup="column">aero/beta-deg</independentVar>
            <independentVar lookup="table">aero/Re</independentVar>
            <tableData breakPoint="1.12018250784E7">
 	-10.0	0.0	10.0
-5.0	0.018747804469503155	0.0234155949005228	0.018747804469503155
-2.5	0.0037836792773477024	0.0084005393678594	0.0037836792773477024
0.0	-0.010521565538819012	-0.005741530570951758	-0.010521565538819012
1.0	-0.01601462527379753	-0.011078214381797865	-0.01601462527379753
2.0	-0.021332642867612814	-0.016167910764646694	-0.021332642867612814
3.0	-0.02638859171900856	-0.020928414194163816	-0.02638859171900856
4.0	-0.030943890378517934	-0.02521546324468715	-0.030943890378517934
5.0	-0.03426796041798081	-0.028851048959101552	-0.03426796041798081
6.0	-0.03407017268785286	-0.03180673935120112	-0.03407017268785286
7.5	-0.037999967650832585	-0.03658454920710443	-0.037999967650832585
10.0	-0.06186800198402308	-0.05172025525514588	-0.06186800198402308
12.5	-0.0771050742437551	-0.06884743651091314	-0.0771050742437551
</tableData>
            <tableData breakPoint="3.36054752352E7">
 	-10.0	0.0	10.0
-5.0	0.018747804469503155	0.0234155949005228	0.018747804469503155
-2.5	0.0037836792773477024	0.0084005393678594	0.0037836792773477024
0.0	-0.010521565538819012	-0.005741530570951758	-0.010521565538819012
1.0	-0.01601462527379753	-0.011078214381797865	-0.01601462527379753
2.0	-0.021332642867612814	-0.016167910764646694	-0.021332642867612814
3.0	-0.02638859171900856	-0.020928414194163816	-0.02638859171900856
4.0	-0.030943890378517934	-0.02521546324468715	-0.030943890378517934
5.0	-0.03426796041798081	-0.028851048959101552	-0.03426796041798081
6.0	-0.03407017268785286	-0.03180673935120112	-0.03407017268785286
7.5	-0.037999967650832585	-0.03658454920710443	-0.037999967650832585
10.0	-0.06186800198402308	-0.05172025525514588	-0.06186800198402308
12.5	-0.0771050742437551	-0.06884743651091314	-0.0771050742437551
</tableData>
            <tableData breakPoint="4.36871178058E7">
 	-10.0	0.0	10.0
-5.0	0.018747804469503155	0.0234155949005228	0.018747804469503155
-2.5	0.0037836792773477024	0.0084005393678594	0.0037836792773477024
0.0	-0.010521565538819012	-0.005741530570951758	-0.010521565538819012
1.0	-0.01601462527379753	-0.011078214381797865	-0.01601462527379753
2.0	-0.021332642867612814	-0.016167910764646694	-0.021332642867612814
3.0	-0.02638859171900856	-0.020928414194163816	-0.02638859171900856
4.0	-0.030943890378517934	-0.02521546324468715	-0.030943890378517934
5.0	-0.03426796041798081	-0.028851048959101552	-0.03426796041798081
6.0	-0.03407017268785286	-0.03180673935120112	-0.03407017268785286
7.5	-0.037999967650832585	-0.03658454920710443	-0.037999967650832585
10.0	-0.06186800198402308	-0.05172025525514588	-0.06186800198402308
12.5	-0.0771050742437551	-0.06884743651091314	-0.0771050742437551
</tableData>
            <tableData breakPoint="4.48073003136E7">
 	-10.0	0.0	10.0
-5.0	0.018747804469503155	0.0234155949005228	0.018747804469503155
-2.5	0.0037836792773477024	0.0084005393678594	0.0037836792773477024
0.0	-0.010521565538819012	-0.005741530570951758	-0.010521565538819012
1.0	-0.01601462527379753	-0.011078214381797865	-0.01601462527379753
2.0	-0.021332642867612814	-0.016167910764646694	-0.021332642867612814
3.0	-0.02638859171900856	-0.020928414194163816	-0.02638859171900856
4.0	-0.030943890378517934	-0.02521546324468715	-0.030943890378517934
5.0	-0.03426796041798081	-0.028851048959101552	-0.03426796041798081
6.0	-0.03407017268785286	-0.03180673935120112	-0.03407017268785286
7.5	-0.037999967650832585	-0.03658454920710443	-0.037999967650832585
10.0	-0.06186800198402308	-0.05172025525514588	-0.06186800198402308
12.5	-0.0771050742437551	-0.06884743651091314	-0.0771050742437551
</tableData>
         </table>
      </function>
      <function name="aero/function/pitch_coeff_basic_M1">
         <description>pitch_coefficient as function of alpha beta Reynolds, fixed Mach = 0.6</description>
         <table>
            <independentVar lookup="row">aero/alpha-deg</independentVar>
            <independentVar lookup="column">aero/beta-deg</independentVar>
            <independentVar lookup="table">aero/Re</independentVar>
            <tableData breakPoint="1.12018250784E7">
 	-10.0	0.0	10.0
-5.0	0.022961919294541812	0.028677984695239595	0.022961919294541812
-2.5	0.0046340428995665615	0.01028854686926202	0.0046340428995665615
0.0	-0.012885870617836009	-0.007031971892705308	-0.012885870617836009
1.0	-0.01961436196212624	-0.013568238286777438	-0.01961436196212624
2.0	-0.02612652297658903	-0.019802260305747794	-0.02612652297658903
3.0	-0.03231851510290719	-0.02563081747795585	-0.03231851510290719
4.0	-0.03789860143914201	-0.03088208171285295	-0.03789860143914201
5.0	-0.0419693201598379	-0.03533477798735844	-0.0419693201598379
6.0	-0.04172703019043117	-0.038954293448699946	-0.04172703019043117
7.5	-0.046539452899106874	-0.044807574087174	-0.046539452899106874
10.0	-0.07577247941201802	-0.06334399292010291	-0.07577247941201802
12.5	-0.0944349879229035	-0.08432061787348541	-0.0944349879229035
</tableData>
            <tableData breakPoint="3.36054752352E7">
 	-10.0	0.0	10.0
-5.0	0.022961919294541812	0.028677984695239595	0.022961919294541812
-2.5	0.0046340428995665615	0.01028854686926202	0.0046340428995665615
0.0	-0.012885870617836009	-0.007031971892705308	-0.012885870617836009
1.0	-0.01961436196212624	-0.013568238286777438	-0.01961436196212624
2.0	-0.02612652297658903	-0.019802260305747794	-0.02612652297658903
3.0	-0.03231851510290719	-0.02563081747795585	-0.03231851510290719
4.0	-0.03789860143914201	-0.03088208171285295	-0.03789860143914201
5.0	-0.0419693201598379	-0.03533477798735844	-0.0419693201598379
6.0	-0.04172703019043117	-0.038954293448699946	-0.04172703019043117
7.5	-0.046539452899106874	-0.044807574087174	-0.046539452899106874
10.0	-0.07577247941201802	-0.06334399292010291	-0.07577247941201802
12.5	-0.0944349879229035	-0.08432061787348541	-0.0944349879229035
</tableData>
            <tableData breakPoint="4.36871178058E7">
 	-10.0	0.0	10.0
-5.0	0.022961919294541812	0.028677984695239595	0.022961919294541812
-2.5	0.0046340428995665615	0.01028854686926202	0.0046340428995665615
0.0	-0.012885870617836009	-0.007031971892705308	-0.012885870617836009
1.0	-0.01961436196212624	-0.013568238286777438	-0.01961436196212624
2.0	-0.02612652297658903	-0.019802260305747794	-0.02612652297658903
3.0	-0.03231851510290719	-0.02563081747795585	-0.03231851510290719
4.0	-0.03789860143914201	-0.03088208171285295	-0.03789860143914201
5.0	-0.0419693201598379	-0.03533477798735844	-0.0419693201598379
6.0	-0.04172703019043117	-0.038954293448699946	-0.04172703019043117
7.5	-0.046539452899106874	-0.044807574087174	-0.046539452899106874
10.0	-0.07577247941201802	-0.06334399292010291	-0.07577247941201802
12.5	-0.0944349879229035	-0.08432061787348541	-0.0944349879229035
</tableData>
            <tableData breakPoint="4.48073003136E7">
 	-10.0	0.0	10.0
-5.0	0.022961919294541812	0.028677984695239595	0.022961919294541812
-2.5	0.0046340428995665615	0.01028854686926202	0.0046340428995665615
0.0	-0.012885870617836009	-0.007031971892705308	-0.012885870617836009
1.0	-0.01961436196212624	-0.013568238286777438	-0.01961436196212624
2.0	-0.02612652297658903	-0.019802260305747794	-0.02612652297658903
3.0	-0.03231851510290719	-0.02563081747795585	-0.03231851510290719
4.0	-0.03789860143914201	-0.03088208171285295	-0.03789860143914201
5.0	-0.0419693201598379	-0.03533477798735844	-0.0419693201598379
6.0	-0.04172703019043117	-0.038954293448699946	-0.04172703019043117
7.5	-0.046539452899106874	-0.044807574087174	-0.046539452899106874
10.0	-0.07577247941201802	-0.06334399292010291	-0.07577247941201802
12.5	-0.0944349879229035	-0.08432061787348541	-0.0944349879229035
</tableData>
         </table>
      </function>
      <function name="aero/function/pitch_coeff_basic_M2">
         <description>pitch_coefficient as function of alpha beta Reynolds, fixed Mach = 0.78</description>
         <table>
            <independentVar lookup="row">aero/alpha-deg</independentVar>
            <independentVar lookup="column">aero/beta-deg</independentVar>
            <independentVar lookup="table">aero/Re</independentVar>
            <tableData breakPoint="1.12018250784E7">
 	-10.0	0.0	10.0
-5.0	0.029354171497614528	0.03666242812584231	0.029354171497614528
-2.5	0.005924236986657452	0.013152884053508741	0.005924236986657452
0.0	-0.016474481746345016	-0.008989699568978033	-0.016474481746345016
1.0	-0.025074539486970988	-0.017345983932221302	-0.025074539486970988
2.0	-0.033401402925357725	-0.025315593283064427	-0.033401402925357725
3.0	-0.041316620650415664	-0.03276724601563498	-0.041316620650415664
4.0	-0.0484493406681549	-0.03948090328016562	-0.0484493406681549
5.0	-0.053654866490459904	-0.045172245214597416	-0.053654866490459904
6.0	-0.05334458698882169	-0.04980047809959146	-0.05334458698882169
7.5	-0.05949702156911427	-0.05728179899168121	-0.05949702156911427
10.0	-0.0968677770034773	-0.08097924140763633	-0.0968677770034773
12.5	-0.1207259219501614	-0.10779554909304659	-0.1207259219501614
</tableData>
            <tableData breakPoint="3.36054752352E7">
 	-10.0	0.0	10.0
-5.0	0.029354171497614528	0.03666242812584231	0.029354171497614528
-2.5	0.005924236986657452	0.013152884053508741	0.005924236986657452
0.0	-0.016474481746345016	-0.008989699568978033	-0.016474481746345016
1.0	-0.025074539486970988	-0.017345983932221302	-0.025074539486970988
2.0	-0.033401402925357725	-0.025315593283064427	-0.033401402925357725
3.0	-0.041316620650415664	-0.03276724601563498	-0.041316620650415664
4.0	-0.0484493406681549	-0.03948090328016562	-0.0484493406681549
5.0	-0.053654866490459904	-0.045172245214597416	-0.053654866490459904
6.0	-0.05334458698882169	-0.04980047809959146	-0.05334458698882169
7.5	-0.05949702156911427	-0.05728179899168121	-0.05949702156911427
10.0	-0.0968677770034773	-0.08097924140763633	-0.0968677770034773
12.5	-0.1207259219501614	-0.10779554909304659	-0.1207259219501614
</tableData>
            <tableData breakPoint="4.36871178058E7">
 	-10.0	0.0	10.0
-5.0	0.029354171497614528	0.03666242812584231	0.029354171497614528
-2.5	0.005924236986657452	0.013152884053508741	0.005924236986657452
0.0	-0.016474481746345016	-0.008989699568978033	-0.016474481746345016
1.0	-0.025074539486970988	-0.017345983932221302	-0.025074539486970988
2.0	-0.033401402925357725	-0.025315593283064427	-0.033401402925357725
3.0	-0.041316620650415664	-0.03276724601563498	-0.041316620650415664
4.0	-0.0484493406681549	-0.03948090328016562	-0.0484493406681549
5.0	-0.053654866490459904	-0.045172245214597416	-0.053654866490459904
6.0	-0.05334458698882169	-0.04980047809959146	-0.05334458698882169
7.5	-0.05949702156911427	-0.05728179899168121	-0.05949702156911427
10.0	-0.0968677770034773	-0.08097924140763633	-0.0968677770034773
12.5	-0.1207259219501614	-0.10779554909304659	-0.1207259219501614
</tableData>
            <tableData breakPoint="4.48073003136E7">
 	-10.0	0.0	10.0
-5.0	0.029354171497614528	0.03666242812584231	0.029354171497614528
-2.5	0.005924236986657452	0.013152884053508741	0.005924236986657452
0.0	-0.016474481746345016	-0.008989699568978033	-0.016474481746345016
1.0	-0.025074539486970988	-0.017345983932221302	-0.025074539486970988
2.0	-0.033401402925357725	-0.025315593283064427	-0.033401402925357725
3.0	-0.041316620650415664	-0.03276724601563498	-0.041316620650415664
4.0	-0.0484493406681549	-0.03948090328016562	-0.0484493406681549
5.0	-0.053654866490459904	-0.045172245214597416	-0.053654866490459904
6.0	-0.05334458698882169	-0.04980047809959146	-0.05334458698882169
7.5	-0.05949702156911427	-0.05728179899168121	-0.05949702156911427
10.0	-0.0968677770034773	-0.08097924140763633	-0.0968677770034773
12.5	-0.1207259219501614	-0.10779554909304659	-0.1207259219501614
</tableData>
         </table>
      </function>
      <function name="aero/function/pitch_coeff_basic_M3">
         <description>pitch_coefficient as function of alpha beta Reynolds, fixed Mach = 0.8</description>
         <table>
            <independentVar lookup="row">aero/alpha-deg</independentVar>
            <independentVar lookup="column">aero/beta-deg</independentVar>
            <independentVar lookup="table">aero/Re</independentVar>
            <tableData breakPoint="1.12018250784E7">
 	-10.0	0.0	10.0
-5.0	0.03061506827718022	0.038238549100299425	0.03061506827718022
-2.5	0.006178765071865859	0.013717815257686701	0.006178765071865859
0.0	-0.017181572881552445	-0.009376003729384186	-0.017181572881552445
1.0	-0.026152482616168322	-0.018090160266827717	-0.026152482616168322
2.0	-0.034835363968785366	-0.02640342579876816	-0.034835363968785366
3.0	-0.04309176552831403	-0.03417524741948333	-0.04309176552831403
4.0	-0.05053105652775158	-0.0411769330660128	-0.05053105652775158
5.0	-0.05596032971976383	-0.04711303731647793	-0.05596032971976383
6.0	-0.05563645231167932	-0.051940294104913236	-0.05563645231167932
7.5	-0.06205342798101803	-0.059743020058460904	-0.06205342798101803
10.0	-0.10102997254935737	-0.08445783311126169	-0.10102997254935737
12.5	-0.12591661369270682	-0.11242749049798054	-0.12591661369270682
</tableData>
            <tableData breakPoint="3.36054752352E7">
 	-10.0	0.0	10.0
-5.0	0.03061506827718022	0.038238549100299425	0.03061506827718022
-2.5	0.006178765071865859	0.013717815257686701	0.006178765071865859
0.0	-0.017181572881552445	-0.009376003729384186	-0.017181572881552445
1.0	-0.026152482616168322	-0.018090160266827717	-0.026152482616168322
2.0	-0.034835363968785366	-0.02640342579876816	-0.034835363968785366
3.0	-0.04309176552831403	-0.03417524741948333	-0.04309176552831403
4.0	-0.05053105652775158	-0.0411769330660128	-0.05053105652775158
5.0	-0.05596032971976383	-0.04711303731647793	-0.05596032971976383
6.0	-0.05563645231167932	-0.051940294104913236	-0.05563645231167932
7.5	-0.06205342798101803	-0.059743020058460904	-0.06205342798101803
10.0	-0.10102997254935737	-0.08445783311126169	-0.10102997254935737
12.5	-0.12591661369270682	-0.11242749049798054	-0.12591661369270682
</tableData>
            <tableData breakPoint="4.36871178058E7">
 	-10.0	0.0	10.0
-5.0	0.03061506827718022	0.038238549100299425	0.03061506827718022
-2.5	0.006178765071865859	0.013717815257686701	0.006178765071865859
0.0	-0.017181572881552445	-0.009376003729384186	-0.017181572881552445
1.0	-0.026152482616168322	-0.018090160266827717	-0.026152482616168322
2.0	-0.034835363968785366	-0.02640342579876816	-0.034835363968785366
3.0	-0.04309176552831403	-0.03417524741948333	-0.04309176552831403
4.0	-0.05053105652775158	-0.0411769330660128	-0.05053105652775158
5.0	-0.05596032971976383	-0.04711303731647793	-0.05596032971976383
6.0	-0.05563645231167932	-0.051940294104913236	-0.05563645231167932
7.5	-0.06205342798101803	-0.059743020058460904	-0.06205342798101803
10.0	-0.10102997254935737	-0.08445783311126169	-0.10102997254935737
12.5	-0.12591661369270682	-0.11242749049798054	-0.12591661369270682
</tableData>
            <tableData breakPoint="4.48073003136E7">
 	-10.0	0.0	10.0
-5.0	0.03061506827718022	0.038238549100299425	0.03061506827718022
-2.5	0.006178765071865859	0.013717815257686701	0.006178765071865859
0.0	-0.017181572881552445	-0.009376003729384186	-0.017181572881552445
1.0	-0.026152482616168322	-0.018090160266827717	-0.026152482616168322
2.0	-0.034835363968785366	-0.02640342579876816	-0.034835363968785366
3.0	-0.04309176552831403	-0.03417524741948333	-0.04309176552831403
4.0	-0.05053105652775158	-0.0411769330660128	-0.05053105652775158
5.0	-0.05596032971976383	-0.04711303731647793	-0.05596032971976383
6.0	-0.05563645231167932	-0.051940294104913236	-0.05563645231167932
7.5	-0.06205342798101803	-0.059743020058460904	-0.06205342798101803
10.0	-0.10102997254935737	-0.08445783311126169	-0.10102997254935737
12.5	-0.12591661369270682	-0.11242749049798054	-0.12591661369270682
</tableData>
         </table>
      </function>
      <function name="aero/function/pitch_coeff_basic_Mach">
         <description>pitch_coefficient as function of alpha beta Reynolds and Mach</description>
         <interpolate1d>
            <p>velocities/mach</p>
            <v>0.2000</v>
            <p>aero/function/pitch_coeff_basic_M0</p>
            <v>0.6000</v>
            <p>aero/function/pitch_coeff_basic_M1</p>
            <v>0.7800</v>
            <p>aero/function/pitch_coeff_basic_M2</p>
            <v>0.8000</v>
            <p>aero/function/pitch_coeff_basic_M3</p>
         </interpolate1d>
      </function>
      <function name="aero/function/yaw_coeff_basic_M0">
         <description>yaw_coefficient as function of alpha beta Reynolds, fixed Mach = 0.2</description>
         <table>
            <independentVar lookup="row">aero/alpha-deg</independentVar>
            <independentVar lookup="column">aero/beta-deg</independentVar>
            <independentVar lookup="table">aero/Re</independentVar>
            <tableData breakPoint="1.12018250784E7">
 	-10.0	0.0	10.0
-5.0	0.040397	1.4073E-7	-0.040397
-2.5	0.039853	1.3971E-7	-0.039853
0.0	0.039544	1.3846E-7	-0.039544
1.0	0.039495	1.379E-7	-0.039495
2.0	0.039498	1.3728E-7	-0.039498
3.0	0.039567	1.366E-7	-0.039567
4.0	0.039736	1.3582E-7	-0.039736
5.0	0.040087	1.3489E-7	-0.040087
6.0	0.040802	1.3382E-7	-0.040802
7.5	0.040748	1.3252E-7	-0.040748
10.0	0.040211	1.3399E-7	-0.040211
12.5	0.035925	1.3777E-7	-0.035925
</tableData>
            <tableData breakPoint="3.36054752352E7">
 	-10.0	0.0	10.0
-5.0	0.040397	1.4073E-7	-0.040397
-2.5	0.039853	1.3971E-7	-0.039853
0.0	0.039544	1.3846E-7	-0.039544
1.0	0.039495	1.379E-7	-0.039495
2.0	0.039498	1.3728E-7	-0.039498
3.0	0.039567	1.366E-7	-0.039567
4.0	0.039736	1.3582E-7	-0.039736
5.0	0.040087	1.3489E-7	-0.040087
6.0	0.040802	1.3382E-7	-0.040802
7.5	0.040748	1.3252E-7	-0.040748
10.0	0.040211	1.3399E-7	-0.040211
12.5	0.035925	1.3777E-7	-0.035925
</tableData>
            <tableData breakPoint="4.36871178058E7">
 	-10.0	0.0	10.0
-5.0	0.040397	1.4073E-7	-0.040397
-2.5	0.039853	1.3971E-7	-0.039853
0.0	0.039544	1.3846E-7	-0.039544
1.0	0.039495	1.379E-7	-0.039495
2.0	0.039498	1.3728E-7	-0.039498
3.0	0.039567	1.366E-7	-0.039567
4.0	0.039736	1.3582E-7	-0.039736
5.0	0.040087	1.3489E-7	-0.040087
6.0	0.040802	1.3382E-7	-0.040802
7.5	0.040748	1.3252E-7	-0.040748
10.0	0.040211	1.3399E-7	-0.040211
12.5	0.035925	1.3777E-7	-0.035925
</tableData>
            <tableData breakPoint="4.48073003136E7">
 	-10.0	0.0	10.0
-5.0	0.040397	1.4073E-7	-0.040397
-2.5	0.039853	1.3971E-7	-0.039853
0.0	0.039544	1.3846E-7	-0.039544
1.0	0.039495	1.379E-7	-0.039495
2.0	0.039498	1.3728E-7	-0.039498
3.0	0.039567	1.366E-7	-0.039567
4.0	0.039736	1.3582E-7	-0.039736
5.0	0.040087	1.3489E-7	-0.040087
6.0	0.040802	1.3382E-7	-0.040802
7.5	0.040748	1.3252E-7	-0.040748
10.0	0.040211	1.3399E-7	-0.040211
12.5	0.035925	1.3777E-7	-0.035925
</tableData>
         </table>
      </function>
      <function name="aero/function/yaw_coeff_basic_M1">
         <description>yaw_coefficient as function of alpha beta Reynolds, fixed Mach = 0.6</description>
         <table>
            <independentVar lookup="row">aero/alpha-deg</independentVar>
            <independentVar lookup="column">aero/beta-deg</independentVar>
            <independentVar lookup="table">aero/Re</independentVar>
            <tableData breakPoint="1.12018250784E7">
 	-10.0	0.0	10.0
-5.0	0.049476	1.7236E-7	-0.049476
-2.5	0.048809	1.7111E-7	-0.048809
0.0	0.048431	1.6958E-7	-0.048431
1.0	0.048371	1.6889E-7	-0.048371
2.0	0.048375	1.6814E-7	-0.048375
3.0	0.04846	1.6731E-7	-0.04846
4.0	0.048667	1.6634E-7	-0.048667
5.0	0.049096	1.652E-7	-0.049096
6.0	0.049972	1.6389E-7	-0.049972
7.5	0.049906	1.623E-7	-0.049906
10.0	0.049248	1.641E-7	-0.049248
12.5	0.043999	1.6874E-7	-0.043999
</tableData>
            <tableData breakPoint="3.36054752352E7">
 	-10.0	0.0	10.0
-5.0	0.049476	1.7236E-7	-0.049476
-2.5	0.048809	1.7111E-7	-0.048809
0.0	0.048431	1.6958E-7	-0.048431
1.0	0.048371	1.6889E-7	-0.048371
2.0	0.048375	1.6814E-7	-0.048375
3.0	0.04846	1.6731E-7	-0.04846
4.0	0.048667	1.6634E-7	-0.048667
5.0	0.049096	1.652E-7	-0.049096
6.0	0.049972	1.6389E-7	-0.049972
7.5	0.049906	1.623E-7	-0.049906
10.0	0.049248	1.641E-7	-0.049248
12.5	0.043999	1.6874E-7	-0.043999
</tableData>
            <tableData breakPoint="4.36871178058E7">
 	-10.0	0.0	10.0
-5.0	0.049476	1.7236E-7	-0.049476
-2.5	0.048809	1.7111E-7	-0.048809
0.0	0.048431	1.6958E-7	-0.048431
1.0	0.048371	1.6889E-7	-0.048371
2.0	0.048375	1.6814E-7	-0.048375
3.0	0.04846	1.6731E-7	-0.04846
4.0	0.048667	1.6634E-7	-0.048667
5.0	0.049096	1.652E-7	-0.049096
6.0	0.049972	1.6389E-7	-0.049972
7.5	0.049906	1.623E-7	-0.049906
10.0	0.049248	1.641E-7	-0.049248
12.5	0.043999	1.6874E-7	-0.043999
</tableData>
            <tableData breakPoint="4.48073003136E7">
 	-10.0	0.0	10.0
-5.0	0.049476	1.7236E-7	-0.049476
0.0	0.048431	1.6958E-7	-0.048431
2.0	0.048375	1.6814E-7	-0.048375
4.0	0.048667	1.6634E-7	-0.048667
6.0	0.049972	1.6389E-7	-0.049972
10.0	0.049248	1.641E-7	-0.049248
12.5	0.043999	1.6874E-7	-0.043999
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</tableData>
         </table>
      </function>
      <function name="aero/function/yaw_coeff_basic_M2">
         <description>yaw_coefficient as function of alpha beta Reynolds, fixed Mach = 0.78</description>
         <table>
            <independentVar lookup="row">aero/alpha-deg</independentVar>
            <independentVar lookup="column">aero/beta-deg</independentVar>
            <independentVar lookup="table">aero/Re</independentVar>
            <tableData breakPoint="1.12018250784E7">
 	-10.0	0.0	10.0
-5.0	0.063251	2.2035E-7	-0.063251
0.0	0.061914	2.1679E-7	-0.061914
2.0	0.061843	2.1495E-7	-0.061843
4.0	0.062216	2.1266E-7	-0.062216
6.0	0.063885	2.0952E-7	-0.063885
10.0	0.062959	2.0979E-7	-0.062959
12.5	0.056249	2.1572E-7	-0.056249
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</tableData>
            <tableData breakPoint="3.36054752352E7">
 	-10.0	0.0	10.0
-5.0	0.063251	2.2035E-7	-0.063251
0.0	0.061914	2.1679E-7	-0.061914
2.0	0.061843	2.1495E-7	-0.061843
4.0	0.062216	2.1266E-7	-0.062216
6.0	0.063885	2.0952E-7	-0.063885
10.0	0.062959	2.0979E-7	-0.062959
12.5	0.056249	2.1572E-7	-0.056249
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</tableData>
            <tableData breakPoint="4.36871178058E7">
 	-10.0	0.0	10.0
-5.0	0.063251	2.2035E-7	-0.063251
0.0	0.061914	2.1679E-7	-0.061914
2.0	0.061843	2.1495E-7	-0.061843
4.0	0.062216	2.1266E-7	-0.062216
6.0	0.063885	2.0952E-7	-0.063885
10.0	0.062959	2.0979E-7	-0.062959
12.5	0.056249	2.1572E-7	-0.056249
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</tableData>
            <tableData breakPoint="4.48073003136E7">
 	-10.0	0.0	10.0
-5.0	0.063251	2.2035E-7	-0.063251
0.0	0.061914	2.1679E-7	-0.061914
2.0	0.061843	2.1495E-7	-0.061843
4.0	0.062216	2.1266E-7	-0.062216
6.0	0.063885	2.0952E-7	-0.063885
10.0	0.062959	2.0979E-7	-0.062959
12.5	0.056249	2.1572E-7	-0.056249
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</tableData>
         </table>
      </function>
      <function name="aero/function/yaw_coeff_basic_M3">
         <description>yaw_coefficient as function of alpha beta Reynolds, fixed Mach = 0.8</description>
         <table>
            <independentVar lookup="row">aero/alpha-deg</independentVar>
            <independentVar lookup="column">aero/beta-deg</independentVar>
            <independentVar lookup="table">aero/Re</independentVar>
            <tableData breakPoint="1.12018250784E7">
 	-10.0	0.0	10.0
-5.0	0.065969	2.2981E-7	-0.065969
0.0	0.064575	2.2611E-7	-0.064575
2.0	0.0645	2.2418E-7	-0.0645
4.0	0.064889	2.2179E-7	-0.064889
6.0	0.066629	2.1852E-7	-0.066629
10.0	0.065664	2.188E-7	-0.065664
12.5	0.058665	2.2499E-7	-0.058665
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</tableData>
            <tableData breakPoint="3.36054752352E7">
 	-10.0	0.0	10.0
-5.0	0.065969	2.2981E-7	-0.065969
0.0	0.064575	2.2611E-7	-0.064575
2.0	0.0645	2.2418E-7	-0.0645
4.0	0.064889	2.2179E-7	-0.064889
6.0	0.066629	2.1852E-7	-0.066629
10.0	0.065664	2.188E-7	-0.065664
12.5	0.058665	2.2499E-7	-0.058665
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</tableData>
            <tableData breakPoint="4.36871178058E7">
 	-10.0	0.0	10.0
-5.0	0.065969	2.2981E-7	-0.065969
0.0	0.064575	2.2611E-7	-0.064575
2.0	0.0645	2.2418E-7	-0.0645
4.0	0.064889	2.2179E-7	-0.064889
6.0	0.066629	2.1852E-7	-0.066629
10.0	0.065664	2.188E-7	-0.065664
12.5	0.058665	2.2499E-7	-0.058665
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</tableData>
            <tableData breakPoint="4.48073003136E7">
 	-10.0	0.0	10.0
-5.0	0.065969	2.2981E-7	-0.065969
0.0	0.064575	2.2611E-7	-0.064575
2.0	0.0645	2.2418E-7	-0.0645
4.0	0.064889	2.2179E-7	-0.064889
6.0	0.066629	2.1852E-7	-0.066629
10.0	0.065664	2.188E-7	-0.065664
12.5	0.058665	2.2499E-7	-0.058665
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</tableData>
         </table>
      </function>
      <function name="aero/function/yaw_coeff_basic_Mach">
         <description>yaw_coefficient as function of alpha beta Reynolds and Mach</description>
         <interpolate1d>
            <p>velocities/mach</p>
            <v>0.2000</v>
            <p>aero/function/yaw_coeff_basic_M0</p>
            <v>0.6000</v>
            <p>aero/function/yaw_coeff_basic_M1</p>
            <v>0.7800</v>
            <p>aero/function/yaw_coeff_basic_M2</p>
            <v>0.8000</v>
            <p>aero/function/yaw_coeff_basic_M3</p>
         </interpolate1d>
      </function>
      <function name="aero/function/flap_inner_x_coeff_basic_Reynolds0_Mach_0">
         <description>x_coefficient as function of flap_inner_deflection, alpha, beta, fixed Reynolds = 1.12018250784E7fixed Mach = 0.2</description>
         <table>
            <independentVar lookup="row">aero/alpha-deg</independentVar>
            <independentVar lookup="column">fcs/flap-pos-deg</independentVar>
            <independentVar lookup="table">aero/beta-deg</independentVar>
            <tableData breakPoint="-10.0">
 	-3.0	3.0
-5.0	-0.0033171	0.0040563
0.0	-4.3121E-4	0.0011222
2.0	7.2686E-4	-4.2251E-6
4.0	0.0018712	-0.0010867
6.0	0.0032758	-0.0021158
10.0	0.0061186	-0.0074162
12.5	0.0033735	-0.0035673
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</tableData>
            <tableData breakPoint="0.0">
 	-3.0	3.0
-5.0	-0.0034198	0.004184
0.0	-5.5609E-4	0.0012494
2.0	5.7655E-4	1.2746E-4
4.0	0.0017105	-9.8093E-4
6.0	0.0028301	-0.0020804
10.0	0.0042769	-0.0037611
12.5	0.0057676	-0.004853
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</tableData>
            <tableData breakPoint="10.0">
 	-3.0	3.0
-5.0	-0.0033171	0.0040563
0.0	-4.3121E-4	0.0011222
2.0	7.2686E-4	-4.2251E-6
4.0	0.0018712	-0.0010867
6.0	0.0032758	-0.0021158
10.0	0.0061186	-0.0074162
12.5	0.0033735	-0.0035673
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</tableData>
         </table>
      </function>
      <function name="aero/function/flap_inner_x_coeff_basic_Reynolds1_Mach_0">
         <description>x_coefficient as function of flap_inner_deflection, alpha, beta, fixed Reynolds = 3.36054752352E7fixed Mach = 0.2</description>
         <table>
            <independentVar lookup="row">aero/alpha-deg</independentVar>
            <independentVar lookup="column">fcs/flap-pos-deg</independentVar>
            <independentVar lookup="table">aero/beta-deg</independentVar>
            <tableData breakPoint="-10.0">
 	-3.0	3.0
-5.0	-0.0033171	0.0040563
0.0	-4.3121E-4	0.0011222
2.0	7.2686E-4	-4.2251E-6
4.0	0.0018712	-0.0010867
6.0	0.0032758	-0.0021158
10.0	0.0061186	-0.0074162
12.5	0.0033735	-0.0035673
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</tableData>
            <tableData breakPoint="0.0">
 	-3.0	3.0
-5.0	-0.0034198	0.004184
0.0	-5.5609E-4	0.0012494
2.0	5.7655E-4	1.2746E-4
4.0	0.0017105	-9.8093E-4
6.0	0.0028301	-0.0020804
10.0	0.0042769	-0.0037611
12.5	0.0057676	-0.004853
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</tableData>
            <tableData breakPoint="10.0">
 	-3.0	3.0
-5.0	-0.0033171	0.0040563
0.0	-4.3121E-4	0.0011222
2.0	7.2686E-4	-4.2251E-6
4.0	0.0018712	-0.0010867
6.0	0.0032758	-0.0021158
10.0	0.0061186	-0.0074162
12.5	0.0033735	-0.0035673
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</tableData>
         </table>
      </function>
      <function name="aero/function/flap_inner_x_coeff_basic_Reynolds2_Mach_0">
         <description>x_coefficient as function of flap_inner_deflection, alpha, beta, fixed Reynolds = 4.36871178058E7fixed Mach = 0.2</description>
         <table>
            <independentVar lookup="row">aero/alpha-deg</independentVar>
            <independentVar lookup="column">fcs/flap-pos-deg</independentVar>
            <independentVar lookup="table">aero/beta-deg</independentVar>
            <tableData breakPoint="-10.0">
 	-3.0	3.0
-5.0	-0.0033171	0.0040563
0.0	-4.3121E-4	0.0011222
2.0	7.2686E-4	-4.2251E-6
4.0	0.0018712	-0.0010867
6.0	0.0032758	-0.0021158
10.0	0.0061186	-0.0074162
12.5	0.0033735	-0.0035673
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</tableData>
            <tableData breakPoint="0.0">
 	-3.0	3.0
-5.0	-0.0034198	0.004184
0.0	-5.5609E-4	0.0012494
2.0	5.7655E-4	1.2746E-4
4.0	0.0017105	-9.8093E-4
6.0	0.0028301	-0.0020804
10.0	0.0042769	-0.0037611
12.5	0.0057676	-0.004853
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</tableData>
            <tableData breakPoint="10.0">
 	-3.0	3.0
-5.0	-0.0033171	0.0040563
0.0	-4.3121E-4	0.0011222
2.0	7.2686E-4	-4.2251E-6
4.0	0.0018712	-0.0010867
6.0	0.0032758	-0.0021158
10.0	0.0061186	-0.0074162
12.5	0.0033735	-0.0035673
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</tableData>
         </table>
      </function>
      <function name="aero/function/flap_inner_x_coeff_basic_Reynolds3_Mach_0">
         <description>x_coefficient as function of flap_inner_deflection, alpha, beta, fixed Reynolds = 4.48073003136E7fixed Mach = 0.2</description>
         <table>
            <independentVar lookup="row">aero/alpha-deg</independentVar>
            <independentVar lookup="column">fcs/flap-pos-deg</independentVar>
            <independentVar lookup="table">aero/beta-deg</independentVar>
            <tableData breakPoint="-10.0">
 	-3.0	3.0
-5.0	-0.0033171	0.0040563
0.0	-4.3121E-4	0.0011222
2.0	7.2686E-4	-4.2251E-6
4.0	0.0018712	-0.0010867
6.0	0.0032758	-0.0021158
10.0	0.0061186	-0.0074162
12.5	0.0033735	-0.0035673
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</tableData>
            <tableData breakPoint="0.0">
 	-3.0	3.0
-5.0	-0.0034198	0.004184
0.0	-5.5609E-4	0.0012494
2.0	5.7655E-4	1.2746E-4
4.0	0.0017105	-9.8093E-4
6.0	0.0028301	-0.0020804
10.0	0.0042769	-0.0037611
12.5	0.0057676	-0.004853
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</tableData>
            <tableData breakPoint="10.0">
 	-3.0	3.0
-5.0	-0.0033171	0.0040563
0.0	-4.3121E-4	0.0011222
2.0	7.2686E-4	-4.2251E-6
4.0	0.0018712	-0.0010867
6.0	0.0032758	-0.0021158
10.0	0.0061186	-0.0074162
12.5	0.0033735	-0.0035673
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</tableData>
         </table>
      </function>
      <function name="aero/function/flap_inner_x_coeff_basic_Reynolds0_Mach_1">
         <description>x_coefficient as function of flap_inner_deflection, alpha, beta, fixed Reynolds = 1.12018250784E7fixed Mach = 0.6</description>
         <table>
            <independentVar lookup="row">aero/alpha-deg</independentVar>
            <independentVar lookup="column">fcs/flap-pos-deg</independentVar>
            <independentVar lookup="table">aero/beta-deg</independentVar>
            <tableData breakPoint="-10.0">
 	-3.0	3.0
-5.0	-0.0040625	0.0049679
0.0	-5.2812E-4	0.0013744
2.0	8.9021E-4	-5.1747E-6
4.0	0.0022917	-0.0013309
6.0	0.004012	-0.0025913
10.0	0.0074938	-0.009083
12.5	0.0041317	-0.0043691
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</tableData>
            <tableData breakPoint="0.0">
 	-3.0	3.0
-5.0	-0.0041884	0.0051244
0.0	-6.8107E-4	0.0015302
2.0	7.0612E-4	1.5611E-4
4.0	0.0020949	-0.0012014
6.0	0.0034661	-0.002548
10.0	0.0052381	-0.0046064
12.5	0.0070638	-0.0059437
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</tableData>
            <tableData breakPoint="10.0">
 	-3.0	3.0
-5.0	-0.0040625	0.0049679
0.0	-5.2812E-4	0.0013744
2.0	8.9021E-4	-5.1747E-6
4.0	0.0022917	-0.0013309
6.0	0.004012	-0.0025913
10.0	0.0074938	-0.009083
12.5	0.0041317	-0.0043691
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</tableData>
         </table>
      </function>
      <function name="aero/function/flap_inner_x_coeff_basic_Reynolds1_Mach_1">
         <description>x_coefficient as function of flap_inner_deflection, alpha, beta, fixed Reynolds = 3.36054752352E7fixed Mach = 0.6</description>
         <table>
            <independentVar lookup="row">aero/alpha-deg</independentVar>
            <independentVar lookup="column">fcs/flap-pos-deg</independentVar>
            <independentVar lookup="table">aero/beta-deg</independentVar>
            <tableData breakPoint="-10.0">
 	-3.0	3.0
-5.0	-0.0040625	0.0049679
0.0	-5.2812E-4	0.0013744
2.0	8.9021E-4	-5.1747E-6
4.0	0.0022917	-0.0013309
6.0	0.004012	-0.0025913
10.0	0.0074938	-0.009083
12.5	0.0041317	-0.0043691
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</tableData>
            <tableData breakPoint="0.0">
 	-3.0	3.0
-5.0	-0.0041884	0.0051244
0.0	-6.8107E-4	0.0015302
2.0	7.0612E-4	1.5611E-4
4.0	0.0020949	-0.0012014
6.0	0.0034661	-0.002548
10.0	0.0052381	-0.0046064
12.5	0.0070638	-0.0059437
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</tableData>
            <tableData breakPoint="10.0">
 	-3.0	3.0
-5.0	-0.0040625	0.0049679
0.0	-5.2812E-4	0.0013744
2.0	8.9021E-4	-5.1747E-6
4.0	0.0022917	-0.0013309
6.0	0.004012	-0.0025913
10.0	0.0074938	-0.009083
12.5	0.0041317	-0.0043691
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</tableData>
         </table>
      </function>
      <function name="aero/function/flap_inner_x_coeff_basic_Reynolds2_Mach_1">
         <description>x_coefficient as function of flap_inner_deflection, alpha, beta, fixed Reynolds = 4.36871178058E7fixed Mach = 0.6</description>
         <table>
            <independentVar lookup="row">aero/alpha-deg</independentVar>
            <independentVar lookup="column">fcs/flap-pos-deg</independentVar>
            <independentVar lookup="table">aero/beta-deg</independentVar>
            <tableData breakPoint="-10.0">
 	-3.0	3.0
-5.0	-0.0040625	0.0049679
0.0	-5.2812E-4	0.0013744
2.0	8.9021E-4	-5.1747E-6
4.0	0.0022917	-0.0013309
6.0	0.004012	-0.0025913
10.0	0.0074938	-0.009083
12.5	0.0041317	-0.0043691
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</tableData>
            <tableData breakPoint="0.0">
 	-3.0	3.0
-5.0	-0.0041884	0.0051244
0.0	-6.8107E-4	0.0015302
2.0	7.0612E-4	1.5611E-4
4.0	0.0020949	-0.0012014
6.0	0.0034661	-0.002548
10.0	0.0052381	-0.0046064
12.5	0.0070638	-0.0059437
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</tableData>
            <tableData breakPoint="10.0">
 	-3.0	3.0
-5.0	-0.0040625	0.0049679
0.0	-5.2812E-4	0.0013744
2.0	8.9021E-4	-5.1747E-6
4.0	0.0022917	-0.0013309
6.0	0.004012	-0.0025913
10.0	0.0074938	-0.009083
12.5	0.0041317	-0.0043691
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</tableData>
         </table>
      </function>
      <function name="aero/function/flap_inner_x_coeff_basic_Reynolds3_Mach_1">
         <description>x_coefficient as function of flap_inner_deflection, alpha, beta, fixed Reynolds = 4.48073003136E7fixed Mach = 0.6</description>
         <table>
            <independentVar lookup="row">aero/alpha-deg</independentVar>
            <independentVar lookup="column">fcs/flap-pos-deg</independentVar>
            <independentVar lookup="table">aero/beta-deg</independentVar>
            <tableData breakPoint="-10.0">
 	-3.0	3.0
-5.0	-0.0040625	0.0049679
0.0	-5.2812E-4	0.0013744
2.0	8.9021E-4	-5.1747E-6
4.0	0.0022917	-0.0013309
6.0	0.004012	-0.0025913
10.0	0.0074938	-0.009083
12.5	0.0041317	-0.0043691
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</tableData>
            <tableData breakPoint="0.0">
 	-3.0	3.0
-5.0	-0.0041884	0.0051244
0.0	-6.8107E-4	0.0015302
2.0	7.0612E-4	1.5611E-4
4.0	0.0020949	-0.0012014
6.0	0.0034661	-0.002548
10.0	0.0052381	-0.0046064
12.5	0.0070638	-0.0059437
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</tableData>
            <tableData breakPoint="10.0">
 	-3.0	3.0
-5.0	-0.0040625	0.0049679
0.0	-5.2812E-4	0.0013744
2.0	8.9021E-4	-5.1747E-6
4.0	0.0022917	-0.0013309
6.0	0.004012	-0.0025913
10.0	0.0074938	-0.009083
12.5	0.0041317	-0.0043691
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</tableData>
         </table>
      </function>
      <function name="aero/function/flap_inner_x_coeff_basic_Reynolds0_Mach_2">
         <description>x_coefficient as function of flap_inner_deflection, alpha, beta, fixed Reynolds = 1.12018250784E7fixed Mach = 0.78</description>
         <table>
            <independentVar lookup="row">aero/alpha-deg</independentVar>
            <independentVar lookup="column">fcs/flap-pos-deg</independentVar>
            <independentVar lookup="table">aero/beta-deg</independentVar>
            <tableData breakPoint="-10.0">
 	-3.0	3.0
-5.0	-0.0051936	0.006351
0.0	-6.7515E-4	0.001757
2.0	0.0011381	-6.6154E-6
4.0	0.0029297	-0.0017014
6.0	0.0051289	-0.0033127
10.0	0.0095801	-0.011612
12.5	0.005282	-0.0055855
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</tableData>
            <tableData breakPoint="0.0">
 	-3.0	3.0
-5.0	-0.0053545	0.0065511
0.0	-8.7068E-4	0.0019562
2.0	9.0271E-4	1.9957E-4
4.0	0.0026782	-0.0015359
6.0	0.0044311	-0.0032574
10.0	0.0066964	-0.0058889
12.5	0.0090304	-0.0075985
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</tableData>
            <tableData breakPoint="10.0">
 	-3.0	3.0
-5.0	-0.0051936	0.006351
0.0	-6.7515E-4	0.001757
2.0	0.0011381	-6.6154E-6
4.0	0.0029297	-0.0017014
6.0	0.0051289	-0.0033127
10.0	0.0095801	-0.011612
12.5	0.005282	-0.0055855
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</tableData>
         </table>
      </function>
      <function name="aero/function/flap_inner_x_coeff_basic_Reynolds1_Mach_2">
         <description>x_coefficient as function of flap_inner_deflection, alpha, beta, fixed Reynolds = 3.36054752352E7fixed Mach = 0.78</description>
         <table>
            <independentVar lookup="row">aero/alpha-deg</independentVar>
            <independentVar lookup="column">fcs/flap-pos-deg</independentVar>
            <independentVar lookup="table">aero/beta-deg</independentVar>
            <tableData breakPoint="-10.0">
 	-3.0	3.0
-5.0	-0.0051936	0.006351
0.0	-6.7515E-4	0.001757
2.0	0.0011381	-6.6154E-6
4.0	0.0029297	-0.0017014
6.0	0.0051289	-0.0033127
10.0	0.0095801	-0.011612
12.5	0.005282	-0.0055855
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</tableData>
            <tableData breakPoint="0.0">
 	-3.0	3.0
-5.0	-0.0053545	0.0065511
0.0	-8.7068E-4	0.0019562
2.0	9.0271E-4	1.9957E-4
4.0	0.0026782	-0.0015359
6.0	0.0044311	-0.0032574
10.0	0.0066964	-0.0058889
12.5	0.0090304	-0.0075985
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</tableData>
            <tableData breakPoint="10.0">
 	-3.0	3.0
-5.0	-0.0051936	0.006351
0.0	-6.7515E-4	0.001757
2.0	0.0011381	-6.6154E-6
4.0	0.0029297	-0.0017014
6.0	0.0051289	-0.0033127
10.0	0.0095801	-0.011612
12.5	0.005282	-0.0055855
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</tableData>
         </table>
      </function>
      <function name="aero/function/flap_inner_x_coeff_basic_Reynolds2_Mach_2">
         <description>x_coefficient as function of flap_inner_deflection, alpha, beta, fixed Reynolds = 4.36871178058E7fixed Mach = 0.78</description>
         <table>
            <independentVar lookup="row">aero/alpha-deg</independentVar>
            <independentVar lookup="column">fcs/flap-pos-deg</independentVar>
            <independentVar lookup="table">aero/beta-deg</independentVar>
            <tableData breakPoint="-10.0">
 	-3.0	3.0
-5.0	-0.0051936	0.006351
0.0	-6.7515E-4	0.001757
2.0	0.0011381	-6.6154E-6
4.0	0.0029297	-0.0017014
6.0	0.0051289	-0.0033127
10.0	0.0095801	-0.011612
12.5	0.005282	-0.0055855
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</tableData>
            <tableData breakPoint="0.0">
 	-3.0	3.0
-5.0	-0.0053545	0.0065511
0.0	-8.7068E-4	0.0019562
2.0	9.0271E-4	1.9957E-4
4.0	0.0026782	-0.0015359
6.0	0.0044311	-0.0032574
10.0	0.0066964	-0.0058889
12.5	0.0090304	-0.0075985
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</tableData>
            <tableData breakPoint="10.0">
 	-3.0	3.0
-5.0	-0.0051936	0.006351
0.0	-6.7515E-4	0.001757
2.0	0.0011381	-6.6154E-6
4.0	0.0029297	-0.0017014
6.0	0.0051289	-0.0033127
10.0	0.0095801	-0.011612
12.5	0.005282	-0.0055855
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</tableData>
         </table>
      </function>
      <function name="aero/function/flap_inner_x_coeff_basic_Reynolds3_Mach_2">
         <description>x_coefficient as function of flap_inner_deflection, alpha, beta, fixed Reynolds = 4.48073003136E7fixed Mach = 0.78</description>
         <table>
            <independentVar lookup="row">aero/alpha-deg</independentVar>
            <independentVar lookup="column">fcs/flap-pos-deg</independentVar>
            <independentVar lookup="table">aero/beta-deg</independentVar>
            <tableData breakPoint="-10.0">
 	-3.0	3.0
-5.0	-0.0051936	0.006351
0.0	-6.7515E-4	0.001757
2.0	0.0011381	-6.6154E-6
4.0	0.0029297	-0.0017014
6.0	0.0051289	-0.0033127
10.0	0.0095801	-0.011612
12.5	0.005282	-0.0055855
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</tableData>
            <tableData breakPoint="0.0">
 	-3.0	3.0
-5.0	-0.0053545	0.0065511
0.0	-8.7068E-4	0.0019562
2.0	9.0271E-4	1.9957E-4
4.0	0.0026782	-0.0015359
6.0	0.0044311	-0.0032574
10.0	0.0066964	-0.0058889
12.5	0.0090304	-0.0075985
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</tableData>
            <tableData breakPoint="10.0">
 	-3.0	3.0
-5.0	-0.0051936	0.006351
0.0	-6.7515E-4	0.001757
2.0	0.0011381	-6.6154E-6
4.0	0.0029297	-0.0017014
6.0	0.0051289	-0.0033127
10.0	0.0095801	-0.011612
12.5	0.005282	-0.0055855
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</tableData>
         </table>
      </function>
      <function name="aero/function/flap_inner_x_coeff_basic_Reynolds0_Mach_3">
         <description>x_coefficient as function of flap_inner_deflection, alpha, beta, fixed Reynolds = 1.12018250784E7fixed Mach = 0.8</description>
         <table>
            <independentVar lookup="row">aero/alpha-deg</independentVar>
            <independentVar lookup="column">fcs/flap-pos-deg</independentVar>
            <independentVar lookup="table">aero/beta-deg</independentVar>
            <tableData breakPoint="-10.0">
 	-3.0	3.0
-5.0	-0.0054167	0.0066239
0.0	-7.0416E-4	0.0018325
2.0	0.001187	-6.8996E-6
4.0	0.0030556	-0.0017745
6.0	0.0053493	-0.0034551
10.0	0.0099917	-0.012111
12.5	0.0055089	-0.0058254
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</tableData>
            <tableData breakPoint="0.0">
 	-3.0	3.0
-5.0	-0.0055846	0.0068325
0.0	-9.0809E-4	0.0020403
2.0	9.415E-4	2.0814E-4
4.0	0.0027932	-0.0016018
6.0	0.0046215	-0.0033973
10.0	0.0069841	-0.0061419
12.5	0.0094184	-0.0079249
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</tableData>
            <tableData breakPoint="10.0">
 	-3.0	3.0
-5.0	-0.0054167	0.0066239
0.0	-7.0416E-4	0.0018325
2.0	0.001187	-6.8996E-6
4.0	0.0030556	-0.0017745
6.0	0.0053493	-0.0034551
10.0	0.0099917	-0.012111
12.5	0.0055089	-0.0058254
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</tableData>
         </table>
      </function>
      <function name="aero/function/flap_inner_x_coeff_basic_Reynolds1_Mach_3">
         <description>x_coefficient as function of flap_inner_deflection, alpha, beta, fixed Reynolds = 3.36054752352E7fixed Mach = 0.8</description>
         <table>
            <independentVar lookup="row">aero/alpha-deg</independentVar>
            <independentVar lookup="column">fcs/flap-pos-deg</independentVar>
            <independentVar lookup="table">aero/beta-deg</independentVar>
            <tableData breakPoint="-10.0">
 	-3.0	3.0
-5.0	-0.0054167	0.0066239
0.0	-7.0416E-4	0.0018325
2.0	0.001187	-6.8996E-6
4.0	0.0030556	-0.0017745
6.0	0.0053493	-0.0034551
10.0	0.0099917	-0.012111
12.5	0.0055089	-0.0058254
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</tableData>
            <tableData breakPoint="0.0">
 	-3.0	3.0
-5.0	-0.0055846	0.0068325
0.0	-9.0809E-4	0.0020403
2.0	9.415E-4	2.0814E-4
4.0	0.0027932	-0.0016018
6.0	0.0046215	-0.0033973
10.0	0.0069841	-0.0061419
12.5	0.0094184	-0.0079249
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</tableData>
            <tableData breakPoint="10.0">
 	-3.0	3.0
-5.0	-0.0054167	0.0066239
0.0	-7.0416E-4	0.0018325
2.0	0.001187	-6.8996E-6
4.0	0.0030556	-0.0017745
6.0	0.0053493	-0.0034551
10.0	0.0099917	-0.012111
12.5	0.0055089	-0.0058254
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</tableData>
         </table>
      </function>
      <function name="aero/function/flap_inner_x_coeff_basic_Reynolds2_Mach_3">
         <description>x_coefficient as function of flap_inner_deflection, alpha, beta, fixed Reynolds = 4.36871178058E7fixed Mach = 0.8</description>
         <table>
            <independentVar lookup="row">aero/alpha-deg</independentVar>
            <independentVar lookup="column">fcs/flap-pos-deg</independentVar>
            <independentVar lookup="table">aero/beta-deg</independentVar>
            <tableData breakPoint="-10.0">
 	-3.0	3.0
-5.0	-0.0054167	0.0066239
0.0	-7.0416E-4	0.0018325
2.0	0.001187	-6.8996E-6
4.0	0.0030556	-0.0017745
6.0	0.0053493	-0.0034551
10.0	0.0099917	-0.012111
12.5	0.0055089	-0.0058254
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</tableData>
            <tableData breakPoint="0.0">
 	-3.0	3.0
-5.0	-0.0055846	0.0068325
0.0	-9.0809E-4	0.0020403
2.0	9.415E-4	2.0814E-4
4.0	0.0027932	-0.0016018
6.0	0.0046215	-0.0033973
10.0	0.0069841	-0.0061419
12.5	0.0094184	-0.0079249
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</tableData>
            <tableData breakPoint="10.0">
 	-3.0	3.0
-5.0	-0.0054167	0.0066239
0.0	-7.0416E-4	0.0018325
2.0	0.001187	-6.8996E-6
4.0	0.0030556	-0.0017745
6.0	0.0053493	-0.0034551
10.0	0.0099917	-0.012111
12.5	0.0055089	-0.0058254
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</tableData>
         </table>
      </function>
      <function name="aero/function/flap_inner_x_coeff_basic_Reynolds3_Mach_3">
         <description>x_coefficient as function of flap_inner_deflection, alpha, beta, fixed Reynolds = 4.48073003136E7fixed Mach = 0.8</description>
         <table>
            <independentVar lookup="row">aero/alpha-deg</independentVar>
            <independentVar lookup="column">fcs/flap-pos-deg</independentVar>
            <independentVar lookup="table">aero/beta-deg</independentVar>
            <tableData breakPoint="-10.0">
 	-3.0	3.0
-5.0	-0.0054167	0.0066239
0.0	-7.0416E-4	0.0018325
2.0	0.001187	-6.8996E-6
4.0	0.0030556	-0.0017745
6.0	0.0053493	-0.0034551
10.0	0.0099917	-0.012111
12.5	0.0055089	-0.0058254
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</tableData>
            <tableData breakPoint="0.0">
 	-3.0	3.0
-5.0	-0.0055846	0.0068325
0.0	-9.0809E-4	0.0020403
2.0	9.415E-4	2.0814E-4
4.0	0.0027932	-0.0016018
6.0	0.0046215	-0.0033973
10.0	0.0069841	-0.0061419
12.5	0.0094184	-0.0079249
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</tableData>
            <tableData breakPoint="10.0">
 	-3.0	3.0
-5.0	-0.0054167	0.0066239
0.0	-7.0416E-4	0.0018325
2.0	0.001187	-6.8996E-6
4.0	0.0030556	-0.0017745
6.0	0.0053493	-0.0034551
10.0	0.0099917	-0.012111
12.5	0.0055089	-0.0058254
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</tableData>
         </table>
      </function>
      <function name="aero/function/flap_inner_x_coeff_basic_deflection_Mach_0">
         <description>x_coefficient as function of flap_inner_deflection, alpha, beta, Reynolds, fixed Mach = 0.2</description>
         <interpolate1d>
            <p>aero/Re</p>
            <v>11201825.0784</v>
            <p>aero/function/flap_inner_x_coeff_basic_Reynolds0_Mach_0</p>
            <v>33605475.2352</v>
            <p>aero/function/flap_inner_x_coeff_basic_Reynolds1_Mach_0</p>
            <v>43687117.8058</v>
            <p>aero/function/flap_inner_x_coeff_basic_Reynolds2_Mach_0</p>
            <v>44807300.3136</v>
            <p>aero/function/flap_inner_x_coeff_basic_Reynolds3_Mach_0</p>
         </interpolate1d>
      </function>
      <function name="aero/function/flap_inner_x_coeff_basic_deflection_Mach_1">
         <description>x_coefficient as function of flap_inner_deflection, alpha, beta, Reynolds, fixed Mach = 0.6</description>
         <interpolate1d>
            <p>aero/Re</p>
            <v>11201825.0784</v>
            <p>aero/function/flap_inner_x_coeff_basic_Reynolds0_Mach_1</p>
            <v>33605475.2352</v>
            <p>aero/function/flap_inner_x_coeff_basic_Reynolds1_Mach_1</p>
            <v>43687117.8058</v>
            <p>aero/function/flap_inner_x_coeff_basic_Reynolds2_Mach_1</p>
            <v>44807300.3136</v>
            <p>aero/function/flap_inner_x_coeff_basic_Reynolds3_Mach_1</p>
         </interpolate1d>
      </function>
      <function name="aero/function/flap_inner_x_coeff_basic_deflection_Mach_2">
         <description>x_coefficient as function of flap_inner_deflection, alpha, beta, Reynolds, fixed Mach = 0.78</description>
         <interpolate1d>
            <p>aero/Re</p>
            <v>11201825.0784</v>
            <p>aero/function/flap_inner_x_coeff_basic_Reynolds0_Mach_2</p>
            <v>33605475.2352</v>
            <p>aero/function/flap_inner_x_coeff_basic_Reynolds1_Mach_2</p>
            <v>43687117.8058</v>
            <p>aero/function/flap_inner_x_coeff_basic_Reynolds2_Mach_2</p>
            <v>44807300.3136</v>
            <p>aero/function/flap_inner_x_coeff_basic_Reynolds3_Mach_2</p>
         </interpolate1d>
      </function>
      <function name="aero/function/flap_inner_x_coeff_basic_deflection_Mach_3">
         <description>x_coefficient as function of flap_inner_deflection, alpha, beta, Reynolds, fixed Mach = 0.8</description>
         <interpolate1d>
            <p>aero/Re</p>
            <v>11201825.0784</v>
            <p>aero/function/flap_inner_x_coeff_basic_Reynolds0_Mach_3</p>
            <v>33605475.2352</v>
            <p>aero/function/flap_inner_x_coeff_basic_Reynolds1_Mach_3</p>
            <v>43687117.8058</v>
            <p>aero/function/flap_inner_x_coeff_basic_Reynolds2_Mach_3</p>
            <v>44807300.3136</v>
            <p>aero/function/flap_inner_x_coeff_basic_Reynolds3_Mach_3</p>
         </interpolate1d>
      </function>
      <function name="aero/function/flap_inner_x_coeff_basic_Mach">
         <description>x_coefficient as function of flap_inner_deflection, alpha, beta, Reynolds, Mach </description>
         <interpolate1d>
            <p>velocities/mach</p>
            <v>0.2000</v>
            <p>aero/function/flap_inner_x_coeff_basic_deflection_Mach_0</p>
            <v>0.6000</v>
            <p>aero/function/flap_inner_x_coeff_basic_deflection_Mach_1</p>
            <v>0.7800</v>
            <p>aero/function/flap_inner_x_coeff_basic_deflection_Mach_2</p>
            <v>0.8000</v>
            <p>aero/function/flap_inner_x_coeff_basic_deflection_Mach_3</p>
         </interpolate1d>
      </function>
      <function name="aero/function/flap_inner_y_coeff_basic_Reynolds0_Mach_0">
         <description>y_coefficient as function of flap_inner_deflection, alpha, beta, fixed Reynolds = 1.12018250784E7fixed Mach = 0.2</description>
         <table>
            <independentVar lookup="row">aero/alpha-deg</independentVar>
            <independentVar lookup="column">fcs/flap-pos-deg</independentVar>
            <independentVar lookup="table">aero/beta-deg</independentVar>
            <tableData breakPoint="-10.0">
 	-3.0	3.0
-5.0	3.3525E-4	-4.0254E-4
0.0	5.8159E-4	-6.2085E-4
2.0	7.1898E-4	-7.2695E-4
4.0	8.2633E-4	-7.7492E-4
6.0	0.0018015	-6.9372E-4
10.0	-0.0017258	-6.3811E-5
12.5	-0.0081493	0.0080183
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</tableData>
            <tableData breakPoint="0.0">
 	-3.0	3.0
-5.0	-1.5792E-10	1.7555E-10
0.0	-2.1817E-10	2.485E-10
2.0	-2.0996E-10	2.4135E-10
4.0	-1.0245E-10	1.1819E-10
6.0	-4.1352E-10	3.0033E-10
10.0	-5.5483E-9	6.2526E-9
12.5	-4.6427E-9	5.9903E-9
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</tableData>
            <tableData breakPoint="10.0">
 	-3.0	3.0
-5.0	3.3525E-4	-4.0254E-4
0.0	5.8159E-4	-6.2085E-4
2.0	7.1898E-4	-7.2695E-4
4.0	8.2633E-4	-7.7492E-4
6.0	0.0018015	-6.9372E-4
10.0	-0.0017258	-6.3811E-5
12.5	-0.0081493	0.0080183
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</tableData>
         </table>
      </function>
      <function name="aero/function/flap_inner_y_coeff_basic_Reynolds1_Mach_0">
         <description>y_coefficient as function of flap_inner_deflection, alpha, beta, fixed Reynolds = 3.36054752352E7fixed Mach = 0.2</description>
         <table>
            <independentVar lookup="row">aero/alpha-deg</independentVar>
            <independentVar lookup="column">fcs/flap-pos-deg</independentVar>
            <independentVar lookup="table">aero/beta-deg</independentVar>
            <tableData breakPoint="-10.0">
 	-3.0	3.0
-5.0	3.3525E-4	-4.0254E-4
0.0	5.8159E-4	-6.2085E-4
2.0	7.1898E-4	-7.2695E-4
4.0	8.2633E-4	-7.7492E-4
6.0	0.0018015	-6.9372E-4
10.0	-0.0017258	-6.3811E-5
12.5	-0.0081493	0.0080183
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</tableData>
            <tableData breakPoint="0.0">
 	-3.0	3.0
-5.0	-1.5792E-10	1.7555E-10
0.0	-2.1817E-10	2.485E-10
2.0	-2.0996E-10	2.4135E-10
4.0	-1.0245E-10	1.1819E-10
6.0	-4.1352E-10	3.0033E-10
10.0	-5.5483E-9	6.2526E-9
12.5	-4.6427E-9	5.9903E-9
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</tableData>
            <tableData breakPoint="10.0">
 	-3.0	3.0
-5.0	3.3525E-4	-4.0254E-4
0.0	5.8159E-4	-6.2085E-4
2.0	7.1898E-4	-7.2695E-4
4.0	8.2633E-4	-7.7492E-4
6.0	0.0018015	-6.9372E-4
10.0	-0.0017258	-6.3811E-5
12.5	-0.0081493	0.0080183
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</tableData>
         </table>
      </function>
      <function name="aero/function/flap_inner_y_coeff_basic_Reynolds2_Mach_0">
         <description>y_coefficient as function of flap_inner_deflection, alpha, beta, fixed Reynolds = 4.36871178058E7fixed Mach = 0.2</description>
         <table>
            <independentVar lookup="row">aero/alpha-deg</independentVar>
            <independentVar lookup="column">fcs/flap-pos-deg</independentVar>
            <independentVar lookup="table">aero/beta-deg</independentVar>
            <tableData breakPoint="-10.0">
 	-3.0	3.0
-5.0	3.3525E-4	-4.0254E-4
0.0	5.8159E-4	-6.2085E-4
2.0	7.1898E-4	-7.2695E-4
4.0	8.2633E-4	-7.7492E-4
6.0	0.0018015	-6.9372E-4
10.0	-0.0017258	-6.3811E-5
12.5	-0.0081493	0.0080183
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</tableData>
            <tableData breakPoint="0.0">
 	-3.0	3.0
-5.0	-1.5792E-10	1.7555E-10
0.0	-2.1817E-10	2.485E-10
2.0	-2.0996E-10	2.4135E-10
4.0	-1.0245E-10	1.1819E-10
6.0	-4.1352E-10	3.0033E-10
10.0	-5.5483E-9	6.2526E-9
12.5	-4.6427E-9	5.9903E-9
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</tableData>
            <tableData breakPoint="10.0">
 	-3.0	3.0
-5.0	3.3525E-4	-4.0254E-4
0.0	5.8159E-4	-6.2085E-4
2.0	7.1898E-4	-7.2695E-4
4.0	8.2633E-4	-7.7492E-4
6.0	0.0018015	-6.9372E-4
10.0	-0.0017258	-6.3811E-5
12.5	-0.0081493	0.0080183
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</tableData>
         </table>
      </function>
      <function name="aero/function/flap_inner_y_coeff_basic_Reynolds3_Mach_0">
         <description>y_coefficient as function of flap_inner_deflection, alpha, beta, fixed Reynolds = 4.48073003136E7fixed Mach = 0.2</description>
         <table>
            <independentVar lookup="row">aero/alpha-deg</independentVar>
            <independentVar lookup="column">fcs/flap-pos-deg</independentVar>
            <independentVar lookup="table">aero/beta-deg</independentVar>
            <tableData breakPoint="-10.0">
 	-3.0	3.0
-5.0	3.3525E-4	-4.0254E-4
0.0	5.8159E-4	-6.2085E-4
2.0	7.1898E-4	-7.2695E-4
4.0	8.2633E-4	-7.7492E-4
6.0	0.0018015	-6.9372E-4
10.0	-0.0017258	-6.3811E-5
12.5	-0.0081493	0.0080183
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</tableData>
            <tableData breakPoint="0.0">
 	-3.0	3.0
-5.0	-1.5792E-10	1.7555E-10
0.0	-2.1817E-10	2.485E-10
2.0	-2.0996E-10	2.4135E-10
4.0	-1.0245E-10	1.1819E-10
6.0	-4.1352E-10	3.0033E-10
10.0	-5.5483E-9	6.2526E-9
12.5	-4.6427E-9	5.9903E-9
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</tableData>
            <tableData breakPoint="10.0">
 	-3.0	3.0
-5.0	3.3525E-4	-4.0254E-4
0.0	5.8159E-4	-6.2085E-4
2.0	7.1898E-4	-7.2695E-4
4.0	8.2633E-4	-7.7492E-4
6.0	0.0018015	-6.9372E-4
10.0	-0.0017258	-6.3811E-5
12.5	-0.0081493	0.0080183
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</tableData>
         </table>
      </function>
      <function name="aero/function/flap_inner_y_coeff_basic_Reynolds0_Mach_1">
         <description>y_coefficient as function of flap_inner_deflection, alpha, beta, fixed Reynolds = 1.12018250784E7fixed Mach = 0.6</description>
         <table>
            <independentVar lookup="row">aero/alpha-deg</independentVar>
            <independentVar lookup="column">fcs/flap-pos-deg</independentVar>
            <independentVar lookup="table">aero/beta-deg</independentVar>
            <tableData breakPoint="-10.0">
 	-3.0	3.0
-5.0	4.1059E-4	-4.9301E-4
0.0	7.123E-4	-7.6038E-4
2.0	8.8057E-4	-8.9033E-4
4.0	0.001012	-9.4908E-4
6.0	0.0022063	-8.4963E-4
10.0	-0.0021137	-7.8152E-5
12.5	-0.0099808	0.0098203
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</tableData>
            <tableData breakPoint="0.0">
 	-3.0	3.0
-5.0	-1.9342E-10	2.15E-10
0.0	-2.672E-10	3.0435E-10
2.0	-2.5715E-10	2.9559E-10
4.0	-1.2547E-10	1.4475E-10
6.0	-5.0646E-10	3.6782E-10
10.0	-6.7952E-9	7.6579E-9
12.5	-5.6861E-9	7.3366E-9
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</tableData>
            <tableData breakPoint="10.0">
 	-3.0	3.0
-5.0	4.1059E-4	-4.9301E-4
0.0	7.123E-4	-7.6038E-4
2.0	8.8057E-4	-8.9033E-4
4.0	0.001012	-9.4908E-4
6.0	0.0022063	-8.4963E-4
10.0	-0.0021137	-7.8152E-5
12.5	-0.0099808	0.0098203
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</tableData>
         </table>
      </function>
      <function name="aero/function/flap_inner_y_coeff_basic_Reynolds1_Mach_1">
         <description>y_coefficient as function of flap_inner_deflection, alpha, beta, fixed Reynolds = 3.36054752352E7fixed Mach = 0.6</description>
         <table>
            <independentVar lookup="row">aero/alpha-deg</independentVar>
            <independentVar lookup="column">fcs/flap-pos-deg</independentVar>
            <independentVar lookup="table">aero/beta-deg</independentVar>
            <tableData breakPoint="-10.0">
 	-3.0	3.0
-5.0	4.1059E-4	-4.9301E-4
0.0	7.123E-4	-7.6038E-4
2.0	8.8057E-4	-8.9033E-4
4.0	0.001012	-9.4908E-4
6.0	0.0022063	-8.4963E-4
10.0	-0.0021137	-7.8152E-5
12.5	-0.0099808	0.0098203
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</tableData>
            <tableData breakPoint="0.0">
 	-3.0	3.0
-5.0	-1.9342E-10	2.15E-10
0.0	-2.672E-10	3.0435E-10
2.0	-2.5715E-10	2.9559E-10
4.0	-1.2547E-10	1.4475E-10
6.0	-5.0646E-10	3.6782E-10
10.0	-6.7952E-9	7.6579E-9
12.5	-5.6861E-9	7.3366E-9
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</tableData>
            <tableData breakPoint="10.0">
 	-3.0	3.0
-5.0	4.1059E-4	-4.9301E-4
0.0	7.123E-4	-7.6038E-4
2.0	8.8057E-4	-8.9033E-4
4.0	0.001012	-9.4908E-4
6.0	0.0022063	-8.4963E-4
10.0	-0.0021137	-7.8152E-5
12.5	-0.0099808	0.0098203
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</tableData>
         </table>
      </function>
      <function name="aero/function/flap_inner_y_coeff_basic_Reynolds2_Mach_1">
         <description>y_coefficient as function of flap_inner_deflection, alpha, beta, fixed Reynolds = 4.36871178058E7fixed Mach = 0.6</description>
         <table>
            <independentVar lookup="row">aero/alpha-deg</independentVar>
            <independentVar lookup="column">fcs/flap-pos-deg</independentVar>
            <independentVar lookup="table">aero/beta-deg</independentVar>
            <tableData breakPoint="-10.0">
 	-3.0	3.0
-5.0	4.1059E-4	-4.9301E-4
0.0	7.123E-4	-7.6038E-4
2.0	8.8057E-4	-8.9033E-4
4.0	0.001012	-9.4908E-4
6.0	0.0022063	-8.4963E-4
10.0	-0.0021137	-7.8152E-5
12.5	-0.0099808	0.0098203
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</tableData>
            <tableData breakPoint="0.0">
 	-3.0	3.0
-5.0	-1.9342E-10	2.15E-10
0.0	-2.672E-10	3.0435E-10
2.0	-2.5715E-10	2.9559E-10
4.0	-1.2547E-10	1.4475E-10
6.0	-5.0646E-10	3.6782E-10
10.0	-6.7952E-9	7.6579E-9
12.5	-5.6861E-9	7.3366E-9
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</tableData>
            <tableData breakPoint="10.0">
 	-3.0	3.0
-5.0	4.1059E-4	-4.9301E-4
0.0	7.123E-4	-7.6038E-4
2.0	8.8057E-4	-8.9033E-4
4.0	0.001012	-9.4908E-4
6.0	0.0022063	-8.4963E-4
10.0	-0.0021137	-7.8152E-5
12.5	-0.0099808	0.0098203
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</tableData>
         </table>
      </function>
      <function name="aero/function/flap_inner_y_coeff_basic_Reynolds3_Mach_1">
         <description>y_coefficient as function of flap_inner_deflection, alpha, beta, fixed Reynolds = 4.48073003136E7fixed Mach = 0.6</description>
         <table>
            <independentVar lookup="row">aero/alpha-deg</independentVar>
            <independentVar lookup="column">fcs/flap-pos-deg</independentVar>
            <independentVar lookup="table">aero/beta-deg</independentVar>
            <tableData breakPoint="-10.0">
 	-3.0	3.0
-5.0	4.1059E-4	-4.9301E-4
0.0	7.123E-4	-7.6038E-4
2.0	8.8057E-4	-8.9033E-4
4.0	0.001012	-9.4908E-4
6.0	0.0022063	-8.4963E-4
10.0	-0.0021137	-7.8152E-5
12.5	-0.0099808	0.0098203
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</tableData>
            <tableData breakPoint="0.0">
 	-3.0	3.0
-5.0	-1.9342E-10	2.15E-10
0.0	-2.672E-10	3.0435E-10
2.0	-2.5715E-10	2.9559E-10
4.0	-1.2547E-10	1.4475E-10
6.0	-5.0646E-10	3.6782E-10
10.0	-6.7952E-9	7.6579E-9
12.5	-5.6861E-9	7.3366E-9
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</tableData>
            <tableData breakPoint="10.0">
 	-3.0	3.0
-5.0	4.1059E-4	-4.9301E-4
0.0	7.123E-4	-7.6038E-4
2.0	8.8057E-4	-8.9033E-4
4.0	0.001012	-9.4908E-4
6.0	0.0022063	-8.4963E-4
10.0	-0.0021137	-7.8152E-5
12.5	-0.0099808	0.0098203
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</tableData>
         </table>
      </function>
      <function name="aero/function/flap_inner_y_coeff_basic_Reynolds0_Mach_2">
         <description>y_coefficient as function of flap_inner_deflection, alpha, beta, fixed Reynolds = 1.12018250784E7fixed Mach = 0.78</description>
         <table>
            <independentVar lookup="row">aero/alpha-deg</independentVar>
            <independentVar lookup="column">fcs/flap-pos-deg</independentVar>
            <independentVar lookup="table">aero/beta-deg</independentVar>
            <tableData breakPoint="-10.0">
 	-3.0	3.0
-5.0	5.249E-4	-6.3026E-4
0.0	9.106E-4	-9.7208E-4
2.0	0.0011257	-0.0011382
4.0	0.0012938	-0.0012133
6.0	0.0028206	-0.0010862
10.0	-0.0027022	-9.991E-5
12.5	-0.012759	0.012554
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</tableData>
            <tableData breakPoint="0.0">
 	-3.0	3.0
-5.0	-2.4726E-10	2.7486E-10
0.0	-3.4159E-10	3.8909E-10
2.0	-3.2874E-10	3.7788E-10
4.0	-1.604E-10	1.8505E-10
6.0	-6.4746E-10	4.7023E-10
10.0	-8.6871E-9	9.7899E-9
12.5	-7.2692E-9	9.3791E-9
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</tableData>
            <tableData breakPoint="10.0">
 	-3.0	3.0
-5.0	5.249E-4	-6.3026E-4
0.0	9.106E-4	-9.7208E-4
2.0	0.0011257	-0.0011382
4.0	0.0012938	-0.0012133
6.0	0.0028206	-0.0010862
10.0	-0.0027022	-9.991E-5
12.5	-0.012759	0.012554
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</tableData>
         </table>
      </function>
      <function name="aero/function/flap_inner_y_coeff_basic_Reynolds1_Mach_2">
         <description>y_coefficient as function of flap_inner_deflection, alpha, beta, fixed Reynolds = 3.36054752352E7fixed Mach = 0.78</description>
         <table>
            <independentVar lookup="row">aero/alpha-deg</independentVar>
            <independentVar lookup="column">fcs/flap-pos-deg</independentVar>
            <independentVar lookup="table">aero/beta-deg</independentVar>
            <tableData breakPoint="-10.0">
 	-3.0	3.0
-5.0	5.249E-4	-6.3026E-4
0.0	9.106E-4	-9.7208E-4
2.0	0.0011257	-0.0011382
4.0	0.0012938	-0.0012133
6.0	0.0028206	-0.0010862
10.0	-0.0027022	-9.991E-5
12.5	-0.012759	0.012554
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</tableData>
            <tableData breakPoint="0.0">
 	-3.0	3.0
-5.0	-2.4726E-10	2.7486E-10
0.0	-3.4159E-10	3.8909E-10
2.0	-3.2874E-10	3.7788E-10
4.0	-1.604E-10	1.8505E-10
6.0	-6.4746E-10	4.7023E-10
10.0	-8.6871E-9	9.7899E-9
12.5	-7.2692E-9	9.3791E-9
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</tableData>
            <tableData breakPoint="10.0">
 	-3.0	3.0
-5.0	5.249E-4	-6.3026E-4
0.0	9.106E-4	-9.7208E-4
2.0	0.0011257	-0.0011382
4.0	0.0012938	-0.0012133
6.0	0.0028206	-0.0010862
10.0	-0.0027022	-9.991E-5
12.5	-0.012759	0.012554
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</tableData>
         </table>
      </function>
      <function name="aero/function/flap_inner_y_coeff_basic_Reynolds2_Mach_2">
         <description>y_coefficient as function of flap_inner_deflection, alpha, beta, fixed Reynolds = 4.36871178058E7fixed Mach = 0.78</description>
         <table>
            <independentVar lookup="row">aero/alpha-deg</independentVar>
            <independentVar lookup="column">fcs/flap-pos-deg</independentVar>
            <independentVar lookup="table">aero/beta-deg</independentVar>
            <tableData breakPoint="-10.0">
 	-3.0	3.0
-5.0	5.249E-4	-6.3026E-4
0.0	9.106E-4	-9.7208E-4
2.0	0.0011257	-0.0011382
4.0	0.0012938	-0.0012133
6.0	0.0028206	-0.0010862
10.0	-0.0027022	-9.991E-5
12.5	-0.012759	0.012554
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</tableData>
            <tableData breakPoint="0.0">
 	-3.0	3.0
-5.0	-2.4726E-10	2.7486E-10
0.0	-3.4159E-10	3.8909E-10
2.0	-3.2874E-10	3.7788E-10
4.0	-1.604E-10	1.8505E-10
6.0	-6.4746E-10	4.7023E-10
10.0	-8.6871E-9	9.7899E-9
12.5	-7.2692E-9	9.3791E-9
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</tableData>
            <tableData breakPoint="10.0">
 	-3.0	3.0
-5.0	5.249E-4	-6.3026E-4
0.0	9.106E-4	-9.7208E-4
2.0	0.0011257	-0.0011382
4.0	0.0012938	-0.0012133
6.0	0.0028206	-0.0010862
10.0	-0.0027022	-9.991E-5
12.5	-0.012759	0.012554
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</tableData>
         </table>
      </function>
      <function name="aero/function/flap_inner_y_coeff_basic_Reynolds3_Mach_2">
         <description>y_coefficient as function of flap_inner_deflection, alpha, beta, fixed Reynolds = 4.48073003136E7fixed Mach = 0.78</description>
         <table>
            <independentVar lookup="row">aero/alpha-deg</independentVar>
            <independentVar lookup="column">fcs/flap-pos-deg</independentVar>
            <independentVar lookup="table">aero/beta-deg</independentVar>
            <tableData breakPoint="-10.0">
 	-3.0	3.0
-5.0	5.249E-4	-6.3026E-4
0.0	9.106E-4	-9.7208E-4
2.0	0.0011257	-0.0011382
4.0	0.0012938	-0.0012133
6.0	0.0028206	-0.0010862
10.0	-0.0027022	-9.991E-5
12.5	-0.012759	0.012554
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</tableData>
            <tableData breakPoint="0.0">
 	-3.0	3.0
-5.0	-2.4726E-10	2.7486E-10
0.0	-3.4159E-10	3.8909E-10
2.0	-3.2874E-10	3.7788E-10
4.0	-1.604E-10	1.8505E-10
6.0	-6.4746E-10	4.7023E-10
10.0	-8.6871E-9	9.7899E-9
12.5	-7.2692E-9	9.3791E-9
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</tableData>
            <tableData breakPoint="10.0">
 	-3.0	3.0
-5.0	5.249E-4	-6.3026E-4
0.0	9.106E-4	-9.7208E-4
2.0	0.0011257	-0.0011382
4.0	0.0012938	-0.0012133
6.0	0.0028206	-0.0010862
10.0	-0.0027022	-9.991E-5
12.5	-0.012759	0.012554
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</tableData>
         </table>
      </function>
      <function name="aero/function/flap_inner_y_coeff_basic_Reynolds0_Mach_3">
         <description>y_coefficient as function of flap_inner_deflection, alpha, beta, fixed Reynolds = 1.12018250784E7fixed Mach = 0.8</description>
         <table>
            <independentVar lookup="row">aero/alpha-deg</independentVar>
            <independentVar lookup="column">fcs/flap-pos-deg</independentVar>
            <independentVar lookup="table">aero/beta-deg</independentVar>
            <tableData breakPoint="-10.0">
 	-3.0	3.0
-5.0	5.4746E-4	-6.5734E-4
0.0	9.4973E-4	-0.0010138
2.0	0.0011741	-0.0011871
4.0	0.0013494	-0.0012654
6.0	0.0029418	-0.0011328
10.0	-0.0028183	-1.042E-4
12.5	-0.013308	0.013094
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</tableData>
            <tableData breakPoint="0.0">
 	-3.0	3.0
-5.0	-2.5789E-10	2.8666E-10
0.0	-3.5626E-10	4.058E-10
2.0	-3.4287E-10	3.9412E-10
4.0	-1.6729E-10	1.93E-10
6.0	-6.7528E-10	4.9043E-10
10.0	-9.0603E-9	1.0211E-8
12.5	-7.5815E-9	9.7821E-9
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</tableData>
            <tableData breakPoint="10.0">
 	-3.0	3.0
-5.0	5.4746E-4	-6.5734E-4
0.0	9.4973E-4	-0.0010138
2.0	0.0011741	-0.0011871
4.0	0.0013494	-0.0012654
6.0	0.0029418	-0.0011328
10.0	-0.0028183	-1.042E-4
12.5	-0.013308	0.013094
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</tableData>
         </table>
      </function>
      <function name="aero/function/flap_inner_y_coeff_basic_Reynolds1_Mach_3">
         <description>y_coefficient as function of flap_inner_deflection, alpha, beta, fixed Reynolds = 3.36054752352E7fixed Mach = 0.8</description>
         <table>
            <independentVar lookup="row">aero/alpha-deg</independentVar>
            <independentVar lookup="column">fcs/flap-pos-deg</independentVar>
            <independentVar lookup="table">aero/beta-deg</independentVar>
            <tableData breakPoint="-10.0">
 	-3.0	3.0
-5.0	5.4746E-4	-6.5734E-4
0.0	9.4973E-4	-0.0010138
2.0	0.0011741	-0.0011871
4.0	0.0013494	-0.0012654
6.0	0.0029418	-0.0011328
10.0	-0.0028183	-1.042E-4
12.5	-0.013308	0.013094
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</tableData>
            <tableData breakPoint="0.0">
 	-3.0	3.0
-5.0	-2.5789E-10	2.8666E-10
0.0	-3.5626E-10	4.058E-10
2.0	-3.4287E-10	3.9412E-10
4.0	-1.6729E-10	1.93E-10
6.0	-6.7528E-10	4.9043E-10
10.0	-9.0603E-9	1.0211E-8
12.5	-7.5815E-9	9.7821E-9
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</tableData>
            <tableData breakPoint="10.0">
 	-3.0	3.0
-5.0	5.4746E-4	-6.5734E-4
0.0	9.4973E-4	-0.0010138
2.0	0.0011741	-0.0011871
4.0	0.0013494	-0.0012654
6.0	0.0029418	-0.0011328
10.0	-0.0028183	-1.042E-4
12.5	-0.013308	0.013094
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</tableData>
         </table>
      </function>
      <function name="aero/function/flap_inner_y_coeff_basic_Reynolds2_Mach_3">
         <description>y_coefficient as function of flap_inner_deflection, alpha, beta, fixed Reynolds = 4.36871178058E7fixed Mach = 0.8</description>
         <table>
            <independentVar lookup="row">aero/alpha-deg</independentVar>
            <independentVar lookup="column">fcs/flap-pos-deg</independentVar>
            <independentVar lookup="table">aero/beta-deg</independentVar>
            <tableData breakPoint="-10.0">
 	-3.0	3.0
-5.0	5.4746E-4	-6.5734E-4
0.0	9.4973E-4	-0.0010138
2.0	0.0011741	-0.0011871
4.0	0.0013494	-0.0012654
6.0	0.0029418	-0.0011328
10.0	-0.0028183	-1.042E-4
12.5	-0.013308	0.013094
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</tableData>
            <tableData breakPoint="0.0">
 	-3.0	3.0
-5.0	-2.5789E-10	2.8666E-10
0.0	-3.5626E-10	4.058E-10
2.0	-3.4287E-10	3.9412E-10
4.0	-1.6729E-10	1.93E-10
6.0	-6.7528E-10	4.9043E-10
10.0	-9.0603E-9	1.0211E-8
12.5	-7.5815E-9	9.7821E-9
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</tableData>
            <tableData breakPoint="10.0">
 	-3.0	3.0
-5.0	5.4746E-4	-6.5734E-4
0.0	9.4973E-4	-0.0010138
2.0	0.0011741	-0.0011871
4.0	0.0013494	-0.0012654
6.0	0.0029418	-0.0011328
10.0	-0.0028183	-1.042E-4
12.5	-0.013308	0.013094
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</tableData>
         </table>
      </function>
      <function name="aero/function/flap_inner_y_coeff_basic_Reynolds3_Mach_3">
         <description>y_coefficient as function of flap_inner_deflection, alpha, beta, fixed Reynolds = 4.48073003136E7fixed Mach = 0.8</description>
         <table>
            <independentVar lookup="row">aero/alpha-deg</independentVar>
            <independentVar lookup="column">fcs/flap-pos-deg</independentVar>
            <independentVar lookup="table">aero/beta-deg</independentVar>
            <tableData breakPoint="-10.0">
 	-3.0	3.0
-5.0	5.4746E-4	-6.5734E-4
0.0	9.4973E-4	-0.0010138
2.0	0.0011741	-0.0011871
4.0	0.0013494	-0.0012654
6.0	0.0029418	-0.0011328
10.0	-0.0028183	-1.042E-4
12.5	-0.013308	0.013094
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</tableData>
            <tableData breakPoint="0.0">
 	-3.0	3.0
-5.0	-2.5789E-10	2.8666E-10
0.0	-3.5626E-10	4.058E-10
2.0	-3.4287E-10	3.9412E-10
4.0	-1.6729E-10	1.93E-10
6.0	-6.7528E-10	4.9043E-10
10.0	-9.0603E-9	1.0211E-8
12.5	-7.5815E-9	9.7821E-9
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</tableData>
            <tableData breakPoint="10.0">
 	-3.0	3.0
-5.0	5.4746E-4	-6.5734E-4
0.0	9.4973E-4	-0.0010138
2.0	0.0011741	-0.0011871
4.0	0.0013494	-0.0012654
6.0	0.0029418	-0.0011328
10.0	-0.0028183	-1.042E-4
12.5	-0.013308	0.013094
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</tableData>
         </table>
      </function>
      <function name="aero/function/flap_inner_y_coeff_basic_deflection_Mach_0">
         <description>y_coefficient as function of flap_inner_deflection, alpha, beta, Reynolds, fixed Mach = 0.2</description>
         <interpolate1d>
            <p>aero/Re</p>
            <v>11201825.0784</v>
            <p>aero/function/flap_inner_y_coeff_basic_Reynolds0_Mach_0</p>
            <v>33605475.2352</v>
            <p>aero/function/flap_inner_y_coeff_basic_Reynolds1_Mach_0</p>
            <v>43687117.8058</v>
            <p>aero/function/flap_inner_y_coeff_basic_Reynolds2_Mach_0</p>
            <v>44807300.3136</v>
            <p>aero/function/flap_inner_y_coeff_basic_Reynolds3_Mach_0</p>
         </interpolate1d>
      </function>
      <function name="aero/function/flap_inner_y_coeff_basic_deflection_Mach_1">
         <description>y_coefficient as function of flap_inner_deflection, alpha, beta, Reynolds, fixed Mach = 0.6</description>
         <interpolate1d>
            <p>aero/Re</p>
            <v>11201825.0784</v>
            <p>aero/function/flap_inner_y_coeff_basic_Reynolds0_Mach_1</p>
            <v>33605475.2352</v>
            <p>aero/function/flap_inner_y_coeff_basic_Reynolds1_Mach_1</p>
            <v>43687117.8058</v>
            <p>aero/function/flap_inner_y_coeff_basic_Reynolds2_Mach_1</p>
            <v>44807300.3136</v>
            <p>aero/function/flap_inner_y_coeff_basic_Reynolds3_Mach_1</p>
         </interpolate1d>
      </function>
      <function name="aero/function/flap_inner_y_coeff_basic_deflection_Mach_2">
         <description>y_coefficient as function of flap_inner_deflection, alpha, beta, Reynolds, fixed Mach = 0.78</description>
         <interpolate1d>
            <p>aero/Re</p>
            <v>11201825.0784</v>
            <p>aero/function/flap_inner_y_coeff_basic_Reynolds0_Mach_2</p>
            <v>33605475.2352</v>
            <p>aero/function/flap_inner_y_coeff_basic_Reynolds1_Mach_2</p>
            <v>43687117.8058</v>
            <p>aero/function/flap_inner_y_coeff_basic_Reynolds2_Mach_2</p>
            <v>44807300.3136</v>
            <p>aero/function/flap_inner_y_coeff_basic_Reynolds3_Mach_2</p>
         </interpolate1d>
      </function>
      <function name="aero/function/flap_inner_y_coeff_basic_deflection_Mach_3">
         <description>y_coefficient as function of flap_inner_deflection, alpha, beta, Reynolds, fixed Mach = 0.8</description>
         <interpolate1d>
            <p>aero/Re</p>
            <v>11201825.0784</v>
            <p>aero/function/flap_inner_y_coeff_basic_Reynolds0_Mach_3</p>
            <v>33605475.2352</v>
            <p>aero/function/flap_inner_y_coeff_basic_Reynolds1_Mach_3</p>
            <v>43687117.8058</v>
            <p>aero/function/flap_inner_y_coeff_basic_Reynolds2_Mach_3</p>
            <v>44807300.3136</v>
            <p>aero/function/flap_inner_y_coeff_basic_Reynolds3_Mach_3</p>
         </interpolate1d>
      </function>
      <function name="aero/function/flap_inner_y_coeff_basic_Mach">
         <description>y_coefficient as function of flap_inner_deflection, alpha, beta, Reynolds, Mach </description>
         <interpolate1d>
            <p>velocities/mach</p>
            <v>0.2000</v>
            <p>aero/function/flap_inner_y_coeff_basic_deflection_Mach_0</p>
            <v>0.6000</v>
            <p>aero/function/flap_inner_y_coeff_basic_deflection_Mach_1</p>
            <v>0.7800</v>
            <p>aero/function/flap_inner_y_coeff_basic_deflection_Mach_2</p>
            <v>0.8000</v>
            <p>aero/function/flap_inner_y_coeff_basic_deflection_Mach_3</p>
         </interpolate1d>
      </function>
      <function name="aero/function/flap_inner_z_coeff_basic_Reynolds0_Mach_0">
         <description>z_coefficient as function of flap_inner_deflection, alpha, beta, fixed Reynolds = 1.12018250784E7fixed Mach = 0.2</description>
         <table>
            <independentVar lookup="row">aero/alpha-deg</independentVar>
            <independentVar lookup="column">fcs/flap-pos-deg</independentVar>
            <independentVar lookup="table">aero/beta-deg</independentVar>
            <tableData breakPoint="-10.0">
 	-3.0	3.0
-5.0	0.05141	-0.051936
0.0	0.05164	-0.050312
2.0	0.051457	-0.049427
4.0	0.051488	-0.048949
6.0	0.066749	-0.061808
10.0	0.046797	-0.043532
12.5	0.048045	-0.043655
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</tableData>
            <tableData breakPoint="0.0">
 	-3.0	3.0
-5.0	-0.05212	0.052735
0.0	-0.051774	0.050778
2.0	-0.051415	0.049879
4.0	-0.050729	0.04877
6.0	-0.049253	0.046954
10.0	-0.045813	0.040817
12.5	-0.049685	0.043666
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</tableData>
            <tableData breakPoint="10.0">
 	-3.0	3.0
-5.0	-0.05141	0.051936
0.0	-0.05164	0.050312
2.0	-0.051457	0.049427
4.0	-0.051488	0.048949
6.0	-0.066749	0.061808
10.0	-0.046797	0.043532
12.5	-0.048045	0.043655
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</tableData>
         </table>
      </function>
      <function name="aero/function/flap_inner_z_coeff_basic_Reynolds1_Mach_0">
         <description>z_coefficient as function of flap_inner_deflection, alpha, beta, fixed Reynolds = 3.36054752352E7fixed Mach = 0.2</description>
         <table>
            <independentVar lookup="row">aero/alpha-deg</independentVar>
            <independentVar lookup="column">fcs/flap-pos-deg</independentVar>
            <independentVar lookup="table">aero/beta-deg</independentVar>
            <tableData breakPoint="-10.0">
 	-3.0	3.0
-5.0	0.05141	-0.051936
0.0	0.05164	-0.050312
2.0	0.051457	-0.049427
4.0	0.051488	-0.048949
6.0	0.066749	-0.061808
10.0	0.046797	-0.043532
12.5	0.048045	-0.043655
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</tableData>
            <tableData breakPoint="0.0">
 	-3.0	3.0
-5.0	-0.05212	0.052735
0.0	-0.051774	0.050778
2.0	-0.051415	0.049879
4.0	-0.050729	0.04877
6.0	-0.049253	0.046954
10.0	-0.045813	0.040817
12.5	-0.049685	0.043666
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</tableData>
            <tableData breakPoint="10.0">
 	-3.0	3.0
-5.0	-0.05141	0.051936
0.0	-0.05164	0.050312
2.0	-0.051457	0.049427
4.0	-0.051488	0.048949
6.0	-0.066749	0.061808
10.0	-0.046797	0.043532
12.5	-0.048045	0.043655
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</tableData>
         </table>
      </function>
      <function name="aero/function/flap_inner_z_coeff_basic_Reynolds2_Mach_0">
         <description>z_coefficient as function of flap_inner_deflection, alpha, beta, fixed Reynolds = 4.36871178058E7fixed Mach = 0.2</description>
         <table>
            <independentVar lookup="row">aero/alpha-deg</independentVar>
            <independentVar lookup="column">fcs/flap-pos-deg</independentVar>
            <independentVar lookup="table">aero/beta-deg</independentVar>
            <tableData breakPoint="-10.0">
 	-3.0	3.0
-5.0	0.05141	-0.051936
0.0	0.05164	-0.050312
2.0	0.051457	-0.049427
4.0	0.051488	-0.048949
6.0	0.066749	-0.061808
10.0	0.046797	-0.043532
12.5	0.048045	-0.043655
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</tableData>
            <tableData breakPoint="0.0">
 	-3.0	3.0
-5.0	-0.05212	0.052735
0.0	-0.051774	0.050778
2.0	-0.051415	0.049879
4.0	-0.050729	0.04877
6.0	-0.049253	0.046954
10.0	-0.045813	0.040817
12.5	-0.049685	0.043666
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</tableData>
            <tableData breakPoint="10.0">
 	-3.0	3.0
-5.0	-0.05141	0.051936
0.0	-0.05164	0.050312
2.0	-0.051457	0.049427
4.0	-0.051488	0.048949
6.0	-0.066749	0.061808
10.0	-0.046797	0.043532
12.5	-0.048045	0.043655
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</tableData>
         </table>
      </function>
      <function name="aero/function/flap_inner_z_coeff_basic_Reynolds3_Mach_0">
         <description>z_coefficient as function of flap_inner_deflection, alpha, beta, fixed Reynolds = 4.48073003136E7fixed Mach = 0.2</description>
         <table>
            <independentVar lookup="row">aero/alpha-deg</independentVar>
            <independentVar lookup="column">fcs/flap-pos-deg</independentVar>
            <independentVar lookup="table">aero/beta-deg</independentVar>
            <tableData breakPoint="-10.0">
 	-3.0	3.0
-5.0	0.05141	-0.051936
0.0	0.05164	-0.050312
2.0	0.051457	-0.049427
4.0	0.051488	-0.048949
6.0	0.066749	-0.061808
10.0	0.046797	-0.043532
12.5	0.048045	-0.043655
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</tableData>
            <tableData breakPoint="0.0">
 	-3.0	3.0
-5.0	-0.05212	0.052735
0.0	-0.051774	0.050778
2.0	-0.051415	0.049879
4.0	-0.050729	0.04877
6.0	-0.049253	0.046954
10.0	-0.045813	0.040817
12.5	-0.049685	0.043666
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</tableData>
            <tableData breakPoint="10.0">
 	-3.0	3.0
-5.0	-0.05141	0.051936
0.0	-0.05164	0.050312
2.0	-0.051457	0.049427
4.0	-0.051488	0.048949
6.0	-0.066749	0.061808
10.0	-0.046797	0.043532
12.5	-0.048045	0.043655
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</tableData>
         </table>
      </function>
      <function name="aero/function/flap_inner_z_coeff_basic_Reynolds0_Mach_1">
         <description>z_coefficient as function of flap_inner_deflection, alpha, beta, fixed Reynolds = 1.12018250784E7fixed Mach = 0.6</description>
         <table>
            <independentVar lookup="row">aero/alpha-deg</independentVar>
            <independentVar lookup="column">fcs/flap-pos-deg</independentVar>
            <independentVar lookup="table">aero/beta-deg</independentVar>
            <tableData breakPoint="-10.0">
 	-3.0	3.0
-5.0	0.062965	-0.063608
0.0	0.063245	-0.06162
2.0	0.063022	-0.060536
4.0	0.06306	-0.05995
6.0	0.081751	-0.075699
10.0	0.057314	-0.053316
12.5	0.058842	-0.053467
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</tableData>
            <tableData breakPoint="0.0">
 	-3.0	3.0
-5.0	-0.063834	0.064587
0.0	-0.06341	0.06219
2.0	-0.06297	0.061089
4.0	-0.06213	0.059731
6.0	-0.060323	0.057506
10.0	-0.05611	0.04999
12.5	-0.060851	0.05348
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</tableData>
            <tableData breakPoint="10.0">
 	-3.0	3.0
-5.0	-0.062965	0.063608
0.0	-0.063245	0.06162
2.0	-0.063022	0.060536
4.0	-0.06306	0.05995
6.0	-0.081751	0.075699
10.0	-0.057314	0.053316
12.5	-0.058842	0.053467
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</tableData>
         </table>
      </function>
      <function name="aero/function/flap_inner_z_coeff_basic_Reynolds1_Mach_1">
         <description>z_coefficient as function of flap_inner_deflection, alpha, beta, fixed Reynolds = 3.36054752352E7fixed Mach = 0.6</description>
         <table>
            <independentVar lookup="row">aero/alpha-deg</independentVar>
            <independentVar lookup="column">fcs/flap-pos-deg</independentVar>
            <independentVar lookup="table">aero/beta-deg</independentVar>
            <tableData breakPoint="-10.0">
 	-3.0	3.0
-5.0	0.062965	-0.063608
0.0	0.063245	-0.06162
2.0	0.063022	-0.060536
4.0	0.06306	-0.05995
6.0	0.081751	-0.075699
10.0	0.057314	-0.053316
12.5	0.058842	-0.053467
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</tableData>
            <tableData breakPoint="0.0">
 	-3.0	3.0
-5.0	-0.063834	0.064587
0.0	-0.06341	0.06219
2.0	-0.06297	0.061089
4.0	-0.06213	0.059731
6.0	-0.060323	0.057506
10.0	-0.05611	0.04999
12.5	-0.060851	0.05348
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</tableData>
            <tableData breakPoint="10.0">
 	-3.0	3.0
-5.0	-0.062965	0.063608
0.0	-0.063245	0.06162
2.0	-0.063022	0.060536
4.0	-0.06306	0.05995
6.0	-0.081751	0.075699
10.0	-0.057314	0.053316
12.5	-0.058842	0.053467
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</tableData>
         </table>
      </function>
      <function name="aero/function/flap_inner_z_coeff_basic_Reynolds2_Mach_1">
         <description>z_coefficient as function of flap_inner_deflection, alpha, beta, fixed Reynolds = 4.36871178058E7fixed Mach = 0.6</description>
         <table>
            <independentVar lookup="row">aero/alpha-deg</independentVar>
            <independentVar lookup="column">fcs/flap-pos-deg</independentVar>
            <independentVar lookup="table">aero/beta-deg</independentVar>
            <tableData breakPoint="-10.0">
 	-3.0	3.0
-5.0	0.062965	-0.063608
0.0	0.063245	-0.06162
2.0	0.063022	-0.060536
4.0	0.06306	-0.05995
6.0	0.081751	-0.075699
10.0	0.057314	-0.053316
12.5	0.058842	-0.053467
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</tableData>
            <tableData breakPoint="0.0">
 	-3.0	3.0
-5.0	-0.063834	0.064587
0.0	-0.06341	0.06219
2.0	-0.06297	0.061089
4.0	-0.06213	0.059731
6.0	-0.060323	0.057506
10.0	-0.05611	0.04999
12.5	-0.060851	0.05348
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</tableData>
            <tableData breakPoint="10.0">
 	-3.0	3.0
-5.0	-0.062965	0.063608
0.0	-0.063245	0.06162
2.0	-0.063022	0.060536
4.0	-0.06306	0.05995
6.0	-0.081751	0.075699
10.0	-0.057314	0.053316
12.5	-0.058842	0.053467
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</tableData>
         </table>
      </function>
      <function name="aero/function/flap_inner_z_coeff_basic_Reynolds3_Mach_1">
         <description>z_coefficient as function of flap_inner_deflection, alpha, beta, fixed Reynolds = 4.48073003136E7fixed Mach = 0.6</description>
         <table>
            <independentVar lookup="row">aero/alpha-deg</independentVar>
            <independentVar lookup="column">fcs/flap-pos-deg</independentVar>
            <independentVar lookup="table">aero/beta-deg</independentVar>
            <tableData breakPoint="-10.0">
 	-3.0	3.0
-5.0	0.062965	-0.063608
0.0	0.063245	-0.06162
2.0	0.063022	-0.060536
4.0	0.06306	-0.05995
6.0	0.081751	-0.075699
10.0	0.057314	-0.053316
12.5	0.058842	-0.053467
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</tableData>
            <tableData breakPoint="0.0">
 	-3.0	3.0
-5.0	-0.063834	0.064587
0.0	-0.06341	0.06219
2.0	-0.06297	0.061089
4.0	-0.06213	0.059731
6.0	-0.060323	0.057506
10.0	-0.05611	0.04999
12.5	-0.060851	0.05348
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</tableData>
            <tableData breakPoint="10.0">
 	-3.0	3.0
-5.0	-0.062965	0.063608
0.0	-0.063245	0.06162
2.0	-0.063022	0.060536
4.0	-0.06306	0.05995
6.0	-0.081751	0.075699
10.0	-0.057314	0.053316
12.5	-0.058842	0.053467
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</tableData>
         </table>
      </function>
      <function name="aero/function/flap_inner_z_coeff_basic_Reynolds0_Mach_2">
         <description>z_coefficient as function of flap_inner_deflection, alpha, beta, fixed Reynolds = 1.12018250784E7fixed Mach = 0.78</description>
         <table>
            <independentVar lookup="row">aero/alpha-deg</independentVar>
            <independentVar lookup="column">fcs/flap-pos-deg</independentVar>
            <independentVar lookup="table">aero/beta-deg</independentVar>
            <tableData breakPoint="-10.0">
 	-3.0	3.0
-5.0	0.080494	-0.081317
0.0	0.080853	-0.078775
2.0	0.080568	-0.07739
4.0	0.080617	-0.076641
6.0	0.10451	-0.096775
10.0	0.073271	-0.06816
12.5	0.075224	-0.068352
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</tableData>
            <tableData breakPoint="0.0">
 	-3.0	3.0
-5.0	-0.081606	0.082568
0.0	-0.081064	0.079505
2.0	-0.080501	0.078096
4.0	-0.079427	0.07636
6.0	-0.077117	0.073517
10.0	-0.071731	0.063908
12.5	-0.077793	0.068369
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</tableData>
            <tableData breakPoint="10.0">
 	-3.0	3.0
-5.0	-0.080494	0.081317
0.0	-0.080853	0.078775
2.0	-0.080568	0.07739
4.0	-0.080617	0.076641
6.0	-0.10451	0.096775
10.0	-0.073271	0.06816
12.5	-0.075224	0.068352
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</tableData>
         </table>
      </function>
      <function name="aero/function/flap_inner_z_coeff_basic_Reynolds1_Mach_2">
         <description>z_coefficient as function of flap_inner_deflection, alpha, beta, fixed Reynolds = 3.36054752352E7fixed Mach = 0.78</description>
         <table>
            <independentVar lookup="row">aero/alpha-deg</independentVar>
            <independentVar lookup="column">fcs/flap-pos-deg</independentVar>
            <independentVar lookup="table">aero/beta-deg</independentVar>
            <tableData breakPoint="-10.0">
 	-3.0	3.0
-5.0	0.080494	-0.081317
0.0	0.080853	-0.078775
2.0	0.080568	-0.07739
4.0	0.080617	-0.076641
6.0	0.10451	-0.096775
10.0	0.073271	-0.06816
12.5	0.075224	-0.068352
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</tableData>
            <tableData breakPoint="0.0">
 	-3.0	3.0
-5.0	-0.081606	0.082568
0.0	-0.081064	0.079505
2.0	-0.080501	0.078096
4.0	-0.079427	0.07636
6.0	-0.077117	0.073517
10.0	-0.071731	0.063908
12.5	-0.077793	0.068369
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</tableData>
            <tableData breakPoint="10.0">
 	-3.0	3.0
-5.0	-0.080494	0.081317
0.0	-0.080853	0.078775
2.0	-0.080568	0.07739
4.0	-0.080617	0.076641
6.0	-0.10451	0.096775
10.0	-0.073271	0.06816
12.5	-0.075224	0.068352
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</tableData>
         </table>
      </function>
      <function name="aero/function/flap_inner_z_coeff_basic_Reynolds2_Mach_2">
         <description>z_coefficient as function of flap_inner_deflection, alpha, beta, fixed Reynolds = 4.36871178058E7fixed Mach = 0.78</description>
         <table>
            <independentVar lookup="row">aero/alpha-deg</independentVar>
            <independentVar lookup="column">fcs/flap-pos-deg</independentVar>
            <independentVar lookup="table">aero/beta-deg</independentVar>
            <tableData breakPoint="-10.0">
 	-3.0	3.0
-5.0	0.080494	-0.081317
0.0	0.080853	-0.078775
2.0	0.080568	-0.07739
4.0	0.080617	-0.076641
6.0	0.10451	-0.096775
10.0	0.073271	-0.06816
12.5	0.075224	-0.068352
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</tableData>
            <tableData breakPoint="0.0">
 	-3.0	3.0
-5.0	-0.081606	0.082568
0.0	-0.081064	0.079505
2.0	-0.080501	0.078096
4.0	-0.079427	0.07636
6.0	-0.077117	0.073517
10.0	-0.071731	0.063908
12.5	-0.077793	0.068369
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</tableData>
            <tableData breakPoint="10.0">
 	-3.0	3.0
-5.0	-0.080494	0.081317
0.0	-0.080853	0.078775
2.0	-0.080568	0.07739
4.0	-0.080617	0.076641
6.0	-0.10451	0.096775
10.0	-0.073271	0.06816
12.5	-0.075224	0.068352
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</tableData>
         </table>
      </function>
      <function name="aero/function/flap_inner_z_coeff_basic_Reynolds3_Mach_2">
         <description>z_coefficient as function of flap_inner_deflection, alpha, beta, fixed Reynolds = 4.48073003136E7fixed Mach = 0.78</description>
         <table>
            <independentVar lookup="row">aero/alpha-deg</independentVar>
            <independentVar lookup="column">fcs/flap-pos-deg</independentVar>
            <independentVar lookup="table">aero/beta-deg</independentVar>
            <tableData breakPoint="-10.0">
 	-3.0	3.0
-5.0	0.080494	-0.081317
0.0	0.080853	-0.078775
2.0	0.080568	-0.07739
4.0	0.080617	-0.076641
6.0	0.10451	-0.096775
10.0	0.073271	-0.06816
12.5	0.075224	-0.068352
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</tableData>
            <tableData breakPoint="0.0">
 	-3.0	3.0
-5.0	-0.081606	0.082568
0.0	-0.081064	0.079505
2.0	-0.080501	0.078096
4.0	-0.079427	0.07636
6.0	-0.077117	0.073517
10.0	-0.071731	0.063908
12.5	-0.077793	0.068369
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</tableData>
            <tableData breakPoint="10.0">
 	-3.0	3.0
-5.0	-0.080494	0.081317
0.0	-0.080853	0.078775
2.0	-0.080568	0.07739
4.0	-0.080617	0.076641
6.0	-0.10451	0.096775
10.0	-0.073271	0.06816
12.5	-0.075224	0.068352
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</tableData>
         </table>
      </function>
      <function name="aero/function/flap_inner_z_coeff_basic_Reynolds0_Mach_3">
         <description>z_coefficient as function of flap_inner_deflection, alpha, beta, fixed Reynolds = 1.12018250784E7fixed Mach = 0.8</description>
         <table>
            <independentVar lookup="row">aero/alpha-deg</independentVar>
            <independentVar lookup="column">fcs/flap-pos-deg</independentVar>
            <independentVar lookup="table">aero/beta-deg</independentVar>
            <tableData breakPoint="-10.0">
 	-3.0	3.0
-5.0	0.083953	-0.084811
0.0	0.084327	-0.08216
2.0	0.08403	-0.080715
4.0	0.08408	-0.079934
6.0	0.109	-0.10093
10.0	0.076419	-0.071088
12.5	0.078456	-0.071289
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</tableData>
            <tableData breakPoint="0.0">
 	-3.0	3.0
-5.0	-0.085112	0.086116
0.0	-0.084547	0.082921
2.0	-0.08396	0.081452
4.0	-0.08284	0.079641
6.0	-0.080431	0.076675
10.0	-0.074813	0.066653
12.5	-0.081135	0.071306
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</tableData>
            <tableData breakPoint="10.0">
 	-3.0	3.0
-5.0	-0.083953	0.084811
0.0	-0.084327	0.08216
2.0	-0.08403	0.080715
4.0	-0.08408	0.079934
6.0	-0.109	0.10093
10.0	-0.076419	0.071088
12.5	-0.078456	0.071289
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</tableData>
         </table>
      </function>
      <function name="aero/function/flap_inner_z_coeff_basic_Reynolds1_Mach_3">
         <description>z_coefficient as function of flap_inner_deflection, alpha, beta, fixed Reynolds = 3.36054752352E7fixed Mach = 0.8</description>
         <table>
            <independentVar lookup="row">aero/alpha-deg</independentVar>
            <independentVar lookup="column">fcs/flap-pos-deg</independentVar>
            <independentVar lookup="table">aero/beta-deg</independentVar>
            <tableData breakPoint="-10.0">
 	-3.0	3.0
-5.0	0.083953	-0.084811
0.0	0.084327	-0.08216
2.0	0.08403	-0.080715
4.0	0.08408	-0.079934
6.0	0.109	-0.10093
10.0	0.076419	-0.071088
12.5	0.078456	-0.071289
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</tableData>
            <tableData breakPoint="0.0">
 	-3.0	3.0
-5.0	-0.085112	0.086116
0.0	-0.084547	0.082921
2.0	-0.08396	0.081452
4.0	-0.08284	0.079641
6.0	-0.080431	0.076675
10.0	-0.074813	0.066653
12.5	-0.081135	0.071306
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</tableData>
            <tableData breakPoint="10.0">
 	-3.0	3.0
-5.0	-0.083953	0.084811
0.0	-0.084327	0.08216
2.0	-0.08403	0.080715
4.0	-0.08408	0.079934
6.0	-0.109	0.10093
10.0	-0.076419	0.071088
12.5	-0.078456	0.071289
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</tableData>
         </table>
      </function>
      <function name="aero/function/flap_inner_z_coeff_basic_Reynolds2_Mach_3">
         <description>z_coefficient as function of flap_inner_deflection, alpha, beta, fixed Reynolds = 4.36871178058E7fixed Mach = 0.8</description>
         <table>
            <independentVar lookup="row">aero/alpha-deg</independentVar>
            <independentVar lookup="column">fcs/flap-pos-deg</independentVar>
            <independentVar lookup="table">aero/beta-deg</independentVar>
            <tableData breakPoint="-10.0">
 	-3.0	3.0
-5.0	0.083953	-0.084811
0.0	0.084327	-0.08216
2.0	0.08403	-0.080715
4.0	0.08408	-0.079934
6.0	0.109	-0.10093
10.0	0.076419	-0.071088
12.5	0.078456	-0.071289
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</tableData>
            <tableData breakPoint="0.0">
 	-3.0	3.0
-5.0	-0.085112	0.086116
0.0	-0.084547	0.082921
2.0	-0.08396	0.081452
4.0	-0.08284	0.079641
6.0	-0.080431	0.076675
10.0	-0.074813	0.066653
12.5	-0.081135	0.071306
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</tableData>
            <tableData breakPoint="10.0">
 	-3.0	3.0
-5.0	-0.083953	0.084811
0.0	-0.084327	0.08216
2.0	-0.08403	0.080715
4.0	-0.08408	0.079934
6.0	-0.109	0.10093
10.0	-0.076419	0.071088
12.5	-0.078456	0.071289
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</tableData>
         </table>
      </function>
      <function name="aero/function/flap_inner_z_coeff_basic_Reynolds3_Mach_3">
         <description>z_coefficient as function of flap_inner_deflection, alpha, beta, fixed Reynolds = 4.48073003136E7fixed Mach = 0.8</description>
         <table>
            <independentVar lookup="row">aero/alpha-deg</independentVar>
            <independentVar lookup="column">fcs/flap-pos-deg</independentVar>
            <independentVar lookup="table">aero/beta-deg</independentVar>
            <tableData breakPoint="-10.0">
 	-3.0	3.0
-5.0	0.083953	-0.084811
0.0	0.084327	-0.08216
2.0	0.08403	-0.080715
4.0	0.08408	-0.079934
6.0	0.109	-0.10093
10.0	0.076419	-0.071088
12.5	0.078456	-0.071289
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</tableData>
            <tableData breakPoint="0.0">
 	-3.0	3.0
-5.0	-0.085112	0.086116
0.0	-0.084547	0.082921
2.0	-0.08396	0.081452
4.0	-0.08284	0.079641
6.0	-0.080431	0.076675
10.0	-0.074813	0.066653
12.5	-0.081135	0.071306
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</tableData>
            <tableData breakPoint="10.0">
 	-3.0	3.0
-5.0	-0.083953	0.084811
0.0	-0.084327	0.08216
2.0	-0.08403	0.080715
4.0	-0.08408	0.079934
6.0	-0.109	0.10093
10.0	-0.076419	0.071088
12.5	-0.078456	0.071289
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</tableData>
         </table>
      </function>
      <function name="aero/function/flap_inner_z_coeff_basic_deflection_Mach_0">
         <description>z_coefficient as function of flap_inner_deflection, alpha, beta, Reynolds, fixed Mach = 0.2</description>
         <interpolate1d>
            <p>aero/Re</p>
            <v>11201825.0784</v>
            <p>aero/function/flap_inner_z_coeff_basic_Reynolds0_Mach_0</p>
            <v>33605475.2352</v>
            <p>aero/function/flap_inner_z_coeff_basic_Reynolds1_Mach_0</p>
            <v>43687117.8058</v>
            <p>aero/function/flap_inner_z_coeff_basic_Reynolds2_Mach_0</p>
            <v>44807300.3136</v>
            <p>aero/function/flap_inner_z_coeff_basic_Reynolds3_Mach_0</p>
         </interpolate1d>
      </function>
      <function name="aero/function/flap_inner_z_coeff_basic_deflection_Mach_1">
         <description>z_coefficient as function of flap_inner_deflection, alpha, beta, Reynolds, fixed Mach = 0.6</description>
         <interpolate1d>
            <p>aero/Re</p>
            <v>11201825.0784</v>
            <p>aero/function/flap_inner_z_coeff_basic_Reynolds0_Mach_1</p>
            <v>33605475.2352</v>
            <p>aero/function/flap_inner_z_coeff_basic_Reynolds1_Mach_1</p>
            <v>43687117.8058</v>
            <p>aero/function/flap_inner_z_coeff_basic_Reynolds2_Mach_1</p>
            <v>44807300.3136</v>
            <p>aero/function/flap_inner_z_coeff_basic_Reynolds3_Mach_1</p>
         </interpolate1d>
      </function>
      <function name="aero/function/flap_inner_z_coeff_basic_deflection_Mach_2">
         <description>z_coefficient as function of flap_inner_deflection, alpha, beta, Reynolds, fixed Mach = 0.78</description>
         <interpolate1d>
            <p>aero/Re</p>
            <v>11201825.0784</v>
            <p>aero/function/flap_inner_z_coeff_basic_Reynolds0_Mach_2</p>
            <v>33605475.2352</v>
            <p>aero/function/flap_inner_z_coeff_basic_Reynolds1_Mach_2</p>
            <v>43687117.8058</v>
            <p>aero/function/flap_inner_z_coeff_basic_Reynolds2_Mach_2</p>
            <v>44807300.3136</v>
            <p>aero/function/flap_inner_z_coeff_basic_Reynolds3_Mach_2</p>
         </interpolate1d>
      </function>
      <function name="aero/function/flap_inner_z_coeff_basic_deflection_Mach_3">
         <description>z_coefficient as function of flap_inner_deflection, alpha, beta, Reynolds, fixed Mach = 0.8</description>
         <interpolate1d>
            <p>aero/Re</p>
            <v>11201825.0784</v>
            <p>aero/function/flap_inner_z_coeff_basic_Reynolds0_Mach_3</p>
            <v>33605475.2352</v>
            <p>aero/function/flap_inner_z_coeff_basic_Reynolds1_Mach_3</p>
            <v>43687117.8058</v>
            <p>aero/function/flap_inner_z_coeff_basic_Reynolds2_Mach_3</p>
            <v>44807300.3136</v>
            <p>aero/function/flap_inner_z_coeff_basic_Reynolds3_Mach_3</p>
         </interpolate1d>
      </function>
      <function name="aero/function/flap_inner_z_coeff_basic_Mach">
         <description>z_coefficient as function of flap_inner_deflection, alpha, beta, Reynolds, Mach </description>
         <interpolate1d>
            <p>velocities/mach</p>
            <v>0.2000</v>
            <p>aero/function/flap_inner_z_coeff_basic_deflection_Mach_0</p>
            <v>0.6000</v>
            <p>aero/function/flap_inner_z_coeff_basic_deflection_Mach_1</p>
            <v>0.7800</v>
            <p>aero/function/flap_inner_z_coeff_basic_deflection_Mach_2</p>
            <v>0.8000</v>
            <p>aero/function/flap_inner_z_coeff_basic_deflection_Mach_3</p>
         </interpolate1d>
      </function>
      <function name="aero/function/flap_inner_roll_coeff_basic_Reynolds0_Mach_0">
         <description>roll_coefficient as function of flap_inner_deflection, alpha, beta, fixed Reynolds = 1.12018250784E7fixed Mach = 0.2</description>
         <table>
            <independentVar lookup="row">aero/alpha-deg</independentVar>
            <independentVar lookup="column">fcs/flap-pos-deg</independentVar>
            <independentVar lookup="table">aero/beta-deg</independentVar>
            <tableData breakPoint="-10.0">
 	-3.0	3.0
-5.0	2.5366E-4	-2.5605E-4
0.0	2.1414E-4	-2.2952E-4
2.0	1.9403E-4	-2.1935E-4
4.0	1.9661E-4	-2.468E-4
6.0	7.3995E-4	-9.9853E-4
10.0	-8.1283E-4	8.6648E-4
12.5	-8.161E-4	8.6698E-4
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</tableData>
            <tableData breakPoint="0.0">
 	-3.0	3.0
-5.0	1.3532E-10	-1.3696E-10
0.0	1.6672E-10	-1.6208E-10
2.0	1.8008E-10	-1.7207E-10
4.0	1.9616E-10	-1.8356E-10
6.0	2.6413E-10	-2.4211E-10
10.0	6.4705E-10	-6.9834E-10
12.5	5.6556E-10	-6.2999E-10
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</tableData>
            <tableData breakPoint="10.0">
 	-3.0	3.0
-5.0	-2.5366E-4	2.5605E-4
0.0	-2.1414E-4	2.2952E-4
2.0	-1.9403E-4	2.1935E-4
4.0	-1.9661E-4	2.468E-4
6.0	-7.3995E-4	9.9853E-4
10.0	8.1283E-4	-8.6648E-4
12.5	8.161E-4	-8.6698E-4
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</tableData>
         </table>
      </function>
      <function name="aero/function/flap_inner_roll_coeff_basic_Reynolds1_Mach_0">
         <description>roll_coefficient as function of flap_inner_deflection, alpha, beta, fixed Reynolds = 3.36054752352E7fixed Mach = 0.2</description>
         <table>
            <independentVar lookup="row">aero/alpha-deg</independentVar>
            <independentVar lookup="column">fcs/flap-pos-deg</independentVar>
            <independentVar lookup="table">aero/beta-deg</independentVar>
            <tableData breakPoint="-10.0">
 	-3.0	3.0
-5.0	2.5366E-4	-2.5605E-4
0.0	2.1414E-4	-2.2952E-4
2.0	1.9403E-4	-2.1935E-4
4.0	1.9661E-4	-2.468E-4
6.0	7.3995E-4	-9.9853E-4
10.0	-8.1283E-4	8.6648E-4
12.5	-8.161E-4	8.6698E-4
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</tableData>
            <tableData breakPoint="0.0">
 	-3.0	3.0
-5.0	1.3532E-10	-1.3696E-10
0.0	1.6672E-10	-1.6208E-10
2.0	1.8008E-10	-1.7207E-10
4.0	1.9616E-10	-1.8356E-10
6.0	2.6413E-10	-2.4211E-10
10.0	6.4705E-10	-6.9834E-10
12.5	5.6556E-10	-6.2999E-10
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</tableData>
            <tableData breakPoint="10.0">
 	-3.0	3.0
-5.0	-2.5366E-4	2.5605E-4
0.0	-2.1414E-4	2.2952E-4
2.0	-1.9403E-4	2.1935E-4
4.0	-1.9661E-4	2.468E-4
6.0	-7.3995E-4	9.9853E-4
10.0	8.1283E-4	-8.6648E-4
12.5	8.161E-4	-8.6698E-4
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</tableData>
         </table>
      </function>
      <function name="aero/function/flap_inner_roll_coeff_basic_Reynolds2_Mach_0">
         <description>roll_coefficient as function of flap_inner_deflection, alpha, beta, fixed Reynolds = 4.36871178058E7fixed Mach = 0.2</description>
         <table>
            <independentVar lookup="row">aero/alpha-deg</independentVar>
            <independentVar lookup="column">fcs/flap-pos-deg</independentVar>
            <independentVar lookup="table">aero/beta-deg</independentVar>
            <tableData breakPoint="-10.0">
 	-3.0	3.0
-5.0	2.5366E-4	-2.5605E-4
0.0	2.1414E-4	-2.2952E-4
2.0	1.9403E-4	-2.1935E-4
4.0	1.9661E-4	-2.468E-4
6.0	7.3995E-4	-9.9853E-4
10.0	-8.1283E-4	8.6648E-4
12.5	-8.161E-4	8.6698E-4
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</tableData>
            <tableData breakPoint="0.0">
 	-3.0	3.0
-5.0	1.3532E-10	-1.3696E-10
0.0	1.6672E-10	-1.6208E-10
2.0	1.8008E-10	-1.7207E-10
4.0	1.9616E-10	-1.8356E-10
6.0	2.6413E-10	-2.4211E-10
10.0	6.4705E-10	-6.9834E-10
12.5	5.6556E-10	-6.2999E-10
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</tableData>
            <tableData breakPoint="10.0">
 	-3.0	3.0
-5.0	-2.5366E-4	2.5605E-4
0.0	-2.1414E-4	2.2952E-4
2.0	-1.9403E-4	2.1935E-4
4.0	-1.9661E-4	2.468E-4
6.0	-7.3995E-4	9.9853E-4
10.0	8.1283E-4	-8.6648E-4
12.5	8.161E-4	-8.6698E-4
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</tableData>
         </table>
      </function>
      <function name="aero/function/flap_inner_roll_coeff_basic_Reynolds3_Mach_0">
         <description>roll_coefficient as function of flap_inner_deflection, alpha, beta, fixed Reynolds = 4.48073003136E7fixed Mach = 0.2</description>
         <table>
            <independentVar lookup="row">aero/alpha-deg</independentVar>
            <independentVar lookup="column">fcs/flap-pos-deg</independentVar>
            <independentVar lookup="table">aero/beta-deg</independentVar>
            <tableData breakPoint="-10.0">
 	-3.0	3.0
-5.0	2.5366E-4	-2.5605E-4
0.0	2.1414E-4	-2.2952E-4
2.0	1.9403E-4	-2.1935E-4
4.0	1.9661E-4	-2.468E-4
6.0	7.3995E-4	-9.9853E-4
10.0	-8.1283E-4	8.6648E-4
12.5	-8.161E-4	8.6698E-4
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</tableData>
            <tableData breakPoint="0.0">
 	-3.0	3.0
-5.0	1.3532E-10	-1.3696E-10
0.0	1.6672E-10	-1.6208E-10
2.0	1.8008E-10	-1.7207E-10
4.0	1.9616E-10	-1.8356E-10
6.0	2.6413E-10	-2.4211E-10
10.0	6.4705E-10	-6.9834E-10
12.5	5.6556E-10	-6.2999E-10
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</tableData>
            <tableData breakPoint="10.0">
 	-3.0	3.0
-5.0	-2.5366E-4	2.5605E-4
0.0	-2.1414E-4	2.2952E-4
2.0	-1.9403E-4	2.1935E-4
4.0	-1.9661E-4	2.468E-4
6.0	-7.3995E-4	9.9853E-4
10.0	8.1283E-4	-8.6648E-4
12.5	8.161E-4	-8.6698E-4
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</tableData>
         </table>
      </function>
      <function name="aero/function/flap_inner_roll_coeff_basic_Reynolds0_Mach_1">
         <description>roll_coefficient as function of flap_inner_deflection, alpha, beta, fixed Reynolds = 1.12018250784E7fixed Mach = 0.6</description>
         <table>
            <independentVar lookup="row">aero/alpha-deg</independentVar>
            <independentVar lookup="column">fcs/flap-pos-deg</independentVar>
            <independentVar lookup="table">aero/beta-deg</independentVar>
            <tableData breakPoint="-10.0">
 	-3.0	3.0
-5.0	3.1067E-4	-3.136E-4
0.0	2.6226E-4	-2.8111E-4
2.0	2.3764E-4	-2.6865E-4
4.0	2.408E-4	-3.0227E-4
6.0	9.0625E-4	-0.0012229
10.0	-9.9551E-4	0.0010612
12.5	-9.9951E-4	0.0010618
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</tableData>
            <tableData breakPoint="0.0">
 	-3.0	3.0
-5.0	1.6573E-10	-1.6774E-10
0.0	2.0419E-10	-1.9851E-10
2.0	2.2055E-10	-2.1074E-10
4.0	2.4024E-10	-2.2481E-10
6.0	3.2349E-10	-2.9653E-10
10.0	7.9247E-10	-8.5529E-10
12.5	6.9266E-10	-7.7157E-10
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</tableData>
            <tableData breakPoint="10.0">
 	-3.0	3.0
-5.0	-3.1067E-4	3.136E-4
0.0	-2.6226E-4	2.8111E-4
2.0	-2.3764E-4	2.6865E-4
4.0	-2.408E-4	3.0227E-4
6.0	-9.0625E-4	0.0012229
10.0	9.9551E-4	-0.0010612
12.5	9.9951E-4	-0.0010618
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</tableData>
         </table>
      </function>
      <function name="aero/function/flap_inner_roll_coeff_basic_Reynolds1_Mach_1">
         <description>roll_coefficient as function of flap_inner_deflection, alpha, beta, fixed Reynolds = 3.36054752352E7fixed Mach = 0.6</description>
         <table>
            <independentVar lookup="row">aero/alpha-deg</independentVar>
            <independentVar lookup="column">fcs/flap-pos-deg</independentVar>
            <independentVar lookup="table">aero/beta-deg</independentVar>
            <tableData breakPoint="-10.0">
 	-3.0	3.0
-5.0	3.1067E-4	-3.136E-4
0.0	2.6226E-4	-2.8111E-4
2.0	2.3764E-4	-2.6865E-4
4.0	2.408E-4	-3.0227E-4
6.0	9.0625E-4	-0.0012229
10.0	-9.9551E-4	0.0010612
12.5	-9.9951E-4	0.0010618
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</tableData>
            <tableData breakPoint="0.0">
 	-3.0	3.0
-5.0	1.6573E-10	-1.6774E-10
0.0	2.0419E-10	-1.9851E-10
2.0	2.2055E-10	-2.1074E-10
4.0	2.4024E-10	-2.2481E-10
6.0	3.2349E-10	-2.9653E-10
10.0	7.9247E-10	-8.5529E-10
12.5	6.9266E-10	-7.7157E-10
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</tableData>
            <tableData breakPoint="10.0">
 	-3.0	3.0
-5.0	-3.1067E-4	3.136E-4
0.0	-2.6226E-4	2.8111E-4
2.0	-2.3764E-4	2.6865E-4
4.0	-2.408E-4	3.0227E-4
6.0	-9.0625E-4	0.0012229
10.0	9.9551E-4	-0.0010612
12.5	9.9951E-4	-0.0010618
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</tableData>
         </table>
      </function>
      <function name="aero/function/flap_inner_roll_coeff_basic_Reynolds2_Mach_1">
         <description>roll_coefficient as function of flap_inner_deflection, alpha, beta, fixed Reynolds = 4.36871178058E7fixed Mach = 0.6</description>
         <table>
            <independentVar lookup="row">aero/alpha-deg</independentVar>
            <independentVar lookup="column">fcs/flap-pos-deg</independentVar>
            <independentVar lookup="table">aero/beta-deg</independentVar>
            <tableData breakPoint="-10.0">
 	-3.0	3.0
-5.0	3.1067E-4	-3.136E-4
0.0	2.6226E-4	-2.8111E-4
2.0	2.3764E-4	-2.6865E-4
4.0	2.408E-4	-3.0227E-4
6.0	9.0625E-4	-0.0012229
10.0	-9.9551E-4	0.0010612
12.5	-9.9951E-4	0.0010618
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</tableData>
            <tableData breakPoint="0.0">
 	-3.0	3.0
-5.0	1.6573E-10	-1.6774E-10
0.0	2.0419E-10	-1.9851E-10
2.0	2.2055E-10	-2.1074E-10
4.0	2.4024E-10	-2.2481E-10
6.0	3.2349E-10	-2.9653E-10
10.0	7.9247E-10	-8.5529E-10
12.5	6.9266E-10	-7.7157E-10
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</tableData>
            <tableData breakPoint="10.0">
 	-3.0	3.0
-5.0	-3.1067E-4	3.136E-4
0.0	-2.6226E-4	2.8111E-4
2.0	-2.3764E-4	2.6865E-4
4.0	-2.408E-4	3.0227E-4
6.0	-9.0625E-4	0.0012229
10.0	9.9551E-4	-0.0010612
12.5	9.9951E-4	-0.0010618
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</tableData>
         </table>
      </function>
      <function name="aero/function/flap_inner_roll_coeff_basic_Reynolds3_Mach_1">
         <description>roll_coefficient as function of flap_inner_deflection, alpha, beta, fixed Reynolds = 4.48073003136E7fixed Mach = 0.6</description>
         <table>
            <independentVar lookup="row">aero/alpha-deg</independentVar>
            <independentVar lookup="column">fcs/flap-pos-deg</independentVar>
            <independentVar lookup="table">aero/beta-deg</independentVar>
            <tableData breakPoint="-10.0">
 	-3.0	3.0
-5.0	3.1067E-4	-3.136E-4
0.0	2.6226E-4	-2.8111E-4
2.0	2.3764E-4	-2.6865E-4
4.0	2.408E-4	-3.0227E-4
6.0	9.0625E-4	-0.0012229
10.0	-9.9551E-4	0.0010612
12.5	-9.9951E-4	0.0010618
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</tableData>
            <tableData breakPoint="0.0">
 	-3.0	3.0
-5.0	1.6573E-10	-1.6774E-10
0.0	2.0419E-10	-1.9851E-10
2.0	2.2055E-10	-2.1074E-10
4.0	2.4024E-10	-2.2481E-10
6.0	3.2349E-10	-2.9653E-10
10.0	7.9247E-10	-8.5529E-10
12.5	6.9266E-10	-7.7157E-10
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</tableData>
            <tableData breakPoint="10.0">
 	-3.0	3.0
-5.0	-3.1067E-4	3.136E-4
0.0	-2.6226E-4	2.8111E-4
2.0	-2.3764E-4	2.6865E-4
4.0	-2.408E-4	3.0227E-4
6.0	-9.0625E-4	0.0012229
10.0	9.9551E-4	-0.0010612
12.5	9.9951E-4	-0.0010618
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</tableData>
         </table>
      </function>
      <function name="aero/function/flap_inner_roll_coeff_basic_Reynolds0_Mach_2">
         <description>roll_coefficient as function of flap_inner_deflection, alpha, beta, fixed Reynolds = 1.12018250784E7fixed Mach = 0.78</description>
         <table>
            <independentVar lookup="row">aero/alpha-deg</independentVar>
            <independentVar lookup="column">fcs/flap-pos-deg</independentVar>
            <independentVar lookup="table">aero/beta-deg</independentVar>
            <tableData breakPoint="-10.0">
 	-3.0	3.0
-5.0	3.9716E-4	-4.009E-4
0.0	3.3528E-4	-3.5937E-4
2.0	3.038E-4	-3.4344E-4
4.0	3.0784E-4	-3.8642E-4
6.0	0.0011586	-0.0015634
10.0	-0.0012727	0.0013567
12.5	-0.0012778	0.0013574
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</tableData>
            <tableData breakPoint="0.0">
 	-3.0	3.0
-5.0	2.1187E-10	-2.1444E-10
0.0	2.6103E-10	-2.5377E-10
2.0	2.8195E-10	-2.6941E-10
4.0	3.0712E-10	-2.874E-10
6.0	4.1355E-10	-3.7908E-10
10.0	1.0131E-9	-1.0934E-9
12.5	8.8551E-10	-9.8638E-10
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</tableData>
            <tableData breakPoint="10.0">
 	-3.0	3.0
-5.0	-3.9716E-4	4.009E-4
0.0	-3.3528E-4	3.5937E-4
2.0	-3.038E-4	3.4344E-4
4.0	-3.0784E-4	3.8642E-4
6.0	-0.0011586	0.0015634
10.0	0.0012727	-0.0013567
12.5	0.0012778	-0.0013574
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</tableData>
         </table>
      </function>
      <function name="aero/function/flap_inner_roll_coeff_basic_Reynolds1_Mach_2">
         <description>roll_coefficient as function of flap_inner_deflection, alpha, beta, fixed Reynolds = 3.36054752352E7fixed Mach = 0.78</description>
         <table>
            <independentVar lookup="row">aero/alpha-deg</independentVar>
            <independentVar lookup="column">fcs/flap-pos-deg</independentVar>
            <independentVar lookup="table">aero/beta-deg</independentVar>
            <tableData breakPoint="-10.0">
 	-3.0	3.0
-5.0	3.9716E-4	-4.009E-4
0.0	3.3528E-4	-3.5937E-4
2.0	3.038E-4	-3.4344E-4
4.0	3.0784E-4	-3.8642E-4
6.0	0.0011586	-0.0015634
10.0	-0.0012727	0.0013567
12.5	-0.0012778	0.0013574
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</tableData>
            <tableData breakPoint="0.0">
 	-3.0	3.0
-5.0	2.1187E-10	-2.1444E-10
0.0	2.6103E-10	-2.5377E-10
2.0	2.8195E-10	-2.6941E-10
4.0	3.0712E-10	-2.874E-10
6.0	4.1355E-10	-3.7908E-10
10.0	1.0131E-9	-1.0934E-9
12.5	8.8551E-10	-9.8638E-10
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</tableData>
            <tableData breakPoint="10.0">
 	-3.0	3.0
-5.0	-3.9716E-4	4.009E-4
0.0	-3.3528E-4	3.5937E-4
2.0	-3.038E-4	3.4344E-4
4.0	-3.0784E-4	3.8642E-4
6.0	-0.0011586	0.0015634
10.0	0.0012727	-0.0013567
12.5	0.0012778	-0.0013574
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</tableData>
         </table>
      </function>
      <function name="aero/function/flap_inner_roll_coeff_basic_Reynolds2_Mach_2">
         <description>roll_coefficient as function of flap_inner_deflection, alpha, beta, fixed Reynolds = 4.36871178058E7fixed Mach = 0.78</description>
         <table>
            <independentVar lookup="row">aero/alpha-deg</independentVar>
            <independentVar lookup="column">fcs/flap-pos-deg</independentVar>
            <independentVar lookup="table">aero/beta-deg</independentVar>
            <tableData breakPoint="-10.0">
 	-3.0	3.0
-5.0	3.9716E-4	-4.009E-4
0.0	3.3528E-4	-3.5937E-4
2.0	3.038E-4	-3.4344E-4
4.0	3.0784E-4	-3.8642E-4
6.0	0.0011586	-0.0015634
10.0	-0.0012727	0.0013567
12.5	-0.0012778	0.0013574
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</tableData>
            <tableData breakPoint="0.0">
 	-3.0	3.0
-5.0	2.1187E-10	-2.1444E-10
0.0	2.6103E-10	-2.5377E-10
2.0	2.8195E-10	-2.6941E-10
4.0	3.0712E-10	-2.874E-10
6.0	4.1355E-10	-3.7908E-10
10.0	1.0131E-9	-1.0934E-9
12.5	8.8551E-10	-9.8638E-10
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</tableData>
            <tableData breakPoint="10.0">
 	-3.0	3.0
-5.0	-3.9716E-4	4.009E-4
0.0	-3.3528E-4	3.5937E-4
2.0	-3.038E-4	3.4344E-4
4.0	-3.0784E-4	3.8642E-4
6.0	-0.0011586	0.0015634
10.0	0.0012727	-0.0013567
12.5	0.0012778	-0.0013574
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</tableData>
         </table>
      </function>
      <function name="aero/function/flap_inner_roll_coeff_basic_Reynolds3_Mach_2">
         <description>roll_coefficient as function of flap_inner_deflection, alpha, beta, fixed Reynolds = 4.48073003136E7fixed Mach = 0.78</description>
         <table>
            <independentVar lookup="row">aero/alpha-deg</independentVar>
            <independentVar lookup="column">fcs/flap-pos-deg</independentVar>
            <independentVar lookup="table">aero/beta-deg</independentVar>
            <tableData breakPoint="-10.0">
 	-3.0	3.0
-5.0	3.9716E-4	-4.009E-4
0.0	3.3528E-4	-3.5937E-4
2.0	3.038E-4	-3.4344E-4
4.0	3.0784E-4	-3.8642E-4
6.0	0.0011586	-0.0015634
10.0	-0.0012727	0.0013567
12.5	-0.0012778	0.0013574
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</tableData>
            <tableData breakPoint="0.0">
 	-3.0	3.0
-5.0	2.1187E-10	-2.1444E-10
0.0	2.6103E-10	-2.5377E-10
2.0	2.8195E-10	-2.6941E-10
4.0	3.0712E-10	-2.874E-10
6.0	4.1355E-10	-3.7908E-10
10.0	1.0131E-9	-1.0934E-9
12.5	8.8551E-10	-9.8638E-10
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</tableData>
            <tableData breakPoint="10.0">
 	-3.0	3.0
-5.0	-3.9716E-4	4.009E-4
0.0	-3.3528E-4	3.5937E-4
2.0	-3.038E-4	3.4344E-4
4.0	-3.0784E-4	3.8642E-4
6.0	-0.0011586	0.0015634
10.0	0.0012727	-0.0013567
12.5	0.0012778	-0.0013574
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</tableData>
         </table>
      </function>
      <function name="aero/function/flap_inner_roll_coeff_basic_Reynolds0_Mach_3">
         <description>roll_coefficient as function of flap_inner_deflection, alpha, beta, fixed Reynolds = 1.12018250784E7fixed Mach = 0.8</description>
         <table>
            <independentVar lookup="row">aero/alpha-deg</independentVar>
            <independentVar lookup="column">fcs/flap-pos-deg</independentVar>
            <independentVar lookup="table">aero/beta-deg</independentVar>
            <tableData breakPoint="-10.0">
 	-3.0	3.0
-5.0	4.1422E-4	-4.1813E-4
0.0	3.4968E-4	-3.7481E-4
2.0	3.1685E-4	-3.582E-4
4.0	3.2106E-4	-4.0302E-4
6.0	0.0012083	-0.0016306
10.0	-0.0013273	0.001415
12.5	-0.0013327	0.0014158
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</tableData>
            <tableData breakPoint="0.0">
 	-3.0	3.0
-5.0	2.2097E-10	-2.2365E-10
0.0	2.7225E-10	-2.6468E-10
2.0	2.9407E-10	-2.8099E-10
4.0	3.2032E-10	-2.9975E-10
6.0	4.3132E-10	-3.9537E-10
10.0	1.0566E-9	-1.1404E-9
12.5	9.2355E-10	-1.0288E-9
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</tableData>
            <tableData breakPoint="10.0">
 	-3.0	3.0
-5.0	-4.1422E-4	4.1813E-4
0.0	-3.4968E-4	3.7481E-4
2.0	-3.1685E-4	3.582E-4
4.0	-3.2106E-4	4.0302E-4
6.0	-0.0012083	0.0016306
10.0	0.0013273	-0.001415
12.5	0.0013327	-0.0014158
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</tableData>
         </table>
      </function>
      <function name="aero/function/flap_inner_roll_coeff_basic_Reynolds1_Mach_3">
         <description>roll_coefficient as function of flap_inner_deflection, alpha, beta, fixed Reynolds = 3.36054752352E7fixed Mach = 0.8</description>
         <table>
            <independentVar lookup="row">aero/alpha-deg</independentVar>
            <independentVar lookup="column">fcs/flap-pos-deg</independentVar>
            <independentVar lookup="table">aero/beta-deg</independentVar>
            <tableData breakPoint="-10.0">
 	-3.0	3.0
-5.0	4.1422E-4	-4.1813E-4
0.0	3.4968E-4	-3.7481E-4
2.0	3.1685E-4	-3.582E-4
4.0	3.2106E-4	-4.0302E-4
6.0	0.0012083	-0.0016306
10.0	-0.0013273	0.001415
12.5	-0.0013327	0.0014158
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</tableData>
            <tableData breakPoint="0.0">
 	-3.0	3.0
-5.0	2.2097E-10	-2.2365E-10
0.0	2.7225E-10	-2.6468E-10
2.0	2.9407E-10	-2.8099E-10
4.0	3.2032E-10	-2.9975E-10
6.0	4.3132E-10	-3.9537E-10
10.0	1.0566E-9	-1.1404E-9
12.5	9.2355E-10	-1.0288E-9
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</tableData>
            <tableData breakPoint="10.0">
 	-3.0	3.0
-5.0	-4.1422E-4	4.1813E-4
0.0	-3.4968E-4	3.7481E-4
2.0	-3.1685E-4	3.582E-4
4.0	-3.2106E-4	4.0302E-4
6.0	-0.0012083	0.0016306
10.0	0.0013273	-0.001415
12.5	0.0013327	-0.0014158
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</tableData>
         </table>
      </function>
      <function name="aero/function/flap_inner_roll_coeff_basic_Reynolds2_Mach_3">
         <description>roll_coefficient as function of flap_inner_deflection, alpha, beta, fixed Reynolds = 4.36871178058E7fixed Mach = 0.8</description>
         <table>
            <independentVar lookup="row">aero/alpha-deg</independentVar>
            <independentVar lookup="column">fcs/flap-pos-deg</independentVar>
            <independentVar lookup="table">aero/beta-deg</independentVar>
            <tableData breakPoint="-10.0">
 	-3.0	3.0
-5.0	4.1422E-4	-4.1813E-4
0.0	3.4968E-4	-3.7481E-4
2.0	3.1685E-4	-3.582E-4
4.0	3.2106E-4	-4.0302E-4
6.0	0.0012083	-0.0016306
10.0	-0.0013273	0.001415
12.5	-0.0013327	0.0014158
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</tableData>
            <tableData breakPoint="0.0">
 	-3.0	3.0
-5.0	2.2097E-10	-2.2365E-10
0.0	2.7225E-10	-2.6468E-10
2.0	2.9407E-10	-2.8099E-10
4.0	3.2032E-10	-2.9975E-10
6.0	4.3132E-10	-3.9537E-10
10.0	1.0566E-9	-1.1404E-9
12.5	9.2355E-10	-1.0288E-9
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</tableData>
            <tableData breakPoint="10.0">
 	-3.0	3.0
-5.0	-4.1422E-4	4.1813E-4
0.0	-3.4968E-4	3.7481E-4
2.0	-3.1685E-4	3.582E-4
4.0	-3.2106E-4	4.0302E-4
6.0	-0.0012083	0.0016306
10.0	0.0013273	-0.001415
12.5	0.0013327	-0.0014158
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</tableData>
         </table>
      </function>
      <function name="aero/function/flap_inner_roll_coeff_basic_Reynolds3_Mach_3">
         <description>roll_coefficient as function of flap_inner_deflection, alpha, beta, fixed Reynolds = 4.48073003136E7fixed Mach = 0.8</description>
         <table>
            <independentVar lookup="row">aero/alpha-deg</independentVar>
            <independentVar lookup="column">fcs/flap-pos-deg</independentVar>
            <independentVar lookup="table">aero/beta-deg</independentVar>
            <tableData breakPoint="-10.0">
 	-3.0	3.0
-5.0	4.1422E-4	-4.1813E-4
0.0	3.4968E-4	-3.7481E-4
2.0	3.1685E-4	-3.582E-4
4.0	3.2106E-4	-4.0302E-4
6.0	0.0012083	-0.0016306
10.0	-0.0013273	0.001415
12.5	-0.0013327	0.0014158
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</tableData>
            <tableData breakPoint="0.0">
 	-3.0	3.0
-5.0	2.2097E-10	-2.2365E-10
0.0	2.7225E-10	-2.6468E-10
2.0	2.9407E-10	-2.8099E-10
4.0	3.2032E-10	-2.9975E-10
6.0	4.3132E-10	-3.9537E-10
10.0	1.0566E-9	-1.1404E-9
12.5	9.2355E-10	-1.0288E-9
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</tableData>
            <tableData breakPoint="10.0">
 	-3.0	3.0
-5.0	-4.1422E-4	4.1813E-4
0.0	-3.4968E-4	3.7481E-4
2.0	-3.1685E-4	3.582E-4
4.0	-3.2106E-4	4.0302E-4
6.0	-0.0012083	0.0016306
10.0	0.0013273	-0.001415
12.5	0.0013327	-0.0014158
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</tableData>
         </table>
      </function>
      <function name="aero/function/flap_inner_roll_coeff_basic_deflection_Mach_0">
         <description>roll_coefficient as function of flap_inner_deflection, alpha, beta, Reynolds, fixed Mach = 0.2</description>
         <interpolate1d>
            <p>aero/Re</p>
            <v>11201825.0784</v>
            <p>aero/function/flap_inner_roll_coeff_basic_Reynolds0_Mach_0</p>
            <v>33605475.2352</v>
            <p>aero/function/flap_inner_roll_coeff_basic_Reynolds1_Mach_0</p>
            <v>43687117.8058</v>
            <p>aero/function/flap_inner_roll_coeff_basic_Reynolds2_Mach_0</p>
            <v>44807300.3136</v>
            <p>aero/function/flap_inner_roll_coeff_basic_Reynolds3_Mach_0</p>
         </interpolate1d>
      </function>
      <function name="aero/function/flap_inner_roll_coeff_basic_deflection_Mach_1">
         <description>roll_coefficient as function of flap_inner_deflection, alpha, beta, Reynolds, fixed Mach = 0.6</description>
         <interpolate1d>
            <p>aero/Re</p>
            <v>11201825.0784</v>
            <p>aero/function/flap_inner_roll_coeff_basic_Reynolds0_Mach_1</p>
            <v>33605475.2352</v>
            <p>aero/function/flap_inner_roll_coeff_basic_Reynolds1_Mach_1</p>
            <v>43687117.8058</v>
            <p>aero/function/flap_inner_roll_coeff_basic_Reynolds2_Mach_1</p>
            <v>44807300.3136</v>
            <p>aero/function/flap_inner_roll_coeff_basic_Reynolds3_Mach_1</p>
         </interpolate1d>
      </function>
      <function name="aero/function/flap_inner_roll_coeff_basic_deflection_Mach_2">
         <description>roll_coefficient as function of flap_inner_deflection, alpha, beta, Reynolds, fixed Mach = 0.78</description>
         <interpolate1d>
            <p>aero/Re</p>
            <v>11201825.0784</v>
            <p>aero/function/flap_inner_roll_coeff_basic_Reynolds0_Mach_2</p>
            <v>33605475.2352</v>
            <p>aero/function/flap_inner_roll_coeff_basic_Reynolds1_Mach_2</p>
            <v>43687117.8058</v>
            <p>aero/function/flap_inner_roll_coeff_basic_Reynolds2_Mach_2</p>
            <v>44807300.3136</v>
            <p>aero/function/flap_inner_roll_coeff_basic_Reynolds3_Mach_2</p>
         </interpolate1d>
      </function>
      <function name="aero/function/flap_inner_roll_coeff_basic_deflection_Mach_3">
         <description>roll_coefficient as function of flap_inner_deflection, alpha, beta, Reynolds, fixed Mach = 0.8</description>
         <interpolate1d>
            <p>aero/Re</p>
            <v>11201825.0784</v>
            <p>aero/function/flap_inner_roll_coeff_basic_Reynolds0_Mach_3</p>
            <v>33605475.2352</v>
            <p>aero/function/flap_inner_roll_coeff_basic_Reynolds1_Mach_3</p>
            <v>43687117.8058</v>
            <p>aero/function/flap_inner_roll_coeff_basic_Reynolds2_Mach_3</p>
            <v>44807300.3136</v>
            <p>aero/function/flap_inner_roll_coeff_basic_Reynolds3_Mach_3</p>
         </interpolate1d>
      </function>
      <function name="aero/function/flap_inner_roll_coeff_basic_Mach">
         <description>roll_coefficient as function of flap_inner_deflection, alpha, beta, Reynolds, Mach </description>
         <interpolate1d>
            <p>velocities/mach</p>
            <v>0.2000</v>
            <p>aero/function/flap_inner_roll_coeff_basic_deflection_Mach_0</p>
            <v>0.6000</v>
            <p>aero/function/flap_inner_roll_coeff_basic_deflection_Mach_1</p>
            <v>0.7800</v>
            <p>aero/function/flap_inner_roll_coeff_basic_deflection_Mach_2</p>
            <v>0.8000</v>
            <p>aero/function/flap_inner_roll_coeff_basic_deflection_Mach_3</p>
         </interpolate1d>
      </function>
      <function name="aero/function/flap_inner_pitch_coeff_basic_Reynolds0_Mach_0">
         <description>pitch_coefficient as function of flap_inner_deflection, alpha, beta, fixed Reynolds = 1.12018250784E7fixed Mach = 0.2</description>
         <table>
            <independentVar lookup="row">aero/alpha-deg</independentVar>
            <independentVar lookup="column">fcs/flap-pos-deg</independentVar>
            <independentVar lookup="table">aero/beta-deg</independentVar>
            <tableData breakPoint="-10.0">
 	-3.0	3.0
-5.0	-0.0013494067887979458	0.0013453274168640568
0.0	-0.0018598227498593891	0.0018219958464724185
2.0	-0.0021401868573157597	0.0020681179531503876
4.0	-0.0022707267592002073	0.0020762766970181656
6.0	0.005182780233340296	-0.00452266368403826
10.0	-0.004955447961024482	0.004107309450769562
12.5	-0.004330809585814148	0.0034846489528605066
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</tableData>
            <tableData breakPoint="0.0">
 	-3.0	3.0
-5.0	-0.0019184173649097946	0.0018865240934266626
0.0	-0.0027401017662601014	0.0025241422884266446
2.0	-0.0031157748361718782	0.0027710060990925934
4.0	-0.003605175850907227	0.0030748574995016586
6.0	-0.004454303299812786	0.0036967762934227337
10.0	-0.006462837699262129	0.006280378518219094
12.5	-0.0045904059816070835	0.004481746347368041
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</tableData>
            <tableData breakPoint="10.0">
 	-3.0	3.0
-5.0	-0.0013494067887979458	0.0013453274168640568
0.0	-0.0018598227498593891	0.0018219958464724185
2.0	-0.0021401868573157597	0.0020681179531503876
4.0	-0.0022707267592002073	0.0020762766970181656
6.0	0.005182780233340296	-0.00452266368403826
10.0	-0.004955447961024482	0.004107309450769562
12.5	-0.004330809585814148	0.0034846489528605066
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</tableData>
         </table>
      </function>
      <function name="aero/function/flap_inner_pitch_coeff_basic_Reynolds1_Mach_0">
         <description>pitch_coefficient as function of flap_inner_deflection, alpha, beta, fixed Reynolds = 3.36054752352E7fixed Mach = 0.2</description>
         <table>
            <independentVar lookup="row">aero/alpha-deg</independentVar>
            <independentVar lookup="column">fcs/flap-pos-deg</independentVar>
            <independentVar lookup="table">aero/beta-deg</independentVar>
            <tableData breakPoint="-10.0">
 	-3.0	3.0
-5.0	-0.0013494067887979458	0.0013453274168640568
0.0	-0.0018598227498593891	0.0018219958464724185
2.0	-0.0021401868573157597	0.0020681179531503876
4.0	-0.0022707267592002073	0.0020762766970181656
6.0	0.005182780233340296	-0.00452266368403826
10.0	-0.004955447961024482	0.004107309450769562
12.5	-0.004330809585814148	0.0034846489528605066
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</tableData>
            <tableData breakPoint="0.0">
 	-3.0	3.0
-5.0	-0.0019184173649097946	0.0018865240934266626
0.0	-0.0027401017662601014	0.0025241422884266446
2.0	-0.0031157748361718782	0.0027710060990925934
4.0	-0.003605175850907227	0.0030748574995016586
6.0	-0.004454303299812786	0.0036967762934227337
10.0	-0.006462837699262129	0.006280378518219094
12.5	-0.0045904059816070835	0.004481746347368041
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</tableData>
            <tableData breakPoint="10.0">
 	-3.0	3.0
-5.0	-0.0013494067887979458	0.0013453274168640568
0.0	-0.0018598227498593891	0.0018219958464724185
2.0	-0.0021401868573157597	0.0020681179531503876
4.0	-0.0022707267592002073	0.0020762766970181656
6.0	0.005182780233340296	-0.00452266368403826
10.0	-0.004955447961024482	0.004107309450769562
12.5	-0.004330809585814148	0.0034846489528605066
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</tableData>
         </table>
      </function>
      <function name="aero/function/flap_inner_pitch_coeff_basic_Reynolds2_Mach_0">
         <description>pitch_coefficient as function of flap_inner_deflection, alpha, beta, fixed Reynolds = 4.36871178058E7fixed Mach = 0.2</description>
         <table>
            <independentVar lookup="row">aero/alpha-deg</independentVar>
            <independentVar lookup="column">fcs/flap-pos-deg</independentVar>
            <independentVar lookup="table">aero/beta-deg</independentVar>
            <tableData breakPoint="-10.0">
 	-3.0	3.0
-5.0	-0.0013494067887979458	0.0013453274168640568
0.0	-0.0018598227498593891	0.0018219958464724185
2.0	-0.0021401868573157597	0.0020681179531503876
4.0	-0.0022707267592002073	0.0020762766970181656
6.0	0.005182780233340296	-0.00452266368403826
10.0	-0.004955447961024482	0.004107309450769562
12.5	-0.004330809585814148	0.0034846489528605066
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</tableData>
            <tableData breakPoint="0.0">
 	-3.0	3.0
-5.0	-0.0019184173649097946	0.0018865240934266626
0.0	-0.0027401017662601014	0.0025241422884266446
2.0	-0.0031157748361718782	0.0027710060990925934
4.0	-0.003605175850907227	0.0030748574995016586
6.0	-0.004454303299812786	0.0036967762934227337
10.0	-0.006462837699262129	0.006280378518219094
12.5	-0.0045904059816070835	0.004481746347368041
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</tableData>
            <tableData breakPoint="10.0">
 	-3.0	3.0
-5.0	-0.0013494067887979458	0.0013453274168640568
0.0	-0.0018598227498593891	0.0018219958464724185
2.0	-0.0021401868573157597	0.0020681179531503876
4.0	-0.0022707267592002073	0.0020762766970181656
6.0	0.005182780233340296	-0.00452266368403826
10.0	-0.004955447961024482	0.004107309450769562
12.5	-0.004330809585814148	0.0034846489528605066
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</tableData>
         </table>
      </function>
      <function name="aero/function/flap_inner_pitch_coeff_basic_Reynolds3_Mach_0">
         <description>pitch_coefficient as function of flap_inner_deflection, alpha, beta, fixed Reynolds = 4.48073003136E7fixed Mach = 0.2</description>
         <table>
            <independentVar lookup="row">aero/alpha-deg</independentVar>
            <independentVar lookup="column">fcs/flap-pos-deg</independentVar>
            <independentVar lookup="table">aero/beta-deg</independentVar>
            <tableData breakPoint="-10.0">
 	-3.0	3.0
-5.0	-0.0013494067887979458	0.0013453274168640568
0.0	-0.0018598227498593891	0.0018219958464724185
2.0	-0.0021401868573157597	0.0020681179531503876
4.0	-0.0022707267592002073	0.0020762766970181656
6.0	0.005182780233340296	-0.00452266368403826
10.0	-0.004955447961024482	0.004107309450769562
12.5	-0.004330809585814148	0.0034846489528605066
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</tableData>
            <tableData breakPoint="0.0">
 	-3.0	3.0
-5.0	-0.0019184173649097946	0.0018865240934266626
0.0	-0.0027401017662601014	0.0025241422884266446
2.0	-0.0031157748361718782	0.0027710060990925934
4.0	-0.003605175850907227	0.0030748574995016586
6.0	-0.004454303299812786	0.0036967762934227337
10.0	-0.006462837699262129	0.006280378518219094
12.5	-0.0045904059816070835	0.004481746347368041
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</tableData>
            <tableData breakPoint="10.0">
 	-3.0	3.0
-5.0	-0.0013494067887979458	0.0013453274168640568
0.0	-0.0018598227498593891	0.0018219958464724185
2.0	-0.0021401868573157597	0.0020681179531503876
4.0	-0.0022707267592002073	0.0020762766970181656
6.0	0.005182780233340296	-0.00452266368403826
10.0	-0.004955447961024482	0.004107309450769562
12.5	-0.004330809585814148	0.0034846489528605066
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</tableData>
         </table>
      </function>
      <function name="aero/function/flap_inner_pitch_coeff_basic_Reynolds0_Mach_1">
         <description>pitch_coefficient as function of flap_inner_deflection, alpha, beta, fixed Reynolds = 1.12018250784E7fixed Mach = 0.6</description>
         <table>
            <independentVar lookup="row">aero/alpha-deg</independentVar>
            <independentVar lookup="column">fcs/flap-pos-deg</independentVar>
            <independentVar lookup="table">aero/beta-deg</independentVar>
            <tableData breakPoint="-10.0">
 	-3.0	3.0
-5.0	-0.0016526401025503607	0.001647695409297162
0.0	-0.002277772947086016	0.002231416447837277
2.0	-0.002621181893520671	0.0025329191189510727
4.0	-0.002781019102930321	0.0025429321227888
6.0	0.006347626346462598	-0.005539168999564598
10.0	-0.006069240116307506	0.005030360063810443
12.5	-0.005304172452706327	0.0042677647468358625
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</tableData>
            <tableData breakPoint="0.0">
 	-3.0	3.0
-5.0	-0.002349594616588728	0.0023105315398884575
0.0	-0.003355963310946008	0.0030914222218998743
2.0	-0.0038159434008248247	0.0033936665970016495
4.0	-0.004415363840443847	0.0037658783816361873
6.0	-0.005455356448922879	0.004527608377291458
10.0	-0.007915341342389269	0.0076918412073446836
12.5	-0.005621992611555677	0.00548898036304463
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</tableData>
            <tableData breakPoint="10.0">
 	-3.0	3.0
-5.0	-0.0016526401025503607	0.001647695409297162
0.0	-0.002277772947086016	0.002231416447837277
2.0	-0.002621181893520671	0.0025329191189510727
4.0	-0.002781019102930321	0.0025429321227888
6.0	0.006347626346462598	-0.005539168999564598
10.0	-0.006069240116307506	0.005030360063810443
12.5	-0.005304172452706327	0.0042677647468358625
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</tableData>
         </table>
      </function>
      <function name="aero/function/flap_inner_pitch_coeff_basic_Reynolds1_Mach_1">
         <description>pitch_coefficient as function of flap_inner_deflection, alpha, beta, fixed Reynolds = 3.36054752352E7fixed Mach = 0.6</description>
         <table>
            <independentVar lookup="row">aero/alpha-deg</independentVar>
            <independentVar lookup="column">fcs/flap-pos-deg</independentVar>
            <independentVar lookup="table">aero/beta-deg</independentVar>
            <tableData breakPoint="-10.0">
 	-3.0	3.0
-5.0	-0.0016526401025503607	0.001647695409297162
0.0	-0.002277772947086016	0.002231416447837277
2.0	-0.002621181893520671	0.0025329191189510727
4.0	-0.002781019102930321	0.0025429321227888
6.0	0.006347626346462598	-0.005539168999564598
10.0	-0.006069240116307506	0.005030360063810443
12.5	-0.005304172452706327	0.0042677647468358625
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</tableData>
            <tableData breakPoint="0.0">
 	-3.0	3.0
-5.0	-0.002349594616588728	0.0023105315398884575
0.0	-0.003355963310946008	0.0030914222218998743
2.0	-0.0038159434008248247	0.0033936665970016495
4.0	-0.004415363840443847	0.0037658783816361873
6.0	-0.005455356448922879	0.004527608377291458
10.0	-0.007915341342389269	0.0076918412073446836
12.5	-0.005621992611555677	0.00548898036304463
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</tableData>
            <tableData breakPoint="10.0">
 	-3.0	3.0
-5.0	-0.0016526401025503607	0.001647695409297162
0.0	-0.002277772947086016	0.002231416447837277
2.0	-0.002621181893520671	0.0025329191189510727
4.0	-0.002781019102930321	0.0025429321227888
6.0	0.006347626346462598	-0.005539168999564598
10.0	-0.006069240116307506	0.005030360063810443
12.5	-0.005304172452706327	0.0042677647468358625
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</tableData>
         </table>
      </function>
      <function name="aero/function/flap_inner_pitch_coeff_basic_Reynolds2_Mach_1">
         <description>pitch_coefficient as function of flap_inner_deflection, alpha, beta, fixed Reynolds = 4.36871178058E7fixed Mach = 0.6</description>
         <table>
            <independentVar lookup="row">aero/alpha-deg</independentVar>
            <independentVar lookup="column">fcs/flap-pos-deg</independentVar>
            <independentVar lookup="table">aero/beta-deg</independentVar>
            <tableData breakPoint="-10.0">
 	-3.0	3.0
-5.0	-0.0016526401025503607	0.001647695409297162
0.0	-0.002277772947086016	0.002231416447837277
2.0	-0.002621181893520671	0.0025329191189510727
4.0	-0.002781019102930321	0.0025429321227888
6.0	0.006347626346462598	-0.005539168999564598
10.0	-0.006069240116307506	0.005030360063810443
12.5	-0.005304172452706327	0.0042677647468358625
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</tableData>
            <tableData breakPoint="0.0">
 	-3.0	3.0
-5.0	-0.002349594616588728	0.0023105315398884575
0.0	-0.003355963310946008	0.0030914222218998743
2.0	-0.0038159434008248247	0.0033936665970016495
4.0	-0.004415363840443847	0.0037658783816361873
6.0	-0.005455356448922879	0.004527608377291458
10.0	-0.007915341342389269	0.0076918412073446836
12.5	-0.005621992611555677	0.00548898036304463
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</tableData>
            <tableData breakPoint="10.0">
 	-3.0	3.0
-5.0	-0.0016526401025503607	0.001647695409297162
0.0	-0.002277772947086016	0.002231416447837277
2.0	-0.002621181893520671	0.0025329191189510727
4.0	-0.002781019102930321	0.0025429321227888
6.0	0.006347626346462598	-0.005539168999564598
10.0	-0.006069240116307506	0.005030360063810443
12.5	-0.005304172452706327	0.0042677647468358625
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</tableData>
         </table>
      </function>
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