<?xml version="1.0" encoding="UTF-8"?>
<fdm_config name="D150 AGILE" release="BETA" version="2.0">
   <metrics>
      <wingarea unit="M2">130.514</wingarea>
      <wingspan unit="M">33.914</wingspan>
      <chord unit="M">4.192</chord>
      <htailarea unit="M2">32.758</htailarea>
      <htailarm unit="M">17.727</htailarm>
      <vtailarea unit="M2">46.589</vtailarea>
      <htailarm unit="M2">16.961</htailarm>
      <location name="AERORP" unit="M">
         <x>16.3282</x>
         <y>0.000000</y>
         <z>-1.136280</z>
      </location>
      <location name="EYEPOINT" unit="M">
         <x>14.6200</x>
         <y>0.000000</y>
         <z>-0.100000</z>
      </location>
      <location name="VRP" unit="M">
         <x>16.3282</x>
         <y>0.000000</y>
         <z>-1.136280</z>
      </location>
   </metrics>
   <mass_balance>
      <ixx unit="KG*M2">761969.688</ixx>
      <iyy unit="KG*M2">1997119.840</iyy>
      <izz unit="KG*M2">2567919.197</izz>
      <ixy unit="KG*M2">0.000000</ixy>
      <ixz unit="KG*M2">8000.000</ixz>
      <iyz unit="KG*M2">0.000000</iyz>
      <emptywt unit="KG">37340.020</emptywt>
      <location name="CG" unit="M">
         <x>16.0519</x>
         <y>0.000000</y>
         <z>0.000000</z>
      </location>
   </mass_balance>
   <ground_reactions>
      <contact name="Nose Gear" type="BOGEY">
         <location unit="M">
            <x>5.0720</x>
            <y>0.000000</y>
            <z>-1.690730</z>
         </location>
         <static_friction>0.8000</static_friction>
         <dynamic_friction>0.5000</dynamic_friction>
         <rolling_friction>0.0200</rolling_friction>
         <spring_coeff unit="LBS/FT">90000.750</spring_coeff>
         <dynamic_coeff unit="LBS/FT">4000.656</dynamic_coeff>
         <damping_coeff_rebound unit="LBS/FT/SEC">8000.311</damping_coeff_rebound>
         <max_steer unit="DEG">35.000</max_steer>
         <brake_group>NONE</brake_group>
         <retractable>1.0000</retractable>
      </contact>
      <contact name="Right Main Gear" type="BOGEY">
         <location unit="M">
            <x>16.1264</x>
            <y>3.7814</y>
            <z>-1.305452</z>
         </location>
         <static_friction>0.8000</static_friction>
         <dynamic_friction>0.5000</dynamic_friction>
         <rolling_friction>0.0200</rolling_friction>
         <spring_coeff unit="LBS/FT">120000.673</spring_coeff>
         <dynamic_coeff unit="LBS/FT">10000.640</dynamic_coeff>
         <damping_coeff_rebound unit="LBS/FT/SEC">20000.270</damping_coeff_rebound>
         <max_steer unit="DEG">0.000000</max_steer>
         <brake_group>RIGHT</brake_group>
         <retractable>1.0000</retractable>
      </contact>
      <contact name="Left Main Gear" type="BOGEY">
         <location unit="M">
            <x>16.1264</x>
            <y>-3.781379</y>
            <z>-1.305452</z>
         </location>
         <static_friction>0.8000</static_friction>
         <dynamic_friction>0.5000</dynamic_friction>
         <rolling_friction>0.0200</rolling_friction>
         <spring_coeff unit="LBS/FT">120000.673</spring_coeff>
         <dynamic_coeff unit="LBS/FT">10000.640</dynamic_coeff>
         <damping_coeff_rebound unit="LBS/FT/SEC">20000.270</damping_coeff_rebound>
         <max_steer unit="DEG">0.000000</max_steer>
         <brake_group>LEFT</brake_group>
         <retractable>1.0000</retractable>
      </contact>
   </ground_reactions>
   <propulsion>
      <engine file="D150_AGILE_engine">
         <location unit="M">
            <x>13.6765</x>
            <y>5.7482</y>
            <z>-2.338950</z>
         </location>
         <orient unit="DEG">
            <roll>0.000000</roll>
            <pitch>0.000000</pitch>
            <yaw>0.000000</yaw>
         </orient>
         <feed>0</feed>
         <feed>1</feed>
         <feed>2</feed>
         <thruster file="direct">
            <location unit="M">
               <x>13.6765</x>
               <y>5.7482</y>
               <z>-2.338950</z>
            </location>
            <orient unit="DEG">
               <roll>0.000000</roll>
               <pitch>0.000000</pitch>
               <yaw>0.000000</yaw>
            </orient>
         </thruster>
      </engine>
      <engine file="D150_AGILE_engine">
         <location unit="M">
            <x>13.6765</x>
            <y>-5.748200</y>
            <z>-2.338950</z>
         </location>
         <orient unit="DEG">
            <roll>0.000000</roll>
            <pitch>0.000000</pitch>
            <yaw>0.000000</yaw>
         </orient>
         <feed>3</feed>
         <feed>4</feed>
         <feed>5</feed>
         <thruster file="direct">
            <location unit="M">
               <x>13.6765</x>
               <y>-5.748200</y>
               <z>-2.338950</z>
            </location>
            <orient unit="DEG">
               <roll>0.000000</roll>
               <pitch>0.000000</pitch>
               <yaw>0.000000</yaw>
            </orient>
         </thruster>
      </engine>
      <tank type="FUEL">
         <location unit="M">
            <x>14.7736</x>
            <y>0.9362</y>
            <z>-1.212579</z>
         </location>
         <capacity unit="KG">3271.985</capacity>
         <contents unit="KG">3271.985</contents>
      </tank>
      <tank type="FUEL">
         <location unit="M">
            <x>15.9503</x>
            <z>-0.881934</z>
            <y>4.7680</y>
         </location>
         <capacity unit="KG">5532.997</capacity>
         <contents unit="KG">5532.997</contents>
      </tank>
      <tank type="FUEL">
         <location unit="M">
            <x>18.8026</x>
            <z>-0.241955</z>
            <y>11.3816</y>
         </location>
         <capacity unit="KG">707.706</capacity>
         <contents unit="KG">707.706</contents>
      </tank>
      <tank type="FUEL">
         <location unit="M">
            <x>14.7736</x>
            <y>-0.936171</y>
            <z>-1.212579</z>
         </location>
         <capacity unit="KG">3271.985</capacity>
         <contents unit="KG">3271.985</contents>
      </tank>
      <tank type="FUEL">
         <location unit="M">
            <x>15.9503</x>
            <z>-0.881934</z>
            <y>-4.767959</y>
         </location>
         <capacity unit="KG">5532.997</capacity>
         <contents unit="KG">5532.997</contents>
      </tank>
      <tank type="FUEL">
         <location unit="M">
            <x>18.8026</x>
            <z>-0.241955</z>
            <y>-11.381596</y>
         </location>
         <capacity unit="KG">707.706</capacity>
         <contents unit="KG">707.706</contents>
      </tank>
   </propulsion>
   <flight_control name="FCS :D150 AGILE">
      <channel name="Pitch">
         <summer name="fcs/pitch-trim-sum">
            <input>fcs/elevator-cmd-norm</input>
            <input>fcs/pitch-trim-cmd-norm</input>
            <clipto>
               <min>-1</min>
               <max>1</max>
            </clipto>
         </summer>
         <aerosurface_scale name="Elevator Control">
            <input>fcs/pitch-trim-sum</input>
            <range>
               <min>-15.0</min>
               <max>30.0</max>
            </range>
            <output>fcs/elevator-pos-deg</output>
         </aerosurface_scale>
         <aerosurface_scale name="Elevator Normalized">
            <input>fcs/elevator-pos-deg</input>
            <domain>
               <min>-15.0</min>
               <max>30.0</max>
            </domain>
            <range>
               <min> -1</min>
               <max> 1</max>
            </range>
            <output>fcs/elevator-pos-norm</output>
         </aerosurface_scale>
      </channel>
      <channel name="Yaw">
         <summer name="fcs/yaw-trim-sum">
            <input>fcs/rudder-cmd-norm</input>
            <input>fcs/yaw-trim-cmd-norm</input>
            <clipto>
               <min>-1</min>
               <max>1</max>
            </clipto>
         </summer>
         <aerosurface_scale name="Rudder Control">
            <input>fcs/yaw-trim-sum</input>
            <range>
               <min>-30.0</min>
               <max>30.0</max>
            </range>
            <output>fcs/rudder-pos-deg</output>
         </aerosurface_scale>
         <aerosurface_scale name="Rudder Normalized">
            <input>fcs/rudder-pos-deg</input>
            <domain>
               <min>-30.0</min>
               <max>30.0</max>
            </domain>
            <range>
               <min> -1</min>
               <max> 1</max>
            </range>
            <output>fcs/rudder-pos-norm</output>
         </aerosurface_scale>
      </channel>
      <channel name="Roll">
         <summer name="roll Trim Sum">
            <input>fcs/aileron-cmd-norm</input>
            <input>fcs/roll-trim-cmd-norm</input>
            <clipto>
               <min>-1</min>
               <max>1</max>
            </clipto>
         </summer>
         <aerosurface_scale name="Right Aileron Control">
            <input>fcs/roll-trim-sum</input>
            <output>fcs/right-aileron-pos-deg</output>
            <range>
               <min>-25.0</min>
               <max>25.0</max>
            </range>
         </aerosurface_scale>
         <aerosurface_scale name="Right Aileron Normalized">
            <input>fcs/right-aileron-pos-deg</input>
            <domain>
               <min>-25.0</min>
               <max>25.0</max>
            </domain>
            <range>
               <min> -1</min>
               <max> 1</max>
            </range>
            <output>fcs/right-aileron-pos-norm</output>
         </aerosurface_scale>
         <aerosurface_scale name="Left Aileron Control">
            <input>fcs/roll-trim-sum</input>
            <output>fcs/left-aileron-pos-rad</output>
            <range>
               <min>-25.0</min>
               <max>25.0</max>
            </range>
            <gain>0.0175</gain>
         </aerosurface_scale>
         <aerosurface_scale name="Left Aileron position normalized">
            <input>fcs/left-aileron-pos-deg</input>
            <domain>
               <min>-25.0</min>
               <max>25.0</max>
            </domain>
            <range>
               <min> -1</min>
               <max> 1</max>
            </range>
            <output>fcs/left-aileron-pos-norm</output>
         </aerosurface_scale>
      </channel>
      <channel name="Flap">
         <aerosurface_scale name="Flap Position Normalizer">
            <input>fcs/flap-pos-deg</input>
            <domain>
               <min>0</min>
               <max>35.0</max>
            </domain>
            <range>
               <min> 0</min>
               <max> 1</max>
            </range>
            <output>fcs/flap-pos-norm</output>
         </aerosurface_scale>
         <kinematic name="fcs/flaps-control">
            <input>fcs/flap-cmd-norm</input>
            <traverse>
               <setting>
                  <position>0</position>
                  <time>0</time>
               </setting>
               <setting>
                  <position>35.0</position>
                  <time>1</time>
               </setting>
            </traverse>
            <output>fcs/flap-pos-deg</output>
         </kinematic>
      </channel>
   </flight_control>
   <output name="D150 AGILE.csv" rate="10" type="CSV">
      <property>aero/function/drag_coeff_basic_Mach</property>
      <property>aero/forces/drag_basic_Mach</property>
      <property>aero/function/side_coeff_basic_Mach</property>
      <property>aero/forces/side_basic_Mach</property>
      <property>aero/function/lift_coeff_basic_Mach</property>
      <property>aero/forces/lift_basic_Mach</property>
      <property>aero/function/roll_coeff_basic_Mach</property>
      <property>aero/forces/roll_basic_Mach</property>
      <property>aero/function/pitch_coeff_basic_Mach</property>
      <property>aero/forces/pitch_basic_Mach</property>
      <property>aero/function/yaw_coeff_basic_Mach</property>
      <property>aero/forces/yaw_basic_Mach</property>
      <property>aero/function/flap_inner_drag_coeff_basic_Mach</property>
      <property>aero/forces/flap_inner_drag_basic_Mach</property>
      <property>aero/function/flap_inner_side_coeff_basic_Mach</property>
      <property>aero/forces/flap_inner_side_basic_Mach</property>
      <property>aero/function/flap_inner_lift_coeff_basic_Mach</property>
      <property>aero/forces/flap_inner_lift_basic_Mach</property>
      <property>aero/function/flap_inner_roll_coeff_basic_Mach</property>
      <property>aero/forces/flap_inner_roll_basic_Mach</property>
      <property>aero/function/flap_inner_pitch_coeff_basic_Mach</property>
      <property>aero/forces/flap_inner_pitch_basic_Mach</property>
      <property>aero/function/flap_inner_yaw_coeff_basic_Mach</property>
      <property>aero/forces/flap_inner_yaw_basic_Mach</property>
      <property>aero/function/flap_outer_drag_coeff_basic_Mach</property>
      <property>aero/forces/flap_outer_drag_basic_Mach</property>
      <property>aero/function/flap_outer_side_coeff_basic_Mach</property>
      <property>aero/forces/flap_outer_side_basic_Mach</property>
      <property>aero/function/flap_outer_lift_coeff_basic_Mach</property>
      <property>aero/forces/flap_outer_lift_basic_Mach</property>
      <property>aero/function/flap_outer_roll_coeff_basic_Mach</property>
      <property>aero/forces/flap_outer_roll_basic_Mach</property>
      <property>aero/function/flap_outer_pitch_coeff_basic_Mach</property>
      <property>aero/forces/flap_outer_pitch_basic_Mach</property>
      <property>aero/function/flap_outer_yaw_coeff_basic_Mach</property>
      <property>aero/forces/flap_outer_yaw_basic_Mach</property>
      <property>aero/function/aileron_drag_coeff_basic_Mach</property>
      <property>aero/forces/aileron_drag_basic_Mach</property>
      <property>aero/function/aileron_side_coeff_basic_Mach</property>
      <property>aero/forces/aileron_side_basic_Mach</property>
      <property>aero/function/aileron_lift_coeff_basic_Mach</property>
      <property>aero/forces/aileron_lift_basic_Mach</property>
      <property>aero/function/aileron_roll_coeff_basic_Mach</property>
      <property>aero/forces/aileron_roll_basic_Mach</property>
      <property>aero/function/aileron_pitch_coeff_basic_Mach</property>
      <property>aero/forces/aileron_pitch_basic_Mach</property>
      <property>aero/function/aileron_yaw_coeff_basic_Mach</property>
      <property>aero/forces/aileron_yaw_basic_Mach</property>
      <property>aero/function/elevator_drag_coeff_basic_Mach</property>
      <property>aero/forces/elevator_drag_basic_Mach</property>
      <property>aero/function/elevator_side_coeff_basic_Mach</property>
      <property>aero/forces/elevator_side_basic_Mach</property>
      <property>aero/function/elevator_lift_coeff_basic_Mach</property>
      <property>aero/forces/elevator_lift_basic_Mach</property>
      <property>aero/function/elevator_roll_coeff_basic_Mach</property>
      <property>aero/forces/elevator_roll_basic_Mach</property>
      <property>aero/function/elevator_pitch_coeff_basic_Mach</property>
      <property>aero/forces/elevator_pitch_basic_Mach</property>
      <property>aero/function/elevator_yaw_coeff_basic_Mach</property>
      <property>aero/forces/elevator_yaw_basic_Mach</property>
      <property>aero/function/rudder_drag_coeff_basic_Mach</property>
      <property>aero/forces/rudder_drag_basic_Mach</property>
      <property>aero/function/rudder_side_coeff_basic_Mach</property>
      <property>aero/forces/rudder_side_basic_Mach</property>
      <property>aero/function/rudder_lift_coeff_basic_Mach</property>
      <property>aero/forces/rudder_lift_basic_Mach</property>
      <property>aero/function/rudder_roll_coeff_basic_Mach</property>
      <property>aero/forces/rudder_roll_basic_Mach</property>
      <property>aero/function/rudder_pitch_coeff_basic_Mach</property>
      <property>aero/forces/rudder_pitch_basic_Mach</property>
      <property>aero/function/rudder_yaw_coeff_basic_Mach</property>
      <property>aero/forces/rudder_yaw_basic_Mach</property>
      <property>aero/function/p-drag_coeff_basic_Mach</property>
      <property>aero/forces/p-drag_basic_Mach</property>
      <property>aero/function/p-side_coeff_basic_Mach</property>
      <property>aero/forces/p-side_basic_Mach</property>
      <property>aero/function/p-lift_coeff_basic_Mach</property>
      <property>aero/forces/p-lift_basic_Mach</property>
      <property>aero/function/p-roll_coeff_basic_Mach</property>
      <property>aero/forces/p-roll_basic_Mach</property>
      <property>aero/function/p-pitch_coeff_basic_Mach</property>
      <property>aero/forces/p-pitch_basic_Mach</property>
      <property>aero/function/p-yaw_coeff_basic_Mach</property>
      <property>aero/forces/p-yaw_basic_Mach</property>
      <property>aero/function/q-drag_coeff_basic_Mach</property>
      <property>aero/forces/q-drag_basic_Mach</property>
      <property>aero/function/q-side_coeff_basic_Mach</property>
      <property>aero/forces/q-side_basic_Mach</property>
      <property>aero/function/q-lift_coeff_basic_Mach</property>
      <property>aero/forces/q-lift_basic_Mach</property>
      <property>aero/function/q-roll_coeff_basic_Mach</property>
      <property>aero/forces/q-roll_basic_Mach</property>
      <property>aero/function/q-pitch_coeff_basic_Mach</property>
      <property>aero/forces/q-pitch_basic_Mach</property>
      <property>aero/function/q-yaw_coeff_basic_Mach</property>
      <property>aero/forces/q-yaw_basic_Mach</property>
      <property>aero/function/r-drag_coeff_basic_Mach</property>
      <property>aero/forces/r-drag_basic_Mach</property>
      <property>aero/function/r-side_coeff_basic_Mach</property>
      <property>aero/forces/r-side_basic_Mach</property>
      <property>aero/function/r-lift_coeff_basic_Mach</property>
      <property>aero/forces/r-lift_basic_Mach</property>
      <property>aero/function/r-roll_coeff_basic_Mach</property>
      <property>aero/forces/r-roll_basic_Mach</property>
      <property>aero/function/r-pitch_coeff_basic_Mach</property>
      <property>aero/forces/r-pitch_basic_Mach</property>
      <property>aero/function/r-yaw_coeff_basic_Mach</property>
      <property>aero/forces/r-yaw_basic_Mach</property>
      <property>aero/alpha-deg</property>
      <property>aero/beta-deg</property>
      <property>aero/Re</property>
      <property>velocities/mach</property>
      <property>propulsion/engine[0]/thrust-lbs</property>
      <property>propulsion/engine[1]/thrust-lbs</property>
      <property>position/h-sl-meters</property>
      <property>attitude/phi-deg</property>
      <property>attitude/theta-deg</property>
      <property>attitude/psi-deg</property>
      <property>velocities/vtrue-kts</property>
      <property>velocities/h-dot-fps</property>
      <property>velocities/p-rad_sec</property>
      <property>velocities/q-rad_sec</property>
      <property>velocities/r-rad_sec</property>
   </output>
   <aerodynamics>
      <function name="aero/function/drag_coeff_basic_M0">
         <description>drag_coefficient as function of alpha beta Reynolds, fixed Mach = 0.2</description>
         <table>
            <independentVar lookup="row">aero/alpha-deg</independentVar>
            <independentVar lookup="column">aero/beta-deg</independentVar>
            <independentVar lookup="table">position/h-sl-ft</independentVar>
            <tableData breakPoint="0.0">
 	0.0	10.0
-5.0	0.0023269	0.0060919
-2.5	6.5935E-4	0.0048237
0.0	0.0026414	0.0070857
1.0	0.0044559	0.0089812
2.0	0.006848	0.011438
3.0	0.0098064	0.014444
4.0	0.013309	0.017961
5.0	0.017318	0.021851
6.0	0.0218	0.025547
7.5	0.029626	0.030209
10.0	0.046789	0.0516
12.5	0.067589	0.071166
</tableData>
            <tableData breakPoint="6561.68">
 	0.0	10.0
-5.0	0.0023269	0.0060919
-2.5	6.5935E-4	0.0048237
0.0	0.0026414	0.0070857
1.0	0.0044559	0.0089812
2.0	0.006848	0.011438
3.0	0.0098064	0.014444
4.0	0.013309	0.017961
5.0	0.017318	0.021851
6.0	0.0218	0.025547
7.5	0.029626	0.030209
10.0	0.046789	0.0516
12.5	0.067589	0.071166
</tableData>
            <tableData breakPoint="16404.2">
 	0.0	10.0
-5.0	0.0023269	0.0060919
-2.5	6.5935E-4	0.0048237
0.0	0.0026414	0.0070857
1.0	0.0044559	0.0089812
2.0	0.006848	0.011438
3.0	0.0098064	0.014444
4.0	0.013309	0.017961
5.0	0.017318	0.021851
6.0	0.0218	0.025547
7.5	0.029626	0.030209
10.0	0.046789	0.0516
12.5	0.067589	0.071166
</tableData>
            <tableData breakPoint="26246.72">
 	0.0	10.0
-5.0	0.0023269	0.0060919
-2.5	6.5935E-4	0.0048237
0.0	0.0026414	0.0070857
1.0	0.0044559	0.0089812
2.0	0.006848	0.011438
3.0	0.0098064	0.014444
4.0	0.013309	0.017961
5.0	0.017318	0.021851
6.0	0.0218	0.025547
7.5	0.029626	0.030209
10.0	0.046789	0.0516
12.5	0.067589	0.071166
</tableData>
         </table>
      </function>
      <function name="aero/function/drag_coeff_basic_M1">
         <description>drag_coefficient as function of alpha beta Reynolds, fixed Mach = 0.6</description>
         <table>
            <independentVar lookup="row">aero/alpha-deg</independentVar>
            <independentVar lookup="column">aero/beta-deg</independentVar>
            <independentVar lookup="table">position/h-sl-ft</independentVar>
            <tableData breakPoint="0.0">
 	0.0	10.0
-5.0	0.0028498	0.007461
-2.5	8.0753E-4	0.0059078
0.0	0.0032351	0.0086781
1.0	0.0054574	0.011
2.0	0.0083871	0.014009
3.0	0.01201	0.01769
4.0	0.0163	0.021997
5.0	0.02121	0.026762
6.0	0.0267	0.031289
7.5	0.036284	0.036999
10.0	0.057304	0.063197
12.5	0.08278	0.087161
</tableData>
            <tableData breakPoint="6561.68">
 	0.0	10.0
-5.0	0.0028498	0.007461
-2.5	8.0753E-4	0.0059078
0.0	0.0032351	0.0086781
1.0	0.0054574	0.011
2.0	0.0083871	0.014009
3.0	0.01201	0.01769
4.0	0.0163	0.021997
5.0	0.02121	0.026762
6.0	0.0267	0.031289
7.5	0.036284	0.036999
10.0	0.057304	0.063197
12.5	0.08278	0.087161
</tableData>
            <tableData breakPoint="16404.2">
 	0.0	10.0
-5.0	0.0028498	0.007461
-2.5	8.0753E-4	0.0059078
0.0	0.0032351	0.0086781
1.0	0.0054574	0.011
2.0	0.0083871	0.014009
3.0	0.01201	0.01769
4.0	0.0163	0.021997
5.0	0.02121	0.026762
6.0	0.0267	0.031289
7.5	0.036284	0.036999
10.0	0.057304	0.063197
12.5	0.08278	0.087161
</tableData>
            <tableData breakPoint="26246.72">
 	0.0	10.0
-5.0	0.0028498	0.007461
-2.5	8.0753E-4	0.0059078
0.0	0.0032351	0.0086781
1.0	0.0054574	0.011
2.0	0.0083871	0.014009
3.0	0.01201	0.01769
4.0	0.0163	0.021997
5.0	0.02121	0.026762
6.0	0.0267	0.031289
7.5	0.036284	0.036999
10.0	0.057304	0.063197
12.5	0.08278	0.087161
</tableData>
         </table>
      </function>
      <function name="aero/function/drag_coeff_basic_M2">
         <description>drag_coefficient as function of alpha beta Reynolds, fixed Mach = 0.78</description>
         <table>
            <independentVar lookup="row">aero/alpha-deg</independentVar>
            <independentVar lookup="column">aero/beta-deg</independentVar>
            <independentVar lookup="table">position/h-sl-ft</independentVar>
            <tableData breakPoint="0.0">
 	0.0	10.0
-5.0	0.0036433	0.0095381
-2.5	0.0010324	0.0075526
0.0	0.0041358	0.011094
1.0	0.0069767	0.014062
2.0	0.010722	0.017909
3.0	0.015354	0.022615
4.0	0.020838	0.028122
5.0	0.027114	0.034212
6.0	0.034133	0.04
7.5	0.046385	0.047299
10.0	0.073258	0.080792
12.5	0.10583	0.11143
</tableData>
            <tableData breakPoint="6561.68">
 	0.0	10.0
-5.0	0.0036433	0.0095381
-2.5	0.0010324	0.0075526
0.0	0.0041358	0.011094
1.0	0.0069767	0.014062
2.0	0.010722	0.017909
3.0	0.015354	0.022615
4.0	0.020838	0.028122
5.0	0.027114	0.034212
6.0	0.034133	0.04
7.5	0.046385	0.047299
10.0	0.073258	0.080792
12.5	0.10583	0.11143
</tableData>
            <tableData breakPoint="16404.2">
 	0.0	10.0
-5.0	0.0036433	0.0095381
-2.5	0.0010324	0.0075526
0.0	0.0041358	0.011094
1.0	0.0069767	0.014062
2.0	0.010722	0.017909
3.0	0.015354	0.022615
4.0	0.020838	0.028122
5.0	0.027114	0.034212
6.0	0.034133	0.04
7.5	0.046385	0.047299
10.0	0.073258	0.080792
12.5	0.10583	0.11143
</tableData>
            <tableData breakPoint="26246.72">
 	0.0	10.0
-5.0	0.0036433	0.0095381
-2.5	0.0010324	0.0075526
0.0	0.0041358	0.011094
1.0	0.0069767	0.014062
2.0	0.010722	0.017909
3.0	0.015354	0.022615
4.0	0.020838	0.028122
5.0	0.027114	0.034212
6.0	0.034133	0.04
7.5	0.046385	0.047299
10.0	0.073258	0.080792
12.5	0.10583	0.11143
</tableData>
         </table>
      </function>
      <function name="aero/function/drag_coeff_basic_M3">
         <description>drag_coefficient as function of alpha beta Reynolds, fixed Mach = 0.8</description>
         <table>
            <independentVar lookup="row">aero/alpha-deg</independentVar>
            <independentVar lookup="column">aero/beta-deg</independentVar>
            <independentVar lookup="table">position/h-sl-ft</independentVar>
            <tableData breakPoint="0.0">
 	0.0	10.0
-5.0	0.0037998	0.009948
-2.5	0.0010767	0.0078771
0.0	0.0043135	0.011571
1.0	0.0072765	0.014666
2.0	0.011183	0.018678
3.0	0.016014	0.023587
4.0	0.021733	0.02933
5.0	0.028279	0.035682
6.0	0.0356	0.041718
7.5	0.048378	0.049332
10.0	0.076406	0.084263
12.5	0.11037	0.11621
</tableData>
            <tableData breakPoint="6561.68">
 	0.0	10.0
-5.0	0.0037998	0.009948
-2.5	0.0010767	0.0078771
0.0	0.0043135	0.011571
1.0	0.0072765	0.014666
2.0	0.011183	0.018678
3.0	0.016014	0.023587
4.0	0.021733	0.02933
5.0	0.028279	0.035682
6.0	0.0356	0.041718
7.5	0.048378	0.049332
10.0	0.076406	0.084263
12.5	0.11037	0.11621
</tableData>
            <tableData breakPoint="16404.2">
 	0.0	10.0
-5.0	0.0037998	0.009948
-2.5	0.0010767	0.0078771
0.0	0.0043135	0.011571
1.0	0.0072765	0.014666
2.0	0.011183	0.018678
3.0	0.016014	0.023587
4.0	0.021733	0.02933
5.0	0.028279	0.035682
6.0	0.0356	0.041718
7.5	0.048378	0.049332
10.0	0.076406	0.084263
12.5	0.11037	0.11621
</tableData>
            <tableData breakPoint="26246.72">
 	0.0	10.0
-5.0	0.0037998	0.009948
-2.5	0.0010767	0.0078771
0.0	0.0043135	0.011571
1.0	0.0072765	0.014666
2.0	0.011183	0.018678
3.0	0.016014	0.023587
4.0	0.021733	0.02933
5.0	0.028279	0.035682
6.0	0.0356	0.041718
7.5	0.048378	0.049332
10.0	0.076406	0.084263
12.5	0.11037	0.11621
</tableData>
         </table>
      </function>
      <function name="aero/function/drag_coeff_basic_Mach">
         <description>drag_coefficient as function of alpha beta Reynolds and Mach</description>
         <interpolate1d>
            <p>velocities/mach</p>
            <v>0.2000</v>
            <p>aero/function/drag_coeff_basic_M0</p>
            <v>0.6000</v>
            <p>aero/function/drag_coeff_basic_M1</p>
            <v>0.7800</v>
            <p>aero/function/drag_coeff_basic_M2</p>
            <v>0.8000</v>
            <p>aero/function/drag_coeff_basic_M3</p>
         </interpolate1d>
      </function>
      <function name="aero/function/side_coeff_basic_M0">
         <description>side_coefficient as function of alpha beta Reynolds, fixed Mach = 0.2</description>
         <table>
            <independentVar lookup="row">aero/alpha-deg</independentVar>
            <independentVar lookup="column">aero/beta-deg</independentVar>
            <independentVar lookup="table">position/h-sl-ft</independentVar>
            <tableData breakPoint="0.0">
 	0.0	10.0
-5.0	3.0561E-7	-0.079925
-2.5	3.0249E-7	-0.07997
0.0	2.9894E-7	-0.079806
1.0	2.9741E-7	-0.079699
2.0	2.9579E-7	-0.079587
3.0	2.9405E-7	-0.079499
4.0	2.9213E-7	-0.079504
5.0	2.8995E-7	-0.079775
6.0	2.8753E-7	-0.080752
7.5	2.8457E-7	-0.079987
10.0	2.8667E-7	-0.076127
12.5	2.9322E-7	-0.065168
</tableData>
            <tableData breakPoint="6561.68">
 	0.0	10.0
-5.0	3.0561E-7	-0.079925
-2.5	3.0249E-7	-0.07997
0.0	2.9894E-7	-0.079806
1.0	2.9741E-7	-0.079699
2.0	2.9579E-7	-0.079587
3.0	2.9405E-7	-0.079499
4.0	2.9213E-7	-0.079504
5.0	2.8995E-7	-0.079775
6.0	2.8753E-7	-0.080752
7.5	2.8457E-7	-0.079987
10.0	2.8667E-7	-0.076127
12.5	2.9322E-7	-0.065168
</tableData>
            <tableData breakPoint="16404.2">
 	0.0	10.0
-5.0	3.0561E-7	-0.079925
-2.5	3.0249E-7	-0.07997
0.0	2.9894E-7	-0.079806
1.0	2.9741E-7	-0.079699
2.0	2.9579E-7	-0.079587
3.0	2.9405E-7	-0.079499
4.0	2.9213E-7	-0.079504
5.0	2.8995E-7	-0.079775
6.0	2.8753E-7	-0.080752
7.5	2.8457E-7	-0.079987
10.0	2.8667E-7	-0.076127
12.5	2.9322E-7	-0.065168
</tableData>
            <tableData breakPoint="26246.72">
 	0.0	10.0
-5.0	3.0561E-7	-0.079925
-2.5	3.0249E-7	-0.07997
0.0	2.9894E-7	-0.079806
1.0	2.9741E-7	-0.079699
2.0	2.9579E-7	-0.079587
3.0	2.9405E-7	-0.079499
4.0	2.9213E-7	-0.079504
5.0	2.8995E-7	-0.079775
6.0	2.8753E-7	-0.080752
7.5	2.8457E-7	-0.079987
10.0	2.8667E-7	-0.076127
12.5	2.9322E-7	-0.065168
</tableData>
         </table>
      </function>
      <function name="aero/function/side_coeff_basic_M1">
         <description>side_coefficient as function of alpha beta Reynolds, fixed Mach = 0.6</description>
         <table>
            <independentVar lookup="row">aero/alpha-deg</independentVar>
            <independentVar lookup="column">aero/beta-deg</independentVar>
            <independentVar lookup="table">position/h-sl-ft</independentVar>
            <tableData breakPoint="0.0">
 	0.0	10.0
-5.0	3.743E-7	-0.097887
-2.5	3.7047E-7	-0.097943
0.0	3.6613E-7	-0.097742
1.0	3.6425E-7	-0.097611
2.0	3.6227E-7	-0.097474
3.0	3.6014E-7	-0.097366
4.0	3.5779E-7	-0.097372
5.0	3.5511E-7	-0.097704
6.0	3.5215E-7	-0.098901
7.5	3.4852E-7	-0.097964
10.0	3.511E-7	-0.093236
12.5	3.5912E-7	-0.079814
</tableData>
            <tableData breakPoint="6561.68">
 	0.0	10.0
-5.0	3.743E-7	-0.097887
-2.5	3.7047E-7	-0.097943
0.0	3.6613E-7	-0.097742
1.0	3.6425E-7	-0.097611
2.0	3.6227E-7	-0.097474
3.0	3.6014E-7	-0.097366
4.0	3.5779E-7	-0.097372
5.0	3.5511E-7	-0.097704
6.0	3.5215E-7	-0.098901
7.5	3.4852E-7	-0.097964
10.0	3.511E-7	-0.093236
12.5	3.5912E-7	-0.079814
</tableData>
            <tableData breakPoint="16404.2">
 	0.0	10.0
-5.0	3.743E-7	-0.097887
-2.5	3.7047E-7	-0.097943
0.0	3.6613E-7	-0.097742
1.0	3.6425E-7	-0.097611
2.0	3.6227E-7	-0.097474
3.0	3.6014E-7	-0.097366
4.0	3.5779E-7	-0.097372
5.0	3.5511E-7	-0.097704
6.0	3.5215E-7	-0.098901
7.5	3.4852E-7	-0.097964
10.0	3.511E-7	-0.093236
12.5	3.5912E-7	-0.079814
</tableData>
            <tableData breakPoint="26246.72">
 	0.0	10.0
-5.0	3.743E-7	-0.097887
-2.5	3.7047E-7	-0.097943
0.0	3.6613E-7	-0.097742
1.0	3.6425E-7	-0.097611
2.0	3.6227E-7	-0.097474
3.0	3.6014E-7	-0.097366
4.0	3.5779E-7	-0.097372
5.0	3.5511E-7	-0.097704
6.0	3.5215E-7	-0.098901
7.5	3.4852E-7	-0.097964
10.0	3.511E-7	-0.093236
12.5	3.5912E-7	-0.079814
</tableData>
         </table>
      </function>
      <function name="aero/function/side_coeff_basic_M2">
         <description>side_coefficient as function of alpha beta Reynolds, fixed Mach = 0.78</description>
         <table>
            <independentVar lookup="row">aero/alpha-deg</independentVar>
            <independentVar lookup="column">aero/beta-deg</independentVar>
            <independentVar lookup="table">position/h-sl-ft</independentVar>
            <tableData breakPoint="0.0">
 	0.0	10.0
-5.0	4.785E-7	-0.12514
-2.5	4.7362E-7	-0.12521
0.0	4.6806E-7	-0.12495
1.0	4.6566E-7	-0.12479
2.0	4.6313E-7	-0.12461
3.0	4.6041E-7	-0.12447
4.0	4.574E-7	-0.12448
5.0	4.5398E-7	-0.1249
6.0	4.5019E-7	-0.12644
7.5	4.4555E-7	-0.12524
10.0	4.4885E-7	-0.11919
12.5	4.5909E-7	-0.10204
</tableData>
            <tableData breakPoint="6561.68">
 	0.0	10.0
-5.0	4.785E-7	-0.12514
-2.5	4.7362E-7	-0.12521
0.0	4.6806E-7	-0.12495
1.0	4.6566E-7	-0.12479
2.0	4.6313E-7	-0.12461
3.0	4.6041E-7	-0.12447
4.0	4.574E-7	-0.12448
5.0	4.5398E-7	-0.1249
6.0	4.5019E-7	-0.12644
7.5	4.4555E-7	-0.12524
10.0	4.4885E-7	-0.11919
12.5	4.5909E-7	-0.10204
</tableData>
            <tableData breakPoint="16404.2">
 	0.0	10.0
-5.0	4.785E-7	-0.12514
-2.5	4.7362E-7	-0.12521
0.0	4.6806E-7	-0.12495
1.0	4.6566E-7	-0.12479
2.0	4.6313E-7	-0.12461
3.0	4.6041E-7	-0.12447
4.0	4.574E-7	-0.12448
5.0	4.5398E-7	-0.1249
6.0	4.5019E-7	-0.12644
7.5	4.4555E-7	-0.12524
10.0	4.4885E-7	-0.11919
12.5	4.5909E-7	-0.10204
</tableData>
            <tableData breakPoint="26246.72">
 	0.0	10.0
-5.0	4.785E-7	-0.12514
-2.5	4.7362E-7	-0.12521
0.0	4.6806E-7	-0.12495
1.0	4.6566E-7	-0.12479
2.0	4.6313E-7	-0.12461
3.0	4.6041E-7	-0.12447
4.0	4.574E-7	-0.12448
5.0	4.5398E-7	-0.1249
6.0	4.5019E-7	-0.12644
7.5	4.4555E-7	-0.12524
10.0	4.4885E-7	-0.11919
12.5	4.5909E-7	-0.10204
</tableData>
         </table>
      </function>
      <function name="aero/function/side_coeff_basic_M3">
         <description>side_coefficient as function of alpha beta Reynolds, fixed Mach = 0.8</description>
         <table>
            <independentVar lookup="row">aero/alpha-deg</independentVar>
            <independentVar lookup="column">aero/beta-deg</independentVar>
            <independentVar lookup="table">position/h-sl-ft</independentVar>
            <tableData breakPoint="0.0">
 	0.0	10.0
-5.0	4.9906E-7	-0.13052
-2.5	4.9397E-7	-0.13059
0.0	4.8817E-7	-0.13032
1.0	4.8567E-7	-0.13015
2.0	4.8302E-7	-0.12996
3.0	4.8019E-7	-0.12982
4.0	4.7705E-7	-0.12983
5.0	4.7348E-7	-0.13027
6.0	4.6953E-7	-0.13187
7.5	4.647E-7	-0.13062
10.0	4.6813E-7	-0.12432
12.5	4.7882E-7	-0.10642
</tableData>
            <tableData breakPoint="6561.68">
 	0.0	10.0
-5.0	4.9906E-7	-0.13052
-2.5	4.9397E-7	-0.13059
0.0	4.8817E-7	-0.13032
1.0	4.8567E-7	-0.13015
2.0	4.8302E-7	-0.12996
3.0	4.8019E-7	-0.12982
4.0	4.7705E-7	-0.12983
5.0	4.7348E-7	-0.13027
6.0	4.6953E-7	-0.13187
7.5	4.647E-7	-0.13062
10.0	4.6813E-7	-0.12432
12.5	4.7882E-7	-0.10642
</tableData>
            <tableData breakPoint="16404.2">
 	0.0	10.0
-5.0	4.9906E-7	-0.13052
-2.5	4.9397E-7	-0.13059
0.0	4.8817E-7	-0.13032
1.0	4.8567E-7	-0.13015
2.0	4.8302E-7	-0.12996
3.0	4.8019E-7	-0.12982
4.0	4.7705E-7	-0.12983
5.0	4.7348E-7	-0.13027
6.0	4.6953E-7	-0.13187
7.5	4.647E-7	-0.13062
10.0	4.6813E-7	-0.12432
12.5	4.7882E-7	-0.10642
</tableData>
            <tableData breakPoint="26246.72">
 	0.0	10.0
-5.0	4.9906E-7	-0.13052
-2.5	4.9397E-7	-0.13059
0.0	4.8817E-7	-0.13032
1.0	4.8567E-7	-0.13015
2.0	4.8302E-7	-0.12996
3.0	4.8019E-7	-0.12982
4.0	4.7705E-7	-0.12983
5.0	4.7348E-7	-0.13027
6.0	4.6953E-7	-0.13187
7.5	4.647E-7	-0.13062
10.0	4.6813E-7	-0.12432
12.5	4.7882E-7	-0.10642
</tableData>
         </table>
      </function>
      <function name="aero/function/side_coeff_basic_Mach">
         <description>side_coefficient as function of alpha beta Reynolds and Mach</description>
         <interpolate1d>
            <p>velocities/mach</p>
            <v>0.2000</v>
            <p>aero/function/side_coeff_basic_M0</p>
            <v>0.6000</v>
            <p>aero/function/side_coeff_basic_M1</p>
            <v>0.7800</v>
            <p>aero/function/side_coeff_basic_M2</p>
            <v>0.8000</v>
            <p>aero/function/side_coeff_basic_M3</p>
         </interpolate1d>
      </function>
      <function name="aero/function/lift_coeff_basic_M0">
         <description>lift_coefficient as function of alpha beta Reynolds, fixed Mach = 0.2</description>
         <table>
            <independentVar lookup="row">aero/alpha-deg</independentVar>
            <independentVar lookup="column">aero/beta-deg</independentVar>
            <independentVar lookup="table">position/h-sl-ft</independentVar>
            <tableData breakPoint="0.0">
 	0.0	10.0
-5.0	-0.16826	-0.15009
-2.5	0.057977	0.070055
0.0	0.28312	0.28952
1.0	0.37262	0.37692
2.0	0.46161	0.46396
3.0	0.54989	0.55043
4.0	0.63713	0.6358
5.0	0.72293	0.7185
6.0	0.8072	0.79378
7.5	0.93403	0.91438
10.0	1.1596	1.1531
12.5	1.3879	1.3716
</tableData>
            <tableData breakPoint="6561.68">
 	0.0	10.0
-5.0	-0.16826	-0.15009
-2.5	0.057977	0.070055
0.0	0.28312	0.28952
1.0	0.37262	0.37692
2.0	0.46161	0.46396
3.0	0.54989	0.55043
4.0	0.63713	0.6358
5.0	0.72293	0.7185
6.0	0.8072	0.79378
7.5	0.93403	0.91438
10.0	1.1596	1.1531
12.5	1.3879	1.3716
</tableData>
            <tableData breakPoint="16404.2">
 	0.0	10.0
-5.0	-0.16826	-0.15009
-2.5	0.057977	0.070055
0.0	0.28312	0.28952
1.0	0.37262	0.37692
2.0	0.46161	0.46396
3.0	0.54989	0.55043
4.0	0.63713	0.6358
5.0	0.72293	0.7185
6.0	0.8072	0.79378
7.5	0.93403	0.91438
10.0	1.1596	1.1531
12.5	1.3879	1.3716
</tableData>
            <tableData breakPoint="26246.72">
 	0.0	10.0
-5.0	-0.16826	-0.15009
-2.5	0.057977	0.070055
0.0	0.28312	0.28952
1.0	0.37262	0.37692
2.0	0.46161	0.46396
3.0	0.54989	0.55043
4.0	0.63713	0.6358
5.0	0.72293	0.7185
6.0	0.8072	0.79378
7.5	0.93403	0.91438
10.0	1.1596	1.1531
12.5	1.3879	1.3716
</tableData>
         </table>
      </function>
      <function name="aero/function/lift_coeff_basic_M1">
         <description>lift_coefficient as function of alpha beta Reynolds, fixed Mach = 0.6</description>
         <table>
            <independentVar lookup="row">aero/alpha-deg</independentVar>
            <independentVar lookup="column">aero/beta-deg</independentVar>
            <independentVar lookup="table">position/h-sl-ft</independentVar>
            <tableData breakPoint="0.0">
 	0.0	10.0
-5.0	-0.20608	-0.18382
-2.5	0.071007	0.0858
0.0	0.34675	0.35458
1.0	0.45636	0.46163
2.0	0.56535	0.56823
3.0	0.67347	0.67414
4.0	0.78032	0.77869
5.0	0.88541	0.87998
6.0	0.98861	0.97218
7.5	1.144	1.1199
10.0	1.4202	1.4123
12.5	1.6998	1.6799
</tableData>
            <tableData breakPoint="6561.68">
 	0.0	10.0
-5.0	-0.20608	-0.18382
-2.5	0.071007	0.0858
0.0	0.34675	0.35458
1.0	0.45636	0.46163
2.0	0.56535	0.56823
3.0	0.67347	0.67414
4.0	0.78032	0.77869
5.0	0.88541	0.87998
6.0	0.98861	0.97218
7.5	1.144	1.1199
10.0	1.4202	1.4123
12.5	1.6998	1.6799
</tableData>
            <tableData breakPoint="16404.2">
 	0.0	10.0
-5.0	-0.20608	-0.18382
-2.5	0.071007	0.0858
0.0	0.34675	0.35458
1.0	0.45636	0.46163
2.0	0.56535	0.56823
3.0	0.67347	0.67414
4.0	0.78032	0.77869
5.0	0.88541	0.87998
6.0	0.98861	0.97218
7.5	1.144	1.1199
10.0	1.4202	1.4123
12.5	1.6998	1.6799
</tableData>
            <tableData breakPoint="26246.72">
 	0.0	10.0
-5.0	-0.20608	-0.18382
-2.5	0.071007	0.0858
0.0	0.34675	0.35458
1.0	0.45636	0.46163
2.0	0.56535	0.56823
3.0	0.67347	0.67414
4.0	0.78032	0.77869
5.0	0.88541	0.87998
6.0	0.98861	0.97218
7.5	1.144	1.1199
10.0	1.4202	1.4123
12.5	1.6998	1.6799
</tableData>
         </table>
      </function>
      <function name="aero/function/lift_coeff_basic_M2">
         <description>lift_coefficient as function of alpha beta Reynolds, fixed Mach = 0.78</description>
         <table>
            <independentVar lookup="row">aero/alpha-deg</independentVar>
            <independentVar lookup="column">aero/beta-deg</independentVar>
            <independentVar lookup="table">position/h-sl-ft</independentVar>
            <tableData breakPoint="0.0">
 	0.0	10.0
-5.0	-0.26345	-0.23499
-2.5	0.090775	0.10969
0.0	0.44329	0.4533
1.0	0.58341	0.59015
2.0	0.72275	0.72643
3.0	0.86097	0.86182
4.0	0.99757	0.99548
5.0	1.1319	1.125
6.0	1.2638	1.2428
7.5	1.4624	1.4317
10.0	1.8155	1.8055
12.5	2.173	2.1476
</tableData>
            <tableData breakPoint="6561.68">
 	0.0	10.0
-5.0	-0.26345	-0.23499
-2.5	0.090775	0.10969
0.0	0.44329	0.4533
1.0	0.58341	0.59015
2.0	0.72275	0.72643
3.0	0.86097	0.86182
4.0	0.99757	0.99548
5.0	1.1319	1.125
6.0	1.2638	1.2428
7.5	1.4624	1.4317
10.0	1.8155	1.8055
12.5	2.173	2.1476
</tableData>
            <tableData breakPoint="16404.2">
 	0.0	10.0
-5.0	-0.26345	-0.23499
-2.5	0.090775	0.10969
0.0	0.44329	0.4533
1.0	0.58341	0.59015
2.0	0.72275	0.72643
3.0	0.86097	0.86182
4.0	0.99757	0.99548
5.0	1.1319	1.125
6.0	1.2638	1.2428
7.5	1.4624	1.4317
10.0	1.8155	1.8055
12.5	2.173	2.1476
</tableData>
            <tableData breakPoint="26246.72">
 	0.0	10.0
-5.0	-0.26345	-0.23499
-2.5	0.090775	0.10969
0.0	0.44329	0.4533
1.0	0.58341	0.59015
2.0	0.72275	0.72643
3.0	0.86097	0.86182
4.0	0.99757	0.99548
5.0	1.1319	1.125
6.0	1.2638	1.2428
7.5	1.4624	1.4317
10.0	1.8155	1.8055
12.5	2.173	2.1476
</tableData>
         </table>
      </function>
      <function name="aero/function/lift_coeff_basic_M3">
         <description>lift_coefficient as function of alpha beta Reynolds, fixed Mach = 0.8</description>
         <table>
            <independentVar lookup="row">aero/alpha-deg</independentVar>
            <independentVar lookup="column">aero/beta-deg</independentVar>
            <independentVar lookup="table">position/h-sl-ft</independentVar>
            <tableData breakPoint="0.0">
 	0.0	10.0
-5.0	-0.27477	-0.24509
-2.5	0.094676	0.1144
0.0	0.46234	0.47278
1.0	0.60848	0.6155
2.0	0.7538	0.75765
3.0	0.89796	0.89885
4.0	1.0404	1.0383
5.0	1.1805	1.1733
6.0	1.3181	1.2962
7.5	1.5253	1.4932
10.0	1.8935	1.8831
12.5	2.2664	2.2399
</tableData>
            <tableData breakPoint="6561.68">
 	0.0	10.0
-5.0	-0.27477	-0.24509
-2.5	0.094676	0.1144
0.0	0.46234	0.47278
1.0	0.60848	0.6155
2.0	0.7538	0.75765
3.0	0.89796	0.89885
4.0	1.0404	1.0383
5.0	1.1805	1.1733
6.0	1.3181	1.2962
7.5	1.5253	1.4932
10.0	1.8935	1.8831
12.5	2.2664	2.2399
</tableData>
            <tableData breakPoint="16404.2">
 	0.0	10.0
-5.0	-0.27477	-0.24509
-2.5	0.094676	0.1144
0.0	0.46234	0.47278
1.0	0.60848	0.6155
2.0	0.7538	0.75765
3.0	0.89796	0.89885
4.0	1.0404	1.0383
5.0	1.1805	1.1733
6.0	1.3181	1.2962
7.5	1.5253	1.4932
10.0	1.8935	1.8831
12.5	2.2664	2.2399
</tableData>
            <tableData breakPoint="26246.72">
 	0.0	10.0
-5.0	-0.27477	-0.24509
-2.5	0.094676	0.1144
0.0	0.46234	0.47278
1.0	0.60848	0.6155
2.0	0.7538	0.75765
3.0	0.89796	0.89885
4.0	1.0404	1.0383
5.0	1.1805	1.1733
6.0	1.3181	1.2962
7.5	1.5253	1.4932
10.0	1.8935	1.8831
12.5	2.2664	2.2399
</tableData>
         </table>
      </function>
      <function name="aero/function/lift_coeff_basic_Mach">
         <description>lift_coefficient as function of alpha beta Reynolds and Mach</description>
         <interpolate1d>
            <p>velocities/mach</p>
            <v>0.2000</v>
            <p>aero/function/lift_coeff_basic_M0</p>
            <v>0.6000</v>
            <p>aero/function/lift_coeff_basic_M1</p>
            <v>0.7800</v>
            <p>aero/function/lift_coeff_basic_M2</p>
            <v>0.8000</v>
            <p>aero/function/lift_coeff_basic_M3</p>
         </interpolate1d>
      </function>
      <function name="aero/function/roll_coeff_basic_M0">
         <description>roll_coefficient as function of alpha beta Reynolds, fixed Mach = 0.2</description>
         <table>
            <independentVar lookup="row">aero/alpha-deg</independentVar>
            <independentVar lookup="column">aero/beta-deg</independentVar>
            <independentVar lookup="table">position/h-sl-ft</independentVar>
            <tableData breakPoint="0.0">
 	0.0	10.0
-5.0	-2.5859E-8	0.019363
-2.5	-2.4716E-8	0.022223
0.0	-2.3582E-8	0.025111
1.0	-2.3133E-8	0.026277
2.0	-2.2688E-8	0.027446
3.0	-2.2247E-8	0.028608
4.0	-2.1808E-8	0.029732
5.0	-2.1373E-8	0.030709
6.0	-2.0952E-8	0.031145
7.5	-2.0414E-8	0.032009
10.0	-1.9968E-8	0.036618
12.5	-1.9757E-8	0.039415
</tableData>
            <tableData breakPoint="6561.68">
 	0.0	10.0
-5.0	-2.5859E-8	0.019363
-2.5	-2.4716E-8	0.022223
0.0	-2.3582E-8	0.025111
1.0	-2.3133E-8	0.026277
2.0	-2.2688E-8	0.027446
3.0	-2.2247E-8	0.028608
4.0	-2.1808E-8	0.029732
5.0	-2.1373E-8	0.030709
6.0	-2.0952E-8	0.031145
7.5	-2.0414E-8	0.032009
10.0	-1.9968E-8	0.036618
12.5	-1.9757E-8	0.039415
</tableData>
            <tableData breakPoint="16404.2">
 	0.0	10.0
-5.0	-2.5859E-8	0.019363
-2.5	-2.4716E-8	0.022223
0.0	-2.3582E-8	0.025111
1.0	-2.3133E-8	0.026277
2.0	-2.2688E-8	0.027446
3.0	-2.2247E-8	0.028608
4.0	-2.1808E-8	0.029732
5.0	-2.1373E-8	0.030709
6.0	-2.0952E-8	0.031145
7.5	-2.0414E-8	0.032009
10.0	-1.9968E-8	0.036618
12.5	-1.9757E-8	0.039415
</tableData>
            <tableData breakPoint="26246.72">
 	0.0	10.0
-5.0	-2.5859E-8	0.019363
-2.5	-2.4716E-8	0.022223
0.0	-2.3582E-8	0.025111
1.0	-2.3133E-8	0.026277
2.0	-2.2688E-8	0.027446
3.0	-2.2247E-8	0.028608
4.0	-2.1808E-8	0.029732
5.0	-2.1373E-8	0.030709
6.0	-2.0952E-8	0.031145
7.5	-2.0414E-8	0.032009
10.0	-1.9968E-8	0.036618
12.5	-1.9757E-8	0.039415
</tableData>
         </table>
      </function>
      <function name="aero/function/roll_coeff_basic_M1">
         <description>roll_coefficient as function of alpha beta Reynolds, fixed Mach = 0.6</description>
         <table>
            <independentVar lookup="row">aero/alpha-deg</independentVar>
            <independentVar lookup="column">aero/beta-deg</independentVar>
            <independentVar lookup="table">position/h-sl-ft</independentVar>
            <tableData breakPoint="0.0">
 	0.0	10.0
-5.0	-3.1671E-8	0.023714
-2.5	-3.027E-8	0.027218
0.0	-2.8882E-8	0.030755
1.0	-2.8332E-8	0.032183
2.0	-2.7787E-8	0.033614
3.0	-2.7247E-8	0.035038
4.0	-2.6709E-8	0.036415
5.0	-2.6177E-8	0.037611
6.0	-2.5661E-8	0.038145
7.5	-2.5002E-8	0.039202
10.0	-2.4455E-8	0.044848
12.5	-2.4197E-8	0.048273
</tableData>
            <tableData breakPoint="6561.68">
 	0.0	10.0
-5.0	-3.1671E-8	0.023714
-2.5	-3.027E-8	0.027218
0.0	-2.8882E-8	0.030755
1.0	-2.8332E-8	0.032183
2.0	-2.7787E-8	0.033614
3.0	-2.7247E-8	0.035038
4.0	-2.6709E-8	0.036415
5.0	-2.6177E-8	0.037611
6.0	-2.5661E-8	0.038145
7.5	-2.5002E-8	0.039202
10.0	-2.4455E-8	0.044848
12.5	-2.4197E-8	0.048273
</tableData>
            <tableData breakPoint="16404.2">
 	0.0	10.0
-5.0	-3.1671E-8	0.023714
-2.5	-3.027E-8	0.027218
0.0	-2.8882E-8	0.030755
1.0	-2.8332E-8	0.032183
2.0	-2.7787E-8	0.033614
3.0	-2.7247E-8	0.035038
4.0	-2.6709E-8	0.036415
5.0	-2.6177E-8	0.037611
6.0	-2.5661E-8	0.038145
7.5	-2.5002E-8	0.039202
10.0	-2.4455E-8	0.044848
12.5	-2.4197E-8	0.048273
</tableData>
            <tableData breakPoint="26246.72">
 	0.0	10.0
-5.0	-3.1671E-8	0.023714
-2.5	-3.027E-8	0.027218
0.0	-2.8882E-8	0.030755
1.0	-2.8332E-8	0.032183
2.0	-2.7787E-8	0.033614
3.0	-2.7247E-8	0.035038
4.0	-2.6709E-8	0.036415
5.0	-2.6177E-8	0.037611
6.0	-2.5661E-8	0.038145
7.5	-2.5002E-8	0.039202
10.0	-2.4455E-8	0.044848
12.5	-2.4197E-8	0.048273
</tableData>
         </table>
      </function>
      <function name="aero/function/roll_coeff_basic_M2">
         <description>roll_coefficient as function of alpha beta Reynolds, fixed Mach = 0.78</description>
         <table>
            <independentVar lookup="row">aero/alpha-deg</independentVar>
            <independentVar lookup="column">aero/beta-deg</independentVar>
            <independentVar lookup="table">position/h-sl-ft</independentVar>
            <tableData breakPoint="0.0">
 	0.0	10.0
-5.0	-4.0488E-8	0.030316
-2.5	-3.8698E-8	0.034795
0.0	-3.6922E-8	0.039317
1.0	-3.622E-8	0.041143
2.0	-3.5524E-8	0.042973
3.0	-3.4832E-8	0.044793
4.0	-3.4145E-8	0.046553
5.0	-3.3465E-8	0.048082
6.0	-3.2805E-8	0.048765
7.5	-3.1963E-8	0.050117
10.0	-3.1264E-8	0.057334
12.5	-3.0934E-8	0.061713
</tableData>
            <tableData breakPoint="6561.68">
 	0.0	10.0
-5.0	-4.0488E-8	0.030316
-2.5	-3.8698E-8	0.034795
0.0	-3.6922E-8	0.039317
1.0	-3.622E-8	0.041143
2.0	-3.5524E-8	0.042973
3.0	-3.4832E-8	0.044793
4.0	-3.4145E-8	0.046553
5.0	-3.3465E-8	0.048082
6.0	-3.2805E-8	0.048765
7.5	-3.1963E-8	0.050117
10.0	-3.1264E-8	0.057334
12.5	-3.0934E-8	0.061713
</tableData>
            <tableData breakPoint="16404.2">
 	0.0	10.0
-5.0	-4.0488E-8	0.030316
-2.5	-3.8698E-8	0.034795
0.0	-3.6922E-8	0.039317
1.0	-3.622E-8	0.041143
2.0	-3.5524E-8	0.042973
3.0	-3.4832E-8	0.044793
4.0	-3.4145E-8	0.046553
5.0	-3.3465E-8	0.048082
6.0	-3.2805E-8	0.048765
7.5	-3.1963E-8	0.050117
10.0	-3.1264E-8	0.057334
12.5	-3.0934E-8	0.061713
</tableData>
            <tableData breakPoint="26246.72">
 	0.0	10.0
-5.0	-4.0488E-8	0.030316
-2.5	-3.8698E-8	0.034795
0.0	-3.6922E-8	0.039317
1.0	-3.622E-8	0.041143
2.0	-3.5524E-8	0.042973
3.0	-3.4832E-8	0.044793
4.0	-3.4145E-8	0.046553
5.0	-3.3465E-8	0.048082
6.0	-3.2805E-8	0.048765
7.5	-3.1963E-8	0.050117
10.0	-3.1264E-8	0.057334
12.5	-3.0934E-8	0.061713
</tableData>
         </table>
      </function>
      <function name="aero/function/roll_coeff_basic_M3">
         <description>roll_coefficient as function of alpha beta Reynolds, fixed Mach = 0.8</description>
         <table>
            <independentVar lookup="row">aero/alpha-deg</independentVar>
            <independentVar lookup="column">aero/beta-deg</independentVar>
            <independentVar lookup="table">position/h-sl-ft</independentVar>
            <tableData breakPoint="0.0">
 	0.0	10.0
-5.0	-4.2227E-8	0.031619
-2.5	-4.036E-8	0.03629
0.0	-3.8509E-8	0.041007
1.0	-3.7776E-8	0.04291
2.0	-3.705E-8	0.044819
3.0	-3.6329E-8	0.046717
4.0	-3.5612E-8	0.048553
5.0	-3.4902E-8	0.050148
6.0	-3.4214E-8	0.05086
7.5	-3.3336E-8	0.05227
10.0	-3.2607E-8	0.059797
12.5	-3.2263E-8	0.064364
</tableData>
            <tableData breakPoint="6561.68">
 	0.0	10.0
-5.0	-4.2227E-8	0.031619
-2.5	-4.036E-8	0.03629
0.0	-3.8509E-8	0.041007
1.0	-3.7776E-8	0.04291
2.0	-3.705E-8	0.044819
3.0	-3.6329E-8	0.046717
4.0	-3.5612E-8	0.048553
5.0	-3.4902E-8	0.050148
6.0	-3.4214E-8	0.05086
7.5	-3.3336E-8	0.05227
10.0	-3.2607E-8	0.059797
12.5	-3.2263E-8	0.064364
</tableData>
            <tableData breakPoint="16404.2">
 	0.0	10.0
-5.0	-4.2227E-8	0.031619
-2.5	-4.036E-8	0.03629
0.0	-3.8509E-8	0.041007
1.0	-3.7776E-8	0.04291
2.0	-3.705E-8	0.044819
3.0	-3.6329E-8	0.046717
4.0	-3.5612E-8	0.048553
5.0	-3.4902E-8	0.050148
6.0	-3.4214E-8	0.05086
7.5	-3.3336E-8	0.05227
10.0	-3.2607E-8	0.059797
12.5	-3.2263E-8	0.064364
</tableData>
            <tableData breakPoint="26246.72">
 	0.0	10.0
-5.0	-4.2227E-8	0.031619
-2.5	-4.036E-8	0.03629
0.0	-3.8509E-8	0.041007
1.0	-3.7776E-8	0.04291
2.0	-3.705E-8	0.044819
3.0	-3.6329E-8	0.046717
4.0	-3.5612E-8	0.048553
5.0	-3.4902E-8	0.050148
6.0	-3.4214E-8	0.05086
7.5	-3.3336E-8	0.05227
10.0	-3.2607E-8	0.059797
12.5	-3.2263E-8	0.064364
</tableData>
         </table>
      </function>
      <function name="aero/function/roll_coeff_basic_Mach">
         <description>roll_coefficient as function of alpha beta Reynolds and Mach</description>
         <interpolate1d>
            <p>velocities/mach</p>
            <v>0.2000</v>
            <p>aero/function/roll_coeff_basic_M0</p>
            <v>0.6000</v>
            <p>aero/function/roll_coeff_basic_M1</p>
            <v>0.7800</v>
            <p>aero/function/roll_coeff_basic_M2</p>
            <v>0.8000</v>
            <p>aero/function/roll_coeff_basic_M3</p>
         </interpolate1d>
      </function>
      <function name="aero/function/pitch_coeff_basic_M0">
         <description>pitch_coefficient as function of alpha beta Reynolds, fixed Mach = 0.2</description>
         <table>
            <independentVar lookup="row">aero/alpha-deg</independentVar>
            <independentVar lookup="column">aero/beta-deg</independentVar>
            <independentVar lookup="table">position/h-sl-ft</independentVar>
            <tableData breakPoint="0.0">
 	0.0	10.0
-5.0	0.18942	0.15166
-2.5	0.067956	0.030608
0.0	-0.046446	-0.085114
1.0	-0.089617	-0.12955
2.0	-0.13079	-0.17257
3.0	-0.1693	-0.21347
4.0	-0.20398	-0.25032
5.0	-0.23339	-0.27721
6.0	-0.2573	-0.27561
7.5	-0.29595	-0.3074
10.0	-0.41839	-0.50048
12.5	-0.55694	-0.62374
</tableData>
            <tableData breakPoint="6561.68">
 	0.0	10.0
-5.0	0.18942	0.15166
-2.5	0.067956	0.030608
0.0	-0.046446	-0.085114
1.0	-0.089617	-0.12955
2.0	-0.13079	-0.17257
3.0	-0.1693	-0.21347
4.0	-0.20398	-0.25032
5.0	-0.23339	-0.27721
6.0	-0.2573	-0.27561
7.5	-0.29595	-0.3074
10.0	-0.41839	-0.50048
12.5	-0.55694	-0.62374
</tableData>
            <tableData breakPoint="16404.2">
 	0.0	10.0
-5.0	0.18942	0.15166
-2.5	0.067956	0.030608
0.0	-0.046446	-0.085114
1.0	-0.089617	-0.12955
2.0	-0.13079	-0.17257
3.0	-0.1693	-0.21347
4.0	-0.20398	-0.25032
5.0	-0.23339	-0.27721
6.0	-0.2573	-0.27561
7.5	-0.29595	-0.3074
10.0	-0.41839	-0.50048
12.5	-0.55694	-0.62374
</tableData>
            <tableData breakPoint="26246.72">
 	0.0	10.0
-5.0	0.18942	0.15166
-2.5	0.067956	0.030608
0.0	-0.046446	-0.085114
1.0	-0.089617	-0.12955
2.0	-0.13079	-0.17257
3.0	-0.1693	-0.21347
4.0	-0.20398	-0.25032
5.0	-0.23339	-0.27721
6.0	-0.2573	-0.27561
7.5	-0.29595	-0.3074
10.0	-0.41839	-0.50048
12.5	-0.55694	-0.62374
</tableData>
         </table>
      </function>
      <function name="aero/function/pitch_coeff_basic_M1">
         <description>pitch_coefficient as function of alpha beta Reynolds, fixed Mach = 0.6</description>
         <table>
            <independentVar lookup="row">aero/alpha-deg</independentVar>
            <independentVar lookup="column">aero/beta-deg</independentVar>
            <independentVar lookup="table">position/h-sl-ft</independentVar>
            <tableData breakPoint="0.0">
 	0.0	10.0
-5.0	0.23199	0.18575
-2.5	0.083229	0.037487
0.0	-0.056885	-0.10424
1.0	-0.10976	-0.15867
2.0	-0.16019	-0.21135
3.0	-0.20734	-0.26144
4.0	-0.24982	-0.30658
5.0	-0.28584	-0.33951
6.0	-0.31512	-0.33755
7.5	-0.36247	-0.37648
10.0	-0.51242	-0.61296
12.5	-0.68211	-0.76393
</tableData>
            <tableData breakPoint="6561.68">
 	0.0	10.0
-5.0	0.23199	0.18575
-2.5	0.083229	0.037487
0.0	-0.056885	-0.10424
1.0	-0.10976	-0.15867
2.0	-0.16019	-0.21135
3.0	-0.20734	-0.26144
4.0	-0.24982	-0.30658
5.0	-0.28584	-0.33951
6.0	-0.31512	-0.33755
7.5	-0.36247	-0.37648
10.0	-0.51242	-0.61296
12.5	-0.68211	-0.76393
</tableData>
            <tableData breakPoint="16404.2">
 	0.0	10.0
-5.0	0.23199	0.18575
-2.5	0.083229	0.037487
0.0	-0.056885	-0.10424
1.0	-0.10976	-0.15867
2.0	-0.16019	-0.21135
3.0	-0.20734	-0.26144
4.0	-0.24982	-0.30658
5.0	-0.28584	-0.33951
6.0	-0.31512	-0.33755
7.5	-0.36247	-0.37648
10.0	-0.51242	-0.61296
12.5	-0.68211	-0.76393
</tableData>
            <tableData breakPoint="26246.72">
 	0.0	10.0
-5.0	0.23199	0.18575
-2.5	0.083229	0.037487
0.0	-0.056885	-0.10424
1.0	-0.10976	-0.15867
2.0	-0.16019	-0.21135
3.0	-0.20734	-0.26144
4.0	-0.24982	-0.30658
5.0	-0.28584	-0.33951
6.0	-0.31512	-0.33755
7.5	-0.36247	-0.37648
10.0	-0.51242	-0.61296
12.5	-0.68211	-0.76393
</tableData>
         </table>
      </function>
      <function name="aero/function/pitch_coeff_basic_M2">
         <description>pitch_coefficient as function of alpha beta Reynolds, fixed Mach = 0.78</description>
         <table>
            <independentVar lookup="row">aero/alpha-deg</independentVar>
            <independentVar lookup="column">aero/beta-deg</independentVar>
            <independentVar lookup="table">position/h-sl-ft</independentVar>
            <tableData breakPoint="0.0">
 	0.0	10.0
-5.0	0.29658	0.23746
-2.5	0.1064	0.047924
0.0	-0.072722	-0.13327
1.0	-0.14032	-0.20284
2.0	-0.20479	-0.2702
3.0	-0.26507	-0.33423
4.0	-0.31938	-0.39193
5.0	-0.36542	-0.43404
6.0	-0.40286	-0.43153
7.5	-0.46338	-0.4813
10.0	-0.65508	-0.78361
12.5	-0.87201	-0.97661
</tableData>
            <tableData breakPoint="6561.68">
 	0.0	10.0
-5.0	0.29658	0.23746
-2.5	0.1064	0.047924
0.0	-0.072722	-0.13327
1.0	-0.14032	-0.20284
2.0	-0.20479	-0.2702
3.0	-0.26507	-0.33423
4.0	-0.31938	-0.39193
5.0	-0.36542	-0.43404
6.0	-0.40286	-0.43153
7.5	-0.46338	-0.4813
10.0	-0.65508	-0.78361
12.5	-0.87201	-0.97661
</tableData>
            <tableData breakPoint="16404.2">
 	0.0	10.0
-5.0	0.29658	0.23746
-2.5	0.1064	0.047924
0.0	-0.072722	-0.13327
1.0	-0.14032	-0.20284
2.0	-0.20479	-0.2702
3.0	-0.26507	-0.33423
4.0	-0.31938	-0.39193
5.0	-0.36542	-0.43404
6.0	-0.40286	-0.43153
7.5	-0.46338	-0.4813
10.0	-0.65508	-0.78361
12.5	-0.87201	-0.97661
</tableData>
            <tableData breakPoint="26246.72">
 	0.0	10.0
-5.0	0.29658	0.23746
-2.5	0.1064	0.047924
0.0	-0.072722	-0.13327
1.0	-0.14032	-0.20284
2.0	-0.20479	-0.2702
3.0	-0.26507	-0.33423
4.0	-0.31938	-0.39193
5.0	-0.36542	-0.43404
6.0	-0.40286	-0.43153
7.5	-0.46338	-0.4813
10.0	-0.65508	-0.78361
12.5	-0.87201	-0.97661
</tableData>
         </table>
      </function>
      <function name="aero/function/pitch_coeff_basic_M3">
         <description>pitch_coefficient as function of alpha beta Reynolds, fixed Mach = 0.8</description>
         <table>
            <independentVar lookup="row">aero/alpha-deg</independentVar>
            <independentVar lookup="column">aero/beta-deg</independentVar>
            <independentVar lookup="table">position/h-sl-ft</independentVar>
            <tableData breakPoint="0.0">
 	0.0	10.0
-5.0	0.30933	0.24766
-2.5	0.11097	0.049983
0.0	-0.075847	-0.13899
1.0	-0.14634	-0.21156
2.0	-0.21359	-0.2818
3.0	-0.27646	-0.34859
4.0	-0.3331	-0.40877
5.0	-0.38112	-0.45269
6.0	-0.42017	-0.45007
7.5	-0.48329	-0.50198
10.0	-0.68322	-0.81728
12.5	-0.90948	-1.0186
</tableData>
            <tableData breakPoint="6561.68">
 	0.0	10.0
-5.0	0.30933	0.24766
-2.5	0.11097	0.049983
0.0	-0.075847	-0.13899
1.0	-0.14634	-0.21156
2.0	-0.21359	-0.2818
3.0	-0.27646	-0.34859
4.0	-0.3331	-0.40877
5.0	-0.38112	-0.45269
6.0	-0.42017	-0.45007
7.5	-0.48329	-0.50198
10.0	-0.68322	-0.81728
12.5	-0.90948	-1.0186
</tableData>
            <tableData breakPoint="16404.2">
 	0.0	10.0
-5.0	0.30933	0.24766
-2.5	0.11097	0.049983
0.0	-0.075847	-0.13899
1.0	-0.14634	-0.21156
2.0	-0.21359	-0.2818
3.0	-0.27646	-0.34859
4.0	-0.3331	-0.40877
5.0	-0.38112	-0.45269
6.0	-0.42017	-0.45007
7.5	-0.48329	-0.50198
10.0	-0.68322	-0.81728
12.5	-0.90948	-1.0186
</tableData>
            <tableData breakPoint="26246.72">
 	0.0	10.0
-5.0	0.30933	0.24766
-2.5	0.11097	0.049983
0.0	-0.075847	-0.13899
1.0	-0.14634	-0.21156
2.0	-0.21359	-0.2818
3.0	-0.27646	-0.34859
4.0	-0.3331	-0.40877
5.0	-0.38112	-0.45269
6.0	-0.42017	-0.45007
7.5	-0.48329	-0.50198
10.0	-0.68322	-0.81728
12.5	-0.90948	-1.0186
</tableData>
         </table>
      </function>
      <function name="aero/function/pitch_coeff_basic_Mach">
         <description>pitch_coefficient as function of alpha beta Reynolds and Mach</description>
         <interpolate1d>
            <p>velocities/mach</p>
            <v>0.2000</v>
            <p>aero/function/pitch_coeff_basic_M0</p>
            <v>0.6000</v>
            <p>aero/function/pitch_coeff_basic_M1</p>
            <v>0.7800</v>
            <p>aero/function/pitch_coeff_basic_M2</p>
            <v>0.8000</v>
            <p>aero/function/pitch_coeff_basic_M3</p>
         </interpolate1d>
      </function>
      <function name="aero/function/yaw_coeff_basic_M0">
         <description>yaw_coefficient as function of alpha beta Reynolds, fixed Mach = 0.2</description>
         <table>
            <independentVar lookup="row">aero/alpha-deg</independentVar>
            <independentVar lookup="column">aero/beta-deg</independentVar>
            <independentVar lookup="table">position/h-sl-ft</independentVar>
            <tableData breakPoint="0.0">
 	0.0	10.0
-5.0	1.4073E-7	-0.040397
-2.5	1.3971E-7	-0.039853
0.0	1.3846E-7	-0.039544
1.0	1.379E-7	-0.039495
2.0	1.3728E-7	-0.039498
3.0	1.366E-7	-0.039567
4.0	1.3582E-7	-0.039736
5.0	1.3489E-7	-0.040087
6.0	1.3382E-7	-0.040802
7.5	1.3252E-7	-0.040748
10.0	1.3399E-7	-0.040211
12.5	1.3777E-7	-0.035925
</tableData>
            <tableData breakPoint="6561.68">
 	0.0	10.0
-5.0	1.4073E-7	-0.040397
-2.5	1.3971E-7	-0.039853
0.0	1.3846E-7	-0.039544
1.0	1.379E-7	-0.039495
2.0	1.3728E-7	-0.039498
3.0	1.366E-7	-0.039567
4.0	1.3582E-7	-0.039736
5.0	1.3489E-7	-0.040087
6.0	1.3382E-7	-0.040802
7.5	1.3252E-7	-0.040748
10.0	1.3399E-7	-0.040211
12.5	1.3777E-7	-0.035925
</tableData>
            <tableData breakPoint="16404.2">
 	0.0	10.0
-5.0	1.4073E-7	-0.040397
-2.5	1.3971E-7	-0.039853
0.0	1.3846E-7	-0.039544
1.0	1.379E-7	-0.039495
2.0	1.3728E-7	-0.039498
3.0	1.366E-7	-0.039567
4.0	1.3582E-7	-0.039736
5.0	1.3489E-7	-0.040087
6.0	1.3382E-7	-0.040802
7.5	1.3252E-7	-0.040748
10.0	1.3399E-7	-0.040211
12.5	1.3777E-7	-0.035925
</tableData>
            <tableData breakPoint="26246.72">
 	0.0	10.0
-5.0	1.4073E-7	-0.040397
-2.5	1.3971E-7	-0.039853
0.0	1.3846E-7	-0.039544
1.0	1.379E-7	-0.039495
2.0	1.3728E-7	-0.039498
3.0	1.366E-7	-0.039567
4.0	1.3582E-7	-0.039736
5.0	1.3489E-7	-0.040087
6.0	1.3382E-7	-0.040802
7.5	1.3252E-7	-0.040748
10.0	1.3399E-7	-0.040211
12.5	1.3777E-7	-0.035925
</tableData>
         </table>
      </function>
      <function name="aero/function/yaw_coeff_basic_M1">
         <description>yaw_coefficient as function of alpha beta Reynolds, fixed Mach = 0.6</description>
         <table>
            <independentVar lookup="row">aero/alpha-deg</independentVar>
            <independentVar lookup="column">aero/beta-deg</independentVar>
            <independentVar lookup="table">position/h-sl-ft</independentVar>
            <tableData breakPoint="0.0">
 	0.0	10.0
-5.0	1.7236E-7	-0.049476
-2.5	1.7111E-7	-0.048809
0.0	1.6958E-7	-0.048431
1.0	1.6889E-7	-0.048371
2.0	1.6814E-7	-0.048375
3.0	1.6731E-7	-0.04846
4.0	1.6634E-7	-0.048667
5.0	1.652E-7	-0.049096
6.0	1.6389E-7	-0.049972
7.5	1.623E-7	-0.049906
10.0	1.641E-7	-0.049248
12.5	1.6874E-7	-0.043999
</tableData>
            <tableData breakPoint="6561.68">
 	0.0	10.0
-5.0	1.7236E-7	-0.049476
-2.5	1.7111E-7	-0.048809
0.0	1.6958E-7	-0.048431
1.0	1.6889E-7	-0.048371
2.0	1.6814E-7	-0.048375
3.0	1.6731E-7	-0.04846
4.0	1.6634E-7	-0.048667
5.0	1.652E-7	-0.049096
6.0	1.6389E-7	-0.049972
7.5	1.623E-7	-0.049906
10.0	1.641E-7	-0.049248
12.5	1.6874E-7	-0.043999
</tableData>
            <tableData breakPoint="16404.2">
 	0.0	10.0
-5.0	1.7236E-7	-0.049476
-2.5	1.7111E-7	-0.048809
0.0	1.6958E-7	-0.048431
1.0	1.6889E-7	-0.048371
2.0	1.6814E-7	-0.048375
3.0	1.6731E-7	-0.04846
4.0	1.6634E-7	-0.048667
5.0	1.652E-7	-0.049096
6.0	1.6389E-7	-0.049972
7.5	1.623E-7	-0.049906
10.0	1.641E-7	-0.049248
12.5	1.6874E-7	-0.043999
</tableData>
            <tableData breakPoint="26246.72">
 	0.0	10.0
-5.0	1.7236E-7	-0.049476
-2.5	1.7111E-7	-0.048809
0.0	1.6958E-7	-0.048431
1.0	1.6889E-7	-0.048371
2.0	1.6814E-7	-0.048375
3.0	1.6731E-7	-0.04846
4.0	1.6634E-7	-0.048667
5.0	1.652E-7	-0.049096
6.0	1.6389E-7	-0.049972
7.5	1.623E-7	-0.049906
10.0	1.641E-7	-0.049248
12.5	1.6874E-7	-0.043999
</tableData>
         </table>
      </function>
      <function name="aero/function/yaw_coeff_basic_M2">
         <description>yaw_coefficient as function of alpha beta Reynolds, fixed Mach = 0.78</description>
         <table>
            <independentVar lookup="row">aero/alpha-deg</independentVar>
            <independentVar lookup="column">aero/beta-deg</independentVar>
            <independentVar lookup="table">position/h-sl-ft</independentVar>
            <tableData breakPoint="0.0">
 	0.0	10.0
-5.0	2.2035E-7	-0.063251
-2.5	2.1875E-7	-0.062398
0.0	2.1679E-7	-0.061914
1.0	2.1591E-7	-0.061838
2.0	2.1495E-7	-0.061843
3.0	2.1388E-7	-0.061951
4.0	2.1266E-7	-0.062216
5.0	2.112E-7	-0.062765
6.0	2.0952E-7	-0.063885
7.5	2.0749E-7	-0.0638
10.0	2.0979E-7	-0.062959
12.5	2.1572E-7	-0.056249
</tableData>
            <tableData breakPoint="6561.68">
 	0.0	10.0
-5.0	2.2035E-7	-0.063251
-2.5	2.1875E-7	-0.062398
0.0	2.1679E-7	-0.061914
1.0	2.1591E-7	-0.061838
2.0	2.1495E-7	-0.061843
3.0	2.1388E-7	-0.061951
4.0	2.1266E-7	-0.062216
5.0	2.112E-7	-0.062765
6.0	2.0952E-7	-0.063885
7.5	2.0749E-7	-0.0638
10.0	2.0979E-7	-0.062959
12.5	2.1572E-7	-0.056249
</tableData>
            <tableData breakPoint="16404.2">
 	0.0	10.0
-5.0	2.2035E-7	-0.063251
-2.5	2.1875E-7	-0.062398
0.0	2.1679E-7	-0.061914
1.0	2.1591E-7	-0.061838
2.0	2.1495E-7	-0.061843
3.0	2.1388E-7	-0.061951
4.0	2.1266E-7	-0.062216
5.0	2.112E-7	-0.062765
6.0	2.0952E-7	-0.063885
7.5	2.0749E-7	-0.0638
10.0	2.0979E-7	-0.062959
12.5	2.1572E-7	-0.056249
</tableData>
            <tableData breakPoint="26246.72">
 	0.0	10.0
-5.0	2.2035E-7	-0.063251
-2.5	2.1875E-7	-0.062398
0.0	2.1679E-7	-0.061914
1.0	2.1591E-7	-0.061838
2.0	2.1495E-7	-0.061843
3.0	2.1388E-7	-0.061951
4.0	2.1266E-7	-0.062216
5.0	2.112E-7	-0.062765
6.0	2.0952E-7	-0.063885
7.5	2.0749E-7	-0.0638
10.0	2.0979E-7	-0.062959
12.5	2.1572E-7	-0.056249
</tableData>
         </table>
      </function>
      <function name="aero/function/yaw_coeff_basic_M3">
         <description>yaw_coefficient as function of alpha beta Reynolds, fixed Mach = 0.8</description>
         <table>
            <independentVar lookup="row">aero/alpha-deg</independentVar>
            <independentVar lookup="column">aero/beta-deg</independentVar>
            <independentVar lookup="table">position/h-sl-ft</independentVar>
            <tableData breakPoint="0.0">
 	0.0	10.0
-5.0	2.2981E-7	-0.065969
-2.5	2.2815E-7	-0.065079
0.0	2.2611E-7	-0.064575
1.0	2.2518E-7	-0.064495
2.0	2.2418E-7	-0.0645
3.0	2.2307E-7	-0.064613
4.0	2.2179E-7	-0.064889
5.0	2.2027E-7	-0.065462
6.0	2.1852E-7	-0.066629
7.5	2.1641E-7	-0.066541
10.0	2.188E-7	-0.065664
12.5	2.2499E-7	-0.058665
</tableData>
            <tableData breakPoint="6561.68">
 	0.0	10.0
-5.0	2.2981E-7	-0.065969
-2.5	2.2815E-7	-0.065079
0.0	2.2611E-7	-0.064575
1.0	2.2518E-7	-0.064495
2.0	2.2418E-7	-0.0645
3.0	2.2307E-7	-0.064613
4.0	2.2179E-7	-0.064889
5.0	2.2027E-7	-0.065462
6.0	2.1852E-7	-0.066629
7.5	2.1641E-7	-0.066541
10.0	2.188E-7	-0.065664
12.5	2.2499E-7	-0.058665
</tableData>
            <tableData breakPoint="16404.2">
 	0.0	10.0
-5.0	2.2981E-7	-0.065969
-2.5	2.2815E-7	-0.065079
0.0	2.2611E-7	-0.064575
1.0	2.2518E-7	-0.064495
2.0	2.2418E-7	-0.0645
3.0	2.2307E-7	-0.064613
4.0	2.2179E-7	-0.064889
5.0	2.2027E-7	-0.065462
6.0	2.1852E-7	-0.066629
7.5	2.1641E-7	-0.066541
10.0	2.188E-7	-0.065664
12.5	2.2499E-7	-0.058665
</tableData>
            <tableData breakPoint="26246.72">
 	0.0	10.0
-5.0	2.2981E-7	-0.065969
-2.5	2.2815E-7	-0.065079
0.0	2.2611E-7	-0.064575
1.0	2.2518E-7	-0.064495
2.0	2.2418E-7	-0.0645
3.0	2.2307E-7	-0.064613
4.0	2.2179E-7	-0.064889
5.0	2.2027E-7	-0.065462
6.0	2.1852E-7	-0.066629
7.5	2.1641E-7	-0.066541
10.0	2.188E-7	-0.065664
12.5	2.2499E-7	-0.058665
</tableData>
         </table>
      </function>
      <function name="aero/function/yaw_coeff_basic_Mach">
         <description>yaw_coefficient as function of alpha beta Reynolds and Mach</description>
         <interpolate1d>
            <p>velocities/mach</p>
            <v>0.2000</v>
            <p>aero/function/yaw_coeff_basic_M0</p>
            <v>0.6000</v>
            <p>aero/function/yaw_coeff_basic_M1</p>
            <v>0.7800</v>
            <p>aero/function/yaw_coeff_basic_M2</p>
            <v>0.8000</v>
            <p>aero/function/yaw_coeff_basic_M3</p>
         </interpolate1d>
      </function>
      <function name="aero/function/flap_inner_drag_coeff_basic_Reynolds0_Mach_0">
         <description>drag_coefficient as function of flap_inner_deflection, alpha, beta, fixed Reynolds = 0.0fixed Mach = 0.2</description>
         <table>
            <independentVar lookup="row">aero/alpha-deg</independentVar>
            <independentVar lookup="column">fcs/flap-pos-deg</independentVar>
            <independentVar lookup="table">aero/beta-deg</independentVar>
            <tableData breakPoint="0.0">
 	-3.0	3.0
-5.0	0.0011358	-4.2801E-4
-2.5	2.9023E-4	4.2903E-4
0.0	-5.5609E-4	0.0012494
1.0	-8.9024E-4	0.001564
2.0	-0.0012182	0.0018681
3.0	-0.0015349	0.0021573
4.0	-0.0018323	0.0024235
5.0	-0.0021006	0.0026549
6.0	-0.0023338	0.002839
7.5	-0.0026482	0.002989
10.0	-0.0037435	0.0033838
12.5	-0.005123	0.0047131
</tableData>
            <tableData breakPoint="10.0">
 	-3.0	3.0
-5.0	0.0011002	-4.084E-4
-2.5	2.9107E-4	4.1777E-4
0.0	-5.2565E-4	0.001213
1.0	-8.5244E-4	0.0015203
2.0	-0.001178	0.0018209
3.0	-0.0015029	0.002117
4.0	-0.0018423	0.0024297
5.0	-0.0023368	0.0029036
6.0	-0.0039757	0.0044108
7.5	-0.76136	-0.3964
10.0	-0.0017689	2.6298E-4
12.5	-0.0055822	0.004483
</tableData>
         </table>
      </function>
      <function name="aero/function/flap_inner_drag_coeff_basic_Reynolds1_Mach_0">
         <description>drag_coefficient as function of flap_inner_deflection, alpha, beta, fixed Reynolds = 6561.68fixed Mach = 0.2</description>
         <table>
            <independentVar lookup="row">aero/alpha-deg</independentVar>
            <independentVar lookup="column">fcs/flap-pos-deg</independentVar>
            <independentVar lookup="table">aero/beta-deg</independentVar>
            <tableData breakPoint="0.0">
 	-3.0	3.0
-5.0	0.0011358	-4.2801E-4
-2.5	2.9023E-4	4.2903E-4
0.0	-5.5609E-4	0.0012494
1.0	-8.9024E-4	0.001564
2.0	-0.0012182	0.0018681
3.0	-0.0015349	0.0021573
4.0	-0.0018323	0.0024235
5.0	-0.0021006	0.0026549
6.0	-0.0023338	0.002839
7.5	-0.0026482	0.002989
10.0	-0.0037435	0.0033838
12.5	-0.005123	0.0047131
</tableData>
            <tableData breakPoint="10.0">
 	-3.0	3.0
-5.0	0.0011002	-4.084E-4
-2.5	2.9107E-4	4.1777E-4
0.0	-5.2565E-4	0.001213
1.0	-8.5244E-4	0.0015203
2.0	-0.001178	0.0018209
3.0	-0.0015029	0.002117
4.0	-0.0018423	0.0024297
5.0	-0.0023368	0.0029036
6.0	-0.0039757	0.0044108
7.5	-0.76136	-0.3964
10.0	-0.0017689	2.6298E-4
12.5	-0.0055822	0.004483
</tableData>
         </table>
      </function>
      <function name="aero/function/flap_inner_drag_coeff_basic_Reynolds2_Mach_0">
         <description>drag_coefficient as function of flap_inner_deflection, alpha, beta, fixed Reynolds = 16404.2fixed Mach = 0.2</description>
         <table>
            <independentVar lookup="row">aero/alpha-deg</independentVar>
            <independentVar lookup="column">fcs/flap-pos-deg</independentVar>
            <independentVar lookup="table">aero/beta-deg</independentVar>
            <tableData breakPoint="0.0">
 	-3.0	3.0
-5.0	0.0011358	-4.2801E-4
-2.5	2.9023E-4	4.2903E-4
0.0	-5.5609E-4	0.0012494
1.0	-8.9024E-4	0.001564
2.0	-0.0012182	0.0018681
3.0	-0.0015349	0.0021573
4.0	-0.0018323	0.0024235
5.0	-0.0021006	0.0026549
6.0	-0.0023338	0.002839
7.5	-0.0026482	0.002989
10.0	-0.0037435	0.0033838
12.5	-0.005123	0.0047131
</tableData>
            <tableData breakPoint="10.0">
 	-3.0	3.0
-5.0	0.0011002	-4.084E-4
-2.5	2.9107E-4	4.1777E-4
0.0	-5.2565E-4	0.001213
1.0	-8.5244E-4	0.0015203
2.0	-0.001178	0.0018209
3.0	-0.0015029	0.002117
4.0	-0.0018423	0.0024297
5.0	-0.0023368	0.0029036
6.0	-0.0039757	0.0044108
7.5	-0.76136	-0.3964
10.0	-0.0017689	2.6298E-4
12.5	-0.0055822	0.004483
</tableData>
         </table>
      </function>
      <function name="aero/function/flap_inner_drag_coeff_basic_Reynolds3_Mach_0">
         <description>drag_coefficient as function of flap_inner_deflection, alpha, beta, fixed Reynolds = 26246.72fixed Mach = 0.2</description>
         <table>
            <independentVar lookup="row">aero/alpha-deg</independentVar>
            <independentVar lookup="column">fcs/flap-pos-deg</independentVar>
            <independentVar lookup="table">aero/beta-deg</independentVar>
            <tableData breakPoint="0.0">
 	-3.0	3.0
-5.0	0.0011358	-4.2801E-4
-2.5	2.9023E-4	4.2903E-4
0.0	-5.5609E-4	0.0012494
1.0	-8.9024E-4	0.001564
2.0	-0.0012182	0.0018681
3.0	-0.0015349	0.0021573
4.0	-0.0018323	0.0024235
5.0	-0.0021006	0.0026549
6.0	-0.0023338	0.002839
7.5	-0.0026482	0.002989
10.0	-0.0037435	0.0033838
12.5	-0.005123	0.0047131
</tableData>
            <tableData breakPoint="10.0">
 	-3.0	3.0
-5.0	0.0011002	-4.084E-4
-2.5	2.9107E-4	4.1777E-4
0.0	-5.2565E-4	0.001213
1.0	-8.5244E-4	0.0015203
2.0	-0.001178	0.0018209
3.0	-0.0015029	0.002117
4.0	-0.0018423	0.0024297
5.0	-0.0023368	0.0029036
6.0	-0.0039757	0.0044108
7.5	-0.76136	-0.3964
10.0	-0.0017689	2.6298E-4
12.5	-0.0055822	0.004483
</tableData>
         </table>
      </function>
      <function name="aero/function/flap_inner_drag_coeff_basic_Reynolds0_Mach_1">
         <description>drag_coefficient as function of flap_inner_deflection, alpha, beta, fixed Reynolds = 0.0fixed Mach = 0.6</description>
         <table>
            <independentVar lookup="row">aero/alpha-deg</independentVar>
            <independentVar lookup="column">fcs/flap-pos-deg</independentVar>
            <independentVar lookup="table">aero/beta-deg</independentVar>
            <tableData breakPoint="0.0">
 	-3.0	3.0
-5.0	0.001391	-5.242E-4
-2.5	3.5546E-4	5.2545E-4
0.0	-6.8107E-4	0.0015302
1.0	-0.0010903	0.0019155
2.0	-0.0014919	0.002288
3.0	-0.0018798	0.0026422
4.0	-0.0022441	0.0029682
5.0	-0.0025727	0.0032515
6.0	-0.0028583	0.003477
7.5	-0.0032433	0.0036607
10.0	-0.0045849	0.0041443
12.5	-0.0062743	0.0057723
</tableData>
            <tableData breakPoint="10.0">
 	-3.0	3.0
-5.0	0.0013475	-5.0019E-4
-2.5	3.5649E-4	5.1166E-4
0.0	-6.4378E-4	0.0014856
1.0	-0.001044	0.001862
2.0	-0.0014428	0.0022301
3.0	-0.0018406	0.0025928
4.0	-0.0022564	0.0029757
5.0	-0.0028619	0.0035562
6.0	-0.0048692	0.0054021
7.5	-0.93247	-0.48549
10.0	-0.0021664	3.2208E-4
12.5	-0.0068367	0.0054905
</tableData>
         </table>
      </function>
      <function name="aero/function/flap_inner_drag_coeff_basic_Reynolds1_Mach_1">
         <description>drag_coefficient as function of flap_inner_deflection, alpha, beta, fixed Reynolds = 6561.68fixed Mach = 0.6</description>
         <table>
            <independentVar lookup="row">aero/alpha-deg</independentVar>
            <independentVar lookup="column">fcs/flap-pos-deg</independentVar>
            <independentVar lookup="table">aero/beta-deg</independentVar>
            <tableData breakPoint="0.0">
 	-3.0	3.0
-5.0	0.001391	-5.242E-4
-2.5	3.5546E-4	5.2545E-4
0.0	-6.8107E-4	0.0015302
1.0	-0.0010903	0.0019155
2.0	-0.0014919	0.002288
3.0	-0.0018798	0.0026422
4.0	-0.0022441	0.0029682
5.0	-0.0025727	0.0032515
6.0	-0.0028583	0.003477
7.5	-0.0032433	0.0036607
10.0	-0.0045849	0.0041443
12.5	-0.0062743	0.0057723
</tableData>
            <tableData breakPoint="10.0">
 	-3.0	3.0
-5.0	0.0013475	-5.0019E-4
-2.5	3.5649E-4	5.1166E-4
0.0	-6.4378E-4	0.0014856
1.0	-0.001044	0.001862
2.0	-0.0014428	0.0022301
3.0	-0.0018406	0.0025928
4.0	-0.0022564	0.0029757
5.0	-0.0028619	0.0035562
6.0	-0.0048692	0.0054021
7.5	-0.93247	-0.48549
10.0	-0.0021664	3.2208E-4
12.5	-0.0068367	0.0054905
</tableData>
         </table>
      </function>
      <function name="aero/function/flap_inner_drag_coeff_basic_Reynolds2_Mach_1">
         <description>drag_coefficient as function of flap_inner_deflection, alpha, beta, fixed Reynolds = 16404.2fixed Mach = 0.6</description>
         <table>
            <independentVar lookup="row">aero/alpha-deg</independentVar>
            <independentVar lookup="column">fcs/flap-pos-deg</independentVar>
            <independentVar lookup="table">aero/beta-deg</independentVar>
            <tableData breakPoint="0.0">
 	-3.0	3.0
-5.0	0.001391	-5.242E-4
-2.5	3.5546E-4	5.2545E-4
0.0	-6.8107E-4	0.0015302
1.0	-0.0010903	0.0019155
2.0	-0.0014919	0.002288
3.0	-0.0018798	0.0026422
4.0	-0.0022441	0.0029682
5.0	-0.0025727	0.0032515
6.0	-0.0028583	0.003477
7.5	-0.0032433	0.0036607
10.0	-0.0045849	0.0041443
12.5	-0.0062743	0.0057723
</tableData>
            <tableData breakPoint="10.0">
 	-3.0	3.0
-5.0	0.0013475	-5.0019E-4
-2.5	3.5649E-4	5.1166E-4
0.0	-6.4378E-4	0.0014856
1.0	-0.001044	0.001862
2.0	-0.0014428	0.0022301
3.0	-0.0018406	0.0025928
4.0	-0.0022564	0.0029757
5.0	-0.0028619	0.0035562
6.0	-0.0048692	0.0054021
7.5	-0.93247	-0.48549
10.0	-0.0021664	3.2208E-4
12.5	-0.0068367	0.0054905
</tableData>
         </table>
      </function>
      <function name="aero/function/flap_inner_drag_coeff_basic_Reynolds3_Mach_1">
         <description>drag_coefficient as function of flap_inner_deflection, alpha, beta, fixed Reynolds = 26246.72fixed Mach = 0.6</description>
         <table>
            <independentVar lookup="row">aero/alpha-deg</independentVar>
            <independentVar lookup="column">fcs/flap-pos-deg</independentVar>
            <independentVar lookup="table">aero/beta-deg</independentVar>
            <tableData breakPoint="0.0">
 	-3.0	3.0
-5.0	0.001391	-5.242E-4
-2.5	3.5546E-4	5.2545E-4
0.0	-6.8107E-4	0.0015302
1.0	-0.0010903	0.0019155
2.0	-0.0014919	0.002288
3.0	-0.0018798	0.0026422
4.0	-0.0022441	0.0029682
5.0	-0.0025727	0.0032515
6.0	-0.0028583	0.003477
7.5	-0.0032433	0.0036607
10.0	-0.0045849	0.0041443
12.5	-0.0062743	0.0057723
</tableData>
            <tableData breakPoint="10.0">
 	-3.0	3.0
-5.0	0.0013475	-5.0019E-4
-2.5	3.5649E-4	5.1166E-4
0.0	-6.4378E-4	0.0014856
1.0	-0.001044	0.001862
2.0	-0.0014428	0.0022301
3.0	-0.0018406	0.0025928
4.0	-0.0022564	0.0029757
5.0	-0.0028619	0.0035562
6.0	-0.0048692	0.0054021
7.5	-0.93247	-0.48549
10.0	-0.0021664	3.2208E-4
12.5	-0.0068367	0.0054905
</tableData>
         </table>
      </function>
      <function name="aero/function/flap_inner_drag_coeff_basic_Reynolds0_Mach_2">
         <description>drag_coefficient as function of flap_inner_deflection, alpha, beta, fixed Reynolds = 0.0fixed Mach = 0.78</description>
         <table>
            <independentVar lookup="row">aero/alpha-deg</independentVar>
            <independentVar lookup="column">fcs/flap-pos-deg</independentVar>
            <independentVar lookup="table">aero/beta-deg</independentVar>
            <tableData breakPoint="0.0">
 	-3.0	3.0
-5.0	0.0017783	-6.7014E-4
-2.5	4.5442E-4	6.7174E-4
0.0	-8.7068E-4	0.0019562
1.0	-0.0013939	0.0024488
2.0	-0.0019073	0.002925
3.0	-0.0024032	0.0033778
4.0	-0.0028689	0.0037945
5.0	-0.003289	0.0041568
6.0	-0.0036541	0.004445
7.5	-0.0041463	0.0046799
10.0	-0.0058613	0.005298
12.5	-0.0080211	0.0073794
</tableData>
            <tableData breakPoint="10.0">
 	-3.0	3.0
-5.0	0.0017226	-6.3945E-4
-2.5	4.5574E-4	6.5411E-4
0.0	-8.2302E-4	0.0018991
1.0	-0.0013347	0.0023804
2.0	-0.0018445	0.002851
3.0	-0.0023531	0.0033146
4.0	-0.0028846	0.0038042
5.0	-0.0036587	0.0045462
6.0	-0.0062248	0.0069061
7.5	-1.1921	-0.62066
10.0	-0.0027696	4.1175E-4
12.5	-0.0087401	0.0070191
</tableData>
         </table>
      </function>
      <function name="aero/function/flap_inner_drag_coeff_basic_Reynolds1_Mach_2">
         <description>drag_coefficient as function of flap_inner_deflection, alpha, beta, fixed Reynolds = 6561.68fixed Mach = 0.78</description>
         <table>
            <independentVar lookup="row">aero/alpha-deg</independentVar>
            <independentVar lookup="column">fcs/flap-pos-deg</independentVar>
            <independentVar lookup="table">aero/beta-deg</independentVar>
            <tableData breakPoint="0.0">
 	-3.0	3.0
-5.0	0.0017783	-6.7014E-4
-2.5	4.5442E-4	6.7174E-4
0.0	-8.7068E-4	0.0019562
1.0	-0.0013939	0.0024488
2.0	-0.0019073	0.002925
3.0	-0.0024032	0.0033778
4.0	-0.0028689	0.0037945
5.0	-0.003289	0.0041568
6.0	-0.0036541	0.004445
7.5	-0.0041463	0.0046799
10.0	-0.0058613	0.005298
12.5	-0.0080211	0.0073794
</tableData>
            <tableData breakPoint="10.0">
 	-3.0	3.0
-5.0	0.0017226	-6.3945E-4
-2.5	4.5574E-4	6.5411E-4
0.0	-8.2302E-4	0.0018991
1.0	-0.0013347	0.0023804
2.0	-0.0018445	0.002851
3.0	-0.0023531	0.0033146
4.0	-0.0028846	0.0038042
5.0	-0.0036587	0.0045462
6.0	-0.0062248	0.0069061
7.5	-1.1921	-0.62066
10.0	-0.0027696	4.1175E-4
12.5	-0.0087401	0.0070191
</tableData>
         </table>
      </function>
      <function name="aero/function/flap_inner_drag_coeff_basic_Reynolds2_Mach_2">
         <description>drag_coefficient as function of flap_inner_deflection, alpha, beta, fixed Reynolds = 16404.2fixed Mach = 0.78</description>
         <table>
            <independentVar lookup="row">aero/alpha-deg</independentVar>
            <independentVar lookup="column">fcs/flap-pos-deg</independentVar>
            <independentVar lookup="table">aero/beta-deg</independentVar>
            <tableData breakPoint="0.0">
 	-3.0	3.0
-5.0	0.0017783	-6.7014E-4
-2.5	4.5442E-4	6.7174E-4
0.0	-8.7068E-4	0.0019562
1.0	-0.0013939	0.0024488
2.0	-0.0019073	0.002925
3.0	-0.0024032	0.0033778
4.0	-0.0028689	0.0037945
5.0	-0.003289	0.0041568
6.0	-0.0036541	0.004445
7.5	-0.0041463	0.0046799
10.0	-0.0058613	0.005298
12.5	-0.0080211	0.0073794
</tableData>
            <tableData breakPoint="10.0">
 	-3.0	3.0
-5.0	0.0017226	-6.3945E-4
-2.5	4.5574E-4	6.5411E-4
0.0	-8.2302E-4	0.0018991
1.0	-0.0013347	0.0023804
2.0	-0.0018445	0.002851
3.0	-0.0023531	0.0033146
4.0	-0.0028846	0.0038042
5.0	-0.0036587	0.0045462
6.0	-0.0062248	0.0069061
7.5	-1.1921	-0.62066
10.0	-0.0027696	4.1175E-4
12.5	-0.0087401	0.0070191
</tableData>
         </table>
      </function>
      <function name="aero/function/flap_inner_drag_coeff_basic_Reynolds3_Mach_2">
         <description>drag_coefficient as function of flap_inner_deflection, alpha, beta, fixed Reynolds = 26246.72fixed Mach = 0.78</description>
         <table>
            <independentVar lookup="row">aero/alpha-deg</independentVar>
            <independentVar lookup="column">fcs/flap-pos-deg</independentVar>
            <independentVar lookup="table">aero/beta-deg</independentVar>
            <tableData breakPoint="0.0">
 	-3.0	3.0
-5.0	0.0017783	-6.7014E-4
-2.5	4.5442E-4	6.7174E-4
0.0	-8.7068E-4	0.0019562
1.0	-0.0013939	0.0024488
2.0	-0.0019073	0.002925
3.0	-0.0024032	0.0033778
4.0	-0.0028689	0.0037945
5.0	-0.003289	0.0041568
6.0	-0.0036541	0.004445
7.5	-0.0041463	0.0046799
10.0	-0.0058613	0.005298
12.5	-0.0080211	0.0073794
</tableData>
            <tableData breakPoint="10.0">
 	-3.0	3.0
-5.0	0.0017226	-6.3945E-4
-2.5	4.5574E-4	6.5411E-4
0.0	-8.2302E-4	0.0018991
1.0	-0.0013347	0.0023804
2.0	-0.0018445	0.002851
3.0	-0.0023531	0.0033146
4.0	-0.0028846	0.0038042
5.0	-0.0036587	0.0045462
6.0	-0.0062248	0.0069061
7.5	-1.1921	-0.62066
10.0	-0.0027696	4.1175E-4
12.5	-0.0087401	0.0070191
</tableData>
         </table>
      </function>
      <function name="aero/function/flap_inner_drag_coeff_basic_Reynolds0_Mach_3">
         <description>drag_coefficient as function of flap_inner_deflection, alpha, beta, fixed Reynolds = 0.0fixed Mach = 0.8</description>
         <table>
            <independentVar lookup="row">aero/alpha-deg</independentVar>
            <independentVar lookup="column">fcs/flap-pos-deg</independentVar>
            <independentVar lookup="table">aero/beta-deg</independentVar>
            <tableData breakPoint="0.0">
 	-3.0	3.0
-5.0	0.0018547	-6.9894E-4
-2.5	4.7395E-4	7.006E-4
0.0	-9.0809E-4	0.0020403
1.0	-0.0014538	0.002554
2.0	-0.0019892	0.0030506
3.0	-0.0025064	0.0035229
4.0	-0.0029922	0.0039575
5.0	-0.0034303	0.0043354
6.0	-0.0038111	0.004636
7.5	-0.0043245	0.004881
10.0	-0.0061132	0.0055257
12.5	-0.0083658	0.0076965
</tableData>
            <tableData breakPoint="10.0">
 	-3.0	3.0
-5.0	0.0017966	-6.6692E-4
-2.5	4.7532E-4	6.8221E-4
0.0	-8.5838E-4	0.0019807
1.0	-0.001392	0.0024827
2.0	-0.0019237	0.0029735
3.0	-0.0024542	0.003457
4.0	-0.0030085	0.0039677
5.0	-0.0038159	0.0047416
6.0	-0.0064923	0.0072028
7.5	-1.2433	-0.64733
10.0	-0.0028886	4.2944E-4
12.5	-0.0091156	0.0073207
</tableData>
         </table>
      </function>
      <function name="aero/function/flap_inner_drag_coeff_basic_Reynolds1_Mach_3">
         <description>drag_coefficient as function of flap_inner_deflection, alpha, beta, fixed Reynolds = 6561.68fixed Mach = 0.8</description>
         <table>
            <independentVar lookup="row">aero/alpha-deg</independentVar>
            <independentVar lookup="column">fcs/flap-pos-deg</independentVar>
            <independentVar lookup="table">aero/beta-deg</independentVar>
            <tableData breakPoint="0.0">
 	-3.0	3.0
-5.0	0.0018547	-6.9894E-4
-2.5	4.7395E-4	7.006E-4
0.0	-9.0809E-4	0.0020403
1.0	-0.0014538	0.002554
2.0	-0.0019892	0.0030506
3.0	-0.0025064	0.0035229
4.0	-0.0029922	0.0039575
5.0	-0.0034303	0.0043354
6.0	-0.0038111	0.004636
7.5	-0.0043245	0.004881
10.0	-0.0061132	0.0055257
12.5	-0.0083658	0.0076965
</tableData>
            <tableData breakPoint="10.0">
 	-3.0	3.0
-5.0	0.0017966	-6.6692E-4
-2.5	4.7532E-4	6.8221E-4
0.0	-8.5838E-4	0.0019807
1.0	-0.001392	0.0024827
2.0	-0.0019237	0.0029735
3.0	-0.0024542	0.003457
4.0	-0.0030085	0.0039677
5.0	-0.0038159	0.0047416
6.0	-0.0064923	0.0072028
7.5	-1.2433	-0.64733
10.0	-0.0028886	4.2944E-4
12.5	-0.0091156	0.0073207
</tableData>
         </table>
      </function>
      <function name="aero/function/flap_inner_drag_coeff_basic_Reynolds2_Mach_3">
         <description>drag_coefficient as function of flap_inner_deflection, alpha, beta, fixed Reynolds = 16404.2fixed Mach = 0.8</description>
         <table>
            <independentVar lookup="row">aero/alpha-deg</independentVar>
            <independentVar lookup="column">fcs/flap-pos-deg</independentVar>
            <independentVar lookup="table">aero/beta-deg</independentVar>
            <tableData breakPoint="0.0">
 	-3.0	3.0
-5.0	0.0018547	-6.9894E-4
-2.5	4.7395E-4	7.006E-4
0.0	-9.0809E-4	0.0020403
1.0	-0.0014538	0.002554
2.0	-0.0019892	0.0030506
3.0	-0.0025064	0.0035229
4.0	-0.0029922	0.0039575
5.0	-0.0034303	0.0043354
6.0	-0.0038111	0.004636
7.5	-0.0043245	0.004881
10.0	-0.0061132	0.0055257
12.5	-0.0083658	0.0076965
</tableData>
            <tableData breakPoint="10.0">
 	-3.0	3.0
-5.0	0.0017966	-6.6692E-4
-2.5	4.7532E-4	6.8221E-4
0.0	-8.5838E-4	0.0019807
1.0	-0.001392	0.0024827
2.0	-0.0019237	0.0029735
3.0	-0.0024542	0.003457
4.0	-0.0030085	0.0039677
5.0	-0.0038159	0.0047416
6.0	-0.0064923	0.0072028
7.5	-1.2433	-0.64733
10.0	-0.0028886	4.2944E-4
12.5	-0.0091156	0.0073207
</tableData>
         </table>
      </function>
      <function name="aero/function/flap_inner_drag_coeff_basic_Reynolds3_Mach_3">
         <description>drag_coefficient as function of flap_inner_deflection, alpha, beta, fixed Reynolds = 26246.72fixed Mach = 0.8</description>
         <table>
            <independentVar lookup="row">aero/alpha-deg</independentVar>
            <independentVar lookup="column">fcs/flap-pos-deg</independentVar>
            <independentVar lookup="table">aero/beta-deg</independentVar>
            <tableData breakPoint="0.0">
 	-3.0	3.0
-5.0	0.0018547	-6.9894E-4
-2.5	4.7395E-4	7.006E-4
0.0	-9.0809E-4	0.0020403
1.0	-0.0014538	0.002554
2.0	-0.0019892	0.0030506
3.0	-0.0025064	0.0035229
4.0	-0.0029922	0.0039575
5.0	-0.0034303	0.0043354
6.0	-0.0038111	0.004636
7.5	-0.0043245	0.004881
10.0	-0.0061132	0.0055257
12.5	-0.0083658	0.0076965
</tableData>
            <tableData breakPoint="10.0">
 	-3.0	3.0
-5.0	0.0017966	-6.6692E-4
-2.5	4.7532E-4	6.8221E-4
0.0	-8.5838E-4	0.0019807
1.0	-0.001392	0.0024827
2.0	-0.0019237	0.0029735
3.0	-0.0024542	0.003457
4.0	-0.0030085	0.0039677
5.0	-0.0038159	0.0047416
6.0	-0.0064923	0.0072028
7.5	-1.2433	-0.64733
10.0	-0.0028886	4.2944E-4
12.5	-0.0091156	0.0073207
</tableData>
         </table>
      </function>
      <function name="aero/function/flap_inner_drag_coeff_basic_deflection_Mach_0">
         <description>drag_coefficient as function of flap_inner_deflection, alpha, beta, Reynolds, fixed Mach = 0.2</description>
         <interpolate1d>
            <p>position/h-sl-ft</p>
            <v>0.000000</v>
            <p>aero/function/flap_inner_drag_coeff_basic_Reynolds0_Mach_0</p>
            <v>6561.6800</v>
            <p>aero/function/flap_inner_drag_coeff_basic_Reynolds1_Mach_0</p>
            <v>16404.2000</v>
            <p>aero/function/flap_inner_drag_coeff_basic_Reynolds2_Mach_0</p>
            <v>26246.7200</v>
            <p>aero/function/flap_inner_drag_coeff_basic_Reynolds3_Mach_0</p>
         </interpolate1d>
      </function>
      <function name="aero/function/flap_inner_drag_coeff_basic_deflection_Mach_1">
         <description>drag_coefficient as function of flap_inner_deflection, alpha, beta, Reynolds, fixed Mach = 0.6</description>
         <interpolate1d>
            <p>position/h-sl-ft</p>
            <v>0.000000</v>
            <p>aero/function/flap_inner_drag_coeff_basic_Reynolds0_Mach_1</p>
            <v>6561.6800</v>
            <p>aero/function/flap_inner_drag_coeff_basic_Reynolds1_Mach_1</p>
            <v>16404.2000</v>
            <p>aero/function/flap_inner_drag_coeff_basic_Reynolds2_Mach_1</p>
            <v>26246.7200</v>
            <p>aero/function/flap_inner_drag_coeff_basic_Reynolds3_Mach_1</p>
         </interpolate1d>
      </function>
      <function name="aero/function/flap_inner_drag_coeff_basic_deflection_Mach_2">
         <description>drag_coefficient as function of flap_inner_deflection, alpha, beta, Reynolds, fixed Mach = 0.78</description>
         <interpolate1d>
            <p>position/h-sl-ft</p>
            <v>0.000000</v>
            <p>aero/function/flap_inner_drag_coeff_basic_Reynolds0_Mach_2</p>
            <v>6561.6800</v>
            <p>aero/function/flap_inner_drag_coeff_basic_Reynolds1_Mach_2</p>
            <v>16404.2000</v>
            <p>aero/function/flap_inner_drag_coeff_basic_Reynolds2_Mach_2</p>
            <v>26246.7200</v>
            <p>aero/function/flap_inner_drag_coeff_basic_Reynolds3_Mach_2</p>
         </interpolate1d>
      </function>
      <function name="aero/function/flap_inner_drag_coeff_basic_deflection_Mach_3">
         <description>drag_coefficient as function of flap_inner_deflection, alpha, beta, Reynolds, fixed Mach = 0.8</description>
         <interpolate1d>
            <p>position/h-sl-ft</p>
            <v>0.000000</v>
            <p>aero/function/flap_inner_drag_coeff_basic_Reynolds0_Mach_3</p>
            <v>6561.6800</v>
            <p>aero/function/flap_inner_drag_coeff_basic_Reynolds1_Mach_3</p>
            <v>16404.2000</v>
            <p>aero/function/flap_inner_drag_coeff_basic_Reynolds2_Mach_3</p>
            <v>26246.7200</v>
            <p>aero/function/flap_inner_drag_coeff_basic_Reynolds3_Mach_3</p>
         </interpolate1d>
      </function>
      <function name="aero/function/flap_inner_drag_coeff_basic_Mach">
         <description>drag_coefficient as function of flap_inner_deflection, alpha, beta, Reynolds, Mach </description>
         <interpolate1d>
            <p>velocities/mach</p>
            <v>0.2000</v>
            <p>aero/function/flap_inner_drag_coeff_basic_deflection_Mach_0</p>
            <v>0.6000</v>
            <p>aero/function/flap_inner_drag_coeff_basic_deflection_Mach_1</p>
            <v>0.7800</v>
            <p>aero/function/flap_inner_drag_coeff_basic_deflection_Mach_2</p>
            <v>0.8000</v>
            <p>aero/function/flap_inner_drag_coeff_basic_deflection_Mach_3</p>
         </interpolate1d>
      </function>
      <function name="aero/function/flap_inner_side_coeff_basic_Reynolds0_Mach_0">
         <description>side_coefficient as function of flap_inner_deflection, alpha, beta, fixed Reynolds = 0.0fixed Mach = 0.2</description>
         <table>
            <independentVar lookup="row">aero/alpha-deg</independentVar>
            <independentVar lookup="column">fcs/flap-pos-deg</independentVar>
            <independentVar lookup="table">aero/beta-deg</independentVar>
            <tableData breakPoint="0.0">
 	-3.0	3.0
-5.0	-1.5792E-10	1.7555E-10
-2.5	-1.8771E-10	2.1216E-10
0.0	-2.1817E-10	2.485E-10
1.0	-2.2247E-10	2.5397E-10
2.0	-2.0996E-10	2.4135E-10
3.0	-1.6811E-10	1.9653E-10
4.0	-1.0245E-10	1.1819E-10
5.0	-1.0083E-10	7.5067E-11
6.0	-4.1352E-10	3.0033E-10
7.5	-2.0371E-9	1.8671E-9
10.0	-5.5483E-9	6.2526E-9
12.5	-4.6427E-9	5.9903E-9
</tableData>
            <tableData breakPoint="10.0">
 	-3.0	3.0
-5.0	5.3441E-4	-4.8076E-4
-2.5	5.0134E-4	-4.3656E-4
0.0	4.9787E-4	-4.1655E-4
1.0	5.0757E-4	-4.1619E-4
2.0	5.2235E-4	-4.171E-4
3.0	5.3446E-4	-4.0914E-4
4.0	5.1423E-4	-3.5845E-4
5.0	3.752E-4	-1.5556E-4
6.0	0.0011282	7.3323E-5
7.5	-0.18379	0.0090943
10.0	-0.0020644	-1.8425E-5
12.5	-0.0092593	0.0089324
</tableData>
         </table>
      </function>
      <function name="aero/function/flap_inner_side_coeff_basic_Reynolds1_Mach_0">
         <description>side_coefficient as function of flap_inner_deflection, alpha, beta, fixed Reynolds = 6561.68fixed Mach = 0.2</description>
         <table>
            <independentVar lookup="row">aero/alpha-deg</independentVar>
            <independentVar lookup="column">fcs/flap-pos-deg</independentVar>
            <independentVar lookup="table">aero/beta-deg</independentVar>
            <tableData breakPoint="0.0">
 	-3.0	3.0
-5.0	-1.5792E-10	1.7555E-10
-2.5	-1.8771E-10	2.1216E-10
0.0	-2.1817E-10	2.485E-10
1.0	-2.2247E-10	2.5397E-10
2.0	-2.0996E-10	2.4135E-10
3.0	-1.6811E-10	1.9653E-10
4.0	-1.0245E-10	1.1819E-10
5.0	-1.0083E-10	7.5067E-11
6.0	-4.1352E-10	3.0033E-10
7.5	-2.0371E-9	1.8671E-9
10.0	-5.5483E-9	6.2526E-9
12.5	-4.6427E-9	5.9903E-9
</tableData>
            <tableData breakPoint="10.0">
 	-3.0	3.0
-5.0	5.3441E-4	-4.8076E-4
-2.5	5.0134E-4	-4.3656E-4
0.0	4.9787E-4	-4.1655E-4
1.0	5.0757E-4	-4.1619E-4
2.0	5.2235E-4	-4.171E-4
3.0	5.3446E-4	-4.0914E-4
4.0	5.1423E-4	-3.5845E-4
5.0	3.752E-4	-1.5556E-4
6.0	0.0011282	7.3323E-5
7.5	-0.18379	0.0090943
10.0	-0.0020644	-1.8425E-5
12.5	-0.0092593	0.0089324
</tableData>
         </table>
      </function>
      <function name="aero/function/flap_inner_side_coeff_basic_Reynolds2_Mach_0">
         <description>side_coefficient as function of flap_inner_deflection, alpha, beta, fixed Reynolds = 16404.2fixed Mach = 0.2</description>
         <table>
            <independentVar lookup="row">aero/alpha-deg</independentVar>
            <independentVar lookup="column">fcs/flap-pos-deg</independentVar>
            <independentVar lookup="table">aero/beta-deg</independentVar>
            <tableData breakPoint="0.0">
 	-3.0	3.0
-5.0	-1.5792E-10	1.7555E-10
-2.5	-1.8771E-10	2.1216E-10
0.0	-2.1817E-10	2.485E-10
1.0	-2.2247E-10	2.5397E-10
2.0	-2.0996E-10	2.4135E-10
3.0	-1.6811E-10	1.9653E-10
4.0	-1.0245E-10	1.1819E-10
5.0	-1.0083E-10	7.5067E-11
6.0	-4.1352E-10	3.0033E-10
7.5	-2.0371E-9	1.8671E-9
10.0	-5.5483E-9	6.2526E-9
12.5	-4.6427E-9	5.9903E-9
</tableData>
            <tableData breakPoint="10.0">
 	-3.0	3.0
-5.0	5.3441E-4	-4.8076E-4
-2.5	5.0134E-4	-4.3656E-4
0.0	4.9787E-4	-4.1655E-4
1.0	5.0757E-4	-4.1619E-4
2.0	5.2235E-4	-4.171E-4
3.0	5.3446E-4	-4.0914E-4
4.0	5.1423E-4	-3.5845E-4
5.0	3.752E-4	-1.5556E-4
6.0	0.0011282	7.3323E-5
7.5	-0.18379	0.0090943
10.0	-0.0020644	-1.8425E-5
12.5	-0.0092593	0.0089324
</tableData>
         </table>
      </function>
      <function name="aero/function/flap_inner_side_coeff_basic_Reynolds3_Mach_0">
         <description>side_coefficient as function of flap_inner_deflection, alpha, beta, fixed Reynolds = 26246.72fixed Mach = 0.2</description>
         <table>
            <independentVar lookup="row">aero/alpha-deg</independentVar>
            <independentVar lookup="column">fcs/flap-pos-deg</independentVar>
            <independentVar lookup="table">aero/beta-deg</independentVar>
            <tableData breakPoint="0.0">
 	-3.0	3.0
-5.0	-1.5792E-10	1.7555E-10
-2.5	-1.8771E-10	2.1216E-10
0.0	-2.1817E-10	2.485E-10
1.0	-2.2247E-10	2.5397E-10
2.0	-2.0996E-10	2.4135E-10
3.0	-1.6811E-10	1.9653E-10
4.0	-1.0245E-10	1.1819E-10
5.0	-1.0083E-10	7.5067E-11
6.0	-4.1352E-10	3.0033E-10
7.5	-2.0371E-9	1.8671E-9
10.0	-5.5483E-9	6.2526E-9
12.5	-4.6427E-9	5.9903E-9
</tableData>
            <tableData breakPoint="10.0">
 	-3.0	3.0
-5.0	5.3441E-4	-4.8076E-4
-2.5	5.0134E-4	-4.3656E-4
0.0	4.9787E-4	-4.1655E-4
1.0	5.0757E-4	-4.1619E-4
2.0	5.2235E-4	-4.171E-4
3.0	5.3446E-4	-4.0914E-4
4.0	5.1423E-4	-3.5845E-4
5.0	3.752E-4	-1.5556E-4
6.0	0.0011282	7.3323E-5
7.5	-0.18379	0.0090943
10.0	-0.0020644	-1.8425E-5
12.5	-0.0092593	0.0089324
</tableData>
         </table>
      </function>
      <function name="aero/function/flap_inner_side_coeff_basic_Reynolds0_Mach_1">
         <description>side_coefficient as function of flap_inner_deflection, alpha, beta, fixed Reynolds = 0.0fixed Mach = 0.6</description>
         <table>
            <independentVar lookup="row">aero/alpha-deg</independentVar>
            <independentVar lookup="column">fcs/flap-pos-deg</independentVar>
            <independentVar lookup="table">aero/beta-deg</independentVar>
            <tableData breakPoint="0.0">
 	-3.0	3.0
-5.0	-1.9342E-10	2.15E-10
-2.5	-2.2989E-10	2.5984E-10
0.0	-2.672E-10	3.0435E-10
1.0	-2.7247E-10	3.1104E-10
2.0	-2.5715E-10	2.9559E-10
3.0	-2.059E-10	2.4069E-10
4.0	-1.2547E-10	1.4475E-10
5.0	-1.2349E-10	9.1938E-11
6.0	-5.0646E-10	3.6782E-10
7.5	-2.495E-9	2.2868E-9
10.0	-6.7952E-9	7.6579E-9
12.5	-5.6861E-9	7.3366E-9
</tableData>
            <tableData breakPoint="10.0">
 	-3.0	3.0
-5.0	6.5452E-4	-5.8881E-4
-2.5	6.1401E-4	-5.3467E-4
0.0	6.0977E-4	-5.1017E-4
1.0	6.2165E-4	-5.0972E-4
2.0	6.3975E-4	-5.1084E-4
3.0	6.5458E-4	-5.011E-4
4.0	6.298E-4	-4.3902E-4
5.0	4.5952E-4	-1.9053E-4
6.0	0.0013818	8.9802E-5
7.5	-0.22509	0.011138
10.0	-0.0025283	-2.2566E-5
12.5	-0.01134	0.01094
</tableData>
         </table>
      </function>
      <function name="aero/function/flap_inner_side_coeff_basic_Reynolds1_Mach_1">
         <description>side_coefficient as function of flap_inner_deflection, alpha, beta, fixed Reynolds = 6561.68fixed Mach = 0.6</description>
         <table>
            <independentVar lookup="row">aero/alpha-deg</independentVar>
            <independentVar lookup="column">fcs/flap-pos-deg</independentVar>
            <independentVar lookup="table">aero/beta-deg</independentVar>
            <tableData breakPoint="0.0">
 	-3.0	3.0
-5.0	-1.9342E-10	2.15E-10
-2.5	-2.2989E-10	2.5984E-10
0.0	-2.672E-10	3.0435E-10
1.0	-2.7247E-10	3.1104E-10
2.0	-2.5715E-10	2.9559E-10
3.0	-2.059E-10	2.4069E-10
4.0	-1.2547E-10	1.4475E-10
5.0	-1.2349E-10	9.1938E-11
6.0	-5.0646E-10	3.6782E-10
7.5	-2.495E-9	2.2868E-9
10.0	-6.7952E-9	7.6579E-9
12.5	-5.6861E-9	7.3366E-9
</tableData>
            <tableData breakPoint="10.0">
 	-3.0	3.0
-5.0	6.5452E-4	-5.8881E-4
-2.5	6.1401E-4	-5.3467E-4
0.0	6.0977E-4	-5.1017E-4
1.0	6.2165E-4	-5.0972E-4
2.0	6.3975E-4	-5.1084E-4
3.0	6.5458E-4	-5.011E-4
4.0	6.298E-4	-4.3902E-4
5.0	4.5952E-4	-1.9053E-4
6.0	0.0013818	8.9802E-5
7.5	-0.22509	0.011138
10.0	-0.0025283	-2.2566E-5
12.5	-0.01134	0.01094
</tableData>
         </table>
      </function>
      <function name="aero/function/flap_inner_side_coeff_basic_Reynolds2_Mach_1">
         <description>side_coefficient as function of flap_inner_deflection, alpha, beta, fixed Reynolds = 16404.2fixed Mach = 0.6</description>
         <table>
            <independentVar lookup="row">aero/alpha-deg</independentVar>
            <independentVar lookup="column">fcs/flap-pos-deg</independentVar>
            <independentVar lookup="table">aero/beta-deg</independentVar>
            <tableData breakPoint="0.0">
 	-3.0	3.0
-5.0	-1.9342E-10	2.15E-10
-2.5	-2.2989E-10	2.5984E-10
0.0	-2.672E-10	3.0435E-10
1.0	-2.7247E-10	3.1104E-10
2.0	-2.5715E-10	2.9559E-10
3.0	-2.059E-10	2.4069E-10
4.0	-1.2547E-10	1.4475E-10
5.0	-1.2349E-10	9.1938E-11
6.0	-5.0646E-10	3.6782E-10
7.5	-2.495E-9	2.2868E-9
10.0	-6.7952E-9	7.6579E-9
12.5	-5.6861E-9	7.3366E-9
</tableData>
            <tableData breakPoint="10.0">
 	-3.0	3.0
-5.0	6.5452E-4	-5.8881E-4
-2.5	6.1401E-4	-5.3467E-4
0.0	6.0977E-4	-5.1017E-4
1.0	6.2165E-4	-5.0972E-4
2.0	6.3975E-4	-5.1084E-4
3.0	6.5458E-4	-5.011E-4
4.0	6.298E-4	-4.3902E-4
5.0	4.5952E-4	-1.9053E-4
6.0	0.0013818	8.9802E-5
7.5	-0.22509	0.011138
10.0	-0.0025283	-2.2566E-5
12.5	-0.01134	0.01094
</tableData>
         </table>
      </function>
      <function name="aero/function/flap_inner_side_coeff_basic_Reynolds3_Mach_1">
         <description>side_coefficient as function of flap_inner_deflection, alpha, beta, fixed Reynolds = 26246.72fixed Mach = 0.6</description>
         <table>
            <independentVar lookup="row">aero/alpha-deg</independentVar>
            <independentVar lookup="column">fcs/flap-pos-deg</independentVar>
            <independentVar lookup="table">aero/beta-deg</independentVar>
            <tableData breakPoint="0.0">
 	-3.0	3.0
-5.0	-1.9342E-10	2.15E-10
-2.5	-2.2989E-10	2.5984E-10
0.0	-2.672E-10	3.0435E-10
1.0	-2.7247E-10	3.1104E-10
2.0	-2.5715E-10	2.9559E-10
3.0	-2.059E-10	2.4069E-10
4.0	-1.2547E-10	1.4475E-10
5.0	-1.2349E-10	9.1938E-11
6.0	-5.0646E-10	3.6782E-10
7.5	-2.495E-9	2.2868E-9
10.0	-6.7952E-9	7.6579E-9
12.5	-5.6861E-9	7.3366E-9
</tableData>
            <tableData breakPoint="10.0">
 	-3.0	3.0
-5.0	6.5452E-4	-5.8881E-4
-2.5	6.1401E-4	-5.3467E-4
0.0	6.0977E-4	-5.1017E-4
1.0	6.2165E-4	-5.0972E-4
2.0	6.3975E-4	-5.1084E-4
3.0	6.5458E-4	-5.011E-4
4.0	6.298E-4	-4.3902E-4
5.0	4.5952E-4	-1.9053E-4
6.0	0.0013818	8.9802E-5
7.5	-0.22509	0.011138
10.0	-0.0025283	-2.2566E-5
12.5	-0.01134	0.01094
</tableData>
         </table>
      </function>
      <function name="aero/function/flap_inner_side_coeff_basic_Reynolds0_Mach_2">
         <description>side_coefficient as function of flap_inner_deflection, alpha, beta, fixed Reynolds = 0.0fixed Mach = 0.78</description>
         <table>
            <independentVar lookup="row">aero/alpha-deg</independentVar>
            <independentVar lookup="column">fcs/flap-pos-deg</independentVar>
            <independentVar lookup="table">aero/beta-deg</independentVar>
            <tableData breakPoint="0.0">
 	-3.0	3.0
-5.0	-2.4726E-10	2.7486E-10
0.0	-3.4159E-10	3.8909E-10
2.0	-3.2874E-10	3.7788E-10
4.0	-1.604E-10	1.8505E-10
6.0	-6.4746E-10	4.7023E-10
10.0	-8.6871E-9	9.7899E-9
12.5	-7.2692E-9	9.3791E-9
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</tableData>
            <tableData breakPoint="10.0">
 	-3.0	3.0
-5.0	8.3674E-4	-7.5274E-4
0.0	7.7953E-4	-6.5221E-4
2.0	8.1786E-4	-6.5306E-4
4.0	8.0514E-4	-5.6124E-4
6.0	0.0017665	1.148E-4
10.0	-0.0032322	-2.8849E-5
12.5	-0.014497	0.013986
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</tableData>
         </table>
      </function>
      <function name="aero/function/flap_inner_side_coeff_basic_Reynolds1_Mach_2">
         <description>side_coefficient as function of flap_inner_deflection, alpha, beta, fixed Reynolds = 6561.68fixed Mach = 0.78</description>
         <table>
            <independentVar lookup="row">aero/alpha-deg</independentVar>
            <independentVar lookup="column">fcs/flap-pos-deg</independentVar>
            <independentVar lookup="table">aero/beta-deg</independentVar>
            <tableData breakPoint="0.0">
 	-3.0	3.0
-5.0	-2.4726E-10	2.7486E-10
0.0	-3.4159E-10	3.8909E-10
2.0	-3.2874E-10	3.7788E-10
4.0	-1.604E-10	1.8505E-10
6.0	-6.4746E-10	4.7023E-10
10.0	-8.6871E-9	9.7899E-9
12.5	-7.2692E-9	9.3791E-9
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</tableData>
            <tableData breakPoint="10.0">
 	-3.0	3.0
-5.0	8.3674E-4	-7.5274E-4
0.0	7.7953E-4	-6.5221E-4
2.0	8.1786E-4	-6.5306E-4
4.0	8.0514E-4	-5.6124E-4
6.0	0.0017665	1.148E-4
10.0	-0.0032322	-2.8849E-5
12.5	-0.014497	0.013986
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</tableData>
         </table>
      </function>
      <function name="aero/function/flap_inner_side_coeff_basic_Reynolds2_Mach_2">
         <description>side_coefficient as function of flap_inner_deflection, alpha, beta, fixed Reynolds = 16404.2fixed Mach = 0.78</description>
         <table>
            <independentVar lookup="row">aero/alpha-deg</independentVar>
            <independentVar lookup="column">fcs/flap-pos-deg</independentVar>
            <independentVar lookup="table">aero/beta-deg</independentVar>
            <tableData breakPoint="0.0">
 	-3.0	3.0
-5.0	-2.4726E-10	2.7486E-10
0.0	-3.4159E-10	3.8909E-10
2.0	-3.2874E-10	3.7788E-10
4.0	-1.604E-10	1.8505E-10
6.0	-6.4746E-10	4.7023E-10
10.0	-8.6871E-9	9.7899E-9
12.5	-7.2692E-9	9.3791E-9
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</tableData>
            <tableData breakPoint="10.0">
 	-3.0	3.0
-5.0	8.3674E-4	-7.5274E-4
0.0	7.7953E-4	-6.5221E-4
2.0	8.1786E-4	-6.5306E-4
4.0	8.0514E-4	-5.6124E-4
6.0	0.0017665	1.148E-4
10.0	-0.0032322	-2.8849E-5
12.5	-0.014497	0.013986
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</tableData>
         </table>
      </function>
      <function name="aero/function/flap_inner_side_coeff_basic_Reynolds3_Mach_2">
         <description>side_coefficient as function of flap_inner_deflection, alpha, beta, fixed Reynolds = 26246.72fixed Mach = 0.78</description>
         <table>
            <independentVar lookup="row">aero/alpha-deg</independentVar>
            <independentVar lookup="column">fcs/flap-pos-deg</independentVar>
            <independentVar lookup="table">aero/beta-deg</independentVar>
            <tableData breakPoint="0.0">
 	-3.0	3.0
-5.0	-2.4726E-10	2.7486E-10
0.0	-3.4159E-10	3.8909E-10
2.0	-3.2874E-10	3.7788E-10
4.0	-1.604E-10	1.8505E-10
6.0	-6.4746E-10	4.7023E-10
10.0	-8.6871E-9	9.7899E-9
12.5	-7.2692E-9	9.3791E-9
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</tableData>
            <tableData breakPoint="10.0">
 	-3.0	3.0
-5.0	8.3674E-4	-7.5274E-4
0.0	7.7953E-4	-6.5221E-4
2.0	8.1786E-4	-6.5306E-4
4.0	8.0514E-4	-5.6124E-4
6.0	0.0017665	1.148E-4
10.0	-0.0032322	-2.8849E-5
12.5	-0.014497	0.013986
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</tableData>
         </table>
      </function>
      <function name="aero/function/flap_inner_side_coeff_basic_Reynolds0_Mach_3">
         <description>side_coefficient as function of flap_inner_deflection, alpha, beta, fixed Reynolds = 0.0fixed Mach = 0.8</description>
         <table>
            <independentVar lookup="row">aero/alpha-deg</independentVar>
            <independentVar lookup="column">fcs/flap-pos-deg</independentVar>
            <independentVar lookup="table">aero/beta-deg</independentVar>
            <tableData breakPoint="0.0">
 	-3.0	3.0
-5.0	-2.5789E-10	2.8666E-10
0.0	-3.5626E-10	4.058E-10
2.0	-3.4287E-10	3.9412E-10
4.0	-1.6729E-10	1.93E-10
6.0	-6.7528E-10	4.9043E-10
10.0	-9.0603E-9	1.0211E-8
12.5	-7.5815E-9	9.7821E-9
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</tableData>
            <tableData breakPoint="10.0">
 	-3.0	3.0
-5.0	8.7269E-4	-7.8508E-4
0.0	8.1302E-4	-6.8023E-4
2.0	8.53E-4	-6.8112E-4
4.0	8.3973E-4	-5.8535E-4
6.0	0.0018424	1.1974E-4
10.0	-0.0033711	-3.0088E-5
12.5	-0.01512	0.014587
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</tableData>
         </table>
      </function>
      <function name="aero/function/flap_inner_side_coeff_basic_Reynolds1_Mach_3">
         <description>side_coefficient as function of flap_inner_deflection, alpha, beta, fixed Reynolds = 6561.68fixed Mach = 0.8</description>
         <table>
            <independentVar lookup="row">aero/alpha-deg</independentVar>
            <independentVar lookup="column">fcs/flap-pos-deg</independentVar>
            <independentVar lookup="table">aero/beta-deg</independentVar>
            <tableData breakPoint="0.0">
 	-3.0	3.0
-5.0	-2.5789E-10	2.8666E-10
0.0	-3.5626E-10	4.058E-10
2.0	-3.4287E-10	3.9412E-10
4.0	-1.6729E-10	1.93E-10
6.0	-6.7528E-10	4.9043E-10
10.0	-9.0603E-9	1.0211E-8
12.5	-7.5815E-9	9.7821E-9
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</tableData>
            <tableData breakPoint="10.0">
 	-3.0	3.0
-5.0	8.7269E-4	-7.8508E-4
0.0	8.1302E-4	-6.8023E-4
2.0	8.53E-4	-6.8112E-4
4.0	8.3973E-4	-5.8535E-4
6.0	0.0018424	1.1974E-4
10.0	-0.0033711	-3.0088E-5
12.5	-0.01512	0.014587
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</tableData>
         </table>
      </function>
      <function name="aero/function/flap_inner_side_coeff_basic_Reynolds2_Mach_3">
         <description>side_coefficient as function of flap_inner_deflection, alpha, beta, fixed Reynolds = 16404.2fixed Mach = 0.8</description>
         <table>
            <independentVar lookup="row">aero/alpha-deg</independentVar>
            <independentVar lookup="column">fcs/flap-pos-deg</independentVar>
            <independentVar lookup="table">aero/beta-deg</independentVar>
            <tableData breakPoint="0.0">
 	-3.0	3.0
-5.0	-2.5789E-10	2.8666E-10
0.0	-3.5626E-10	4.058E-10
2.0	-3.4287E-10	3.9412E-10
4.0	-1.6729E-10	1.93E-10
6.0	-6.7528E-10	4.9043E-10
10.0	-9.0603E-9	1.0211E-8
12.5	-7.5815E-9	9.7821E-9
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</tableData>
            <tableData breakPoint="10.0">
 	-3.0	3.0
-5.0	8.7269E-4	-7.8508E-4
0.0	8.1302E-4	-6.8023E-4
2.0	8.53E-4	-6.8112E-4
4.0	8.3973E-4	-5.8535E-4
6.0	0.0018424	1.1974E-4
10.0	-0.0033711	-3.0088E-5
12.5	-0.01512	0.014587
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</tableData>
         </table>
      </function>
      <function name="aero/function/flap_inner_side_coeff_basic_Reynolds3_Mach_3">
         <description>side_coefficient as function of flap_inner_deflection, alpha, beta, fixed Reynolds = 26246.72fixed Mach = 0.8</description>
         <table>
            <independentVar lookup="row">aero/alpha-deg</independentVar>
            <independentVar lookup="column">fcs/flap-pos-deg</independentVar>
            <independentVar lookup="table">aero/beta-deg</independentVar>
            <tableData breakPoint="0.0">
 	-3.0	3.0
-5.0	-2.5789E-10	2.8666E-10
0.0	-3.5626E-10	4.058E-10
2.0	-3.4287E-10	3.9412E-10
4.0	-1.6729E-10	1.93E-10
6.0	-6.7528E-10	4.9043E-10
10.0	-9.0603E-9	1.0211E-8
12.5	-7.5815E-9	9.7821E-9
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</tableData>
            <tableData breakPoint="10.0">
 	-3.0	3.0
-5.0	8.7269E-4	-7.8508E-4
0.0	8.1302E-4	-6.8023E-4
2.0	8.53E-4	-6.8112E-4
4.0	8.3973E-4	-5.8535E-4
6.0	0.0018424	1.1974E-4
10.0	-0.0033711	-3.0088E-5
12.5	-0.01512	0.014587
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</tableData>
         </table>
      </function>
      <function name="aero/function/flap_inner_side_coeff_basic_deflection_Mach_0">
         <description>side_coefficient as function of flap_inner_deflection, alpha, beta, Reynolds, fixed Mach = 0.2</description>
         <interpolate1d>
            <p>position/h-sl-ft</p>
            <v>0.000000</v>
            <p>aero/function/flap_inner_side_coeff_basic_Reynolds0_Mach_0</p>
            <v>6561.6800</v>
            <p>aero/function/flap_inner_side_coeff_basic_Reynolds1_Mach_0</p>
            <v>16404.2000</v>
            <p>aero/function/flap_inner_side_coeff_basic_Reynolds2_Mach_0</p>
            <v>26246.7200</v>
            <p>aero/function/flap_inner_side_coeff_basic_Reynolds3_Mach_0</p>
         </interpolate1d>
      </function>
      <function name="aero/function/flap_inner_side_coeff_basic_deflection_Mach_1">
         <description>side_coefficient as function of flap_inner_deflection, alpha, beta, Reynolds, fixed Mach = 0.6</description>
         <interpolate1d>
            <p>position/h-sl-ft</p>
            <v>0.000000</v>
            <p>aero/function/flap_inner_side_coeff_basic_Reynolds0_Mach_1</p>
            <v>6561.6800</v>
            <p>aero/function/flap_inner_side_coeff_basic_Reynolds1_Mach_1</p>
            <v>16404.2000</v>
            <p>aero/function/flap_inner_side_coeff_basic_Reynolds2_Mach_1</p>
            <v>26246.7200</v>
            <p>aero/function/flap_inner_side_coeff_basic_Reynolds3_Mach_1</p>
         </interpolate1d>
      </function>
      <function name="aero/function/flap_inner_side_coeff_basic_deflection_Mach_2">
         <description>side_coefficient as function of flap_inner_deflection, alpha, beta, Reynolds, fixed Mach = 0.78</description>
         <interpolate1d>
            <p>position/h-sl-ft</p>
            <v>0.000000</v>
            <p>aero/function/flap_inner_side_coeff_basic_Reynolds0_Mach_2</p>
            <v>6561.6800</v>
            <p>aero/function/flap_inner_side_coeff_basic_Reynolds1_Mach_2</p>
            <v>16404.2000</v>
            <p>aero/function/flap_inner_side_coeff_basic_Reynolds2_Mach_2</p>
            <v>26246.7200</v>
            <p>aero/function/flap_inner_side_coeff_basic_Reynolds3_Mach_2</p>
         </interpolate1d>
      </function>
      <function name="aero/function/flap_inner_side_coeff_basic_deflection_Mach_3">
         <description>side_coefficient as function of flap_inner_deflection, alpha, beta, Reynolds, fixed Mach = 0.8</description>
         <interpolate1d>
            <p>position/h-sl-ft</p>
            <v>0.000000</v>
            <p>aero/function/flap_inner_side_coeff_basic_Reynolds0_Mach_3</p>
            <v>6561.6800</v>
            <p>aero/function/flap_inner_side_coeff_basic_Reynolds1_Mach_3</p>
            <v>16404.2000</v>
            <p>aero/function/flap_inner_side_coeff_basic_Reynolds2_Mach_3</p>
            <v>26246.7200</v>
            <p>aero/function/flap_inner_side_coeff_basic_Reynolds3_Mach_3</p>
         </interpolate1d>
      </function>
      <function name="aero/function/flap_inner_side_coeff_basic_Mach">
         <description>side_coefficient as function of flap_inner_deflection, alpha, beta, Reynolds, Mach </description>
         <interpolate1d>
            <p>velocities/mach</p>
            <v>0.2000</v>
            <p>aero/function/flap_inner_side_coeff_basic_deflection_Mach_0</p>
            <v>0.6000</v>
            <p>aero/function/flap_inner_side_coeff_basic_deflection_Mach_1</p>
            <v>0.7800</v>
            <p>aero/function/flap_inner_side_coeff_basic_deflection_Mach_2</p>
            <v>0.8000</v>
            <p>aero/function/flap_inner_side_coeff_basic_deflection_Mach_3</p>
         </interpolate1d>
      </function>
      <function name="aero/function/flap_inner_lift_coeff_basic_Reynolds0_Mach_0">
         <description>lift_coefficient as function of flap_inner_deflection, alpha, beta, fixed Reynolds = 0.0fixed Mach = 0.2</description>
         <table>
            <independentVar lookup="row">aero/alpha-deg</independentVar>
            <independentVar lookup="column">fcs/flap-pos-deg</independentVar>
            <independentVar lookup="table">aero/beta-deg</independentVar>
            <tableData breakPoint="0.0">
 	-3.0	3.0
-5.0	-0.05222	0.052899
0.0	-0.051774	0.050778
2.0	-0.051404	0.049844
4.0	-0.050725	0.04872
6.0	-0.049279	0.046914
10.0	-0.04586	0.04085
12.5	-0.049756	0.043681
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</tableData>
            <tableData breakPoint="10.0">
 	-3.0	3.0
-5.0	-0.051504	0.052092
0.0	-0.05164	0.050312
2.0	-0.051451	0.049397
4.0	-0.051494	0.048906
6.0	-0.066726	0.061691
10.0	-0.047148	0.044159
12.5	-0.047636	0.043393
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</tableData>
         </table>
      </function>
      <function name="aero/function/flap_inner_lift_coeff_basic_Reynolds1_Mach_0">
         <description>lift_coefficient as function of flap_inner_deflection, alpha, beta, fixed Reynolds = 6561.68fixed Mach = 0.2</description>
         <table>
            <independentVar lookup="row">aero/alpha-deg</independentVar>
            <independentVar lookup="column">fcs/flap-pos-deg</independentVar>
            <independentVar lookup="table">aero/beta-deg</independentVar>
            <tableData breakPoint="0.0">
 	-3.0	3.0
-5.0	-0.05222	0.052899
0.0	-0.051774	0.050778
2.0	-0.051404	0.049844
4.0	-0.050725	0.04872
6.0	-0.049279	0.046914
10.0	-0.04586	0.04085
12.5	-0.049756	0.043681
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</tableData>
            <tableData breakPoint="10.0">
 	-3.0	3.0
-5.0	-0.051504	0.052092
0.0	-0.05164	0.050312
2.0	-0.051451	0.049397
4.0	-0.051494	0.048906
6.0	-0.066726	0.061691
10.0	-0.047148	0.044159
12.5	-0.047636	0.043393
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</tableData>
         </table>
      </function>
      <function name="aero/function/flap_inner_lift_coeff_basic_Reynolds2_Mach_0">
         <description>lift_coefficient as function of flap_inner_deflection, alpha, beta, fixed Reynolds = 16404.2fixed Mach = 0.2</description>
         <table>
            <independentVar lookup="row">aero/alpha-deg</independentVar>
            <independentVar lookup="column">fcs/flap-pos-deg</independentVar>
            <independentVar lookup="table">aero/beta-deg</independentVar>
            <tableData breakPoint="0.0">
 	-3.0	3.0
-5.0	-0.05222	0.052899
0.0	-0.051774	0.050778
2.0	-0.051404	0.049844
4.0	-0.050725	0.04872
6.0	-0.049279	0.046914
10.0	-0.04586	0.04085
12.5	-0.049756	0.043681
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</tableData>
            <tableData breakPoint="10.0">
 	-3.0	3.0
-5.0	-0.051504	0.052092
0.0	-0.05164	0.050312
2.0	-0.051451	0.049397
4.0	-0.051494	0.048906
6.0	-0.066726	0.061691
10.0	-0.047148	0.044159
12.5	-0.047636	0.043393
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</tableData>
         </table>
      </function>
      <function name="aero/function/flap_inner_lift_coeff_basic_Reynolds3_Mach_0">
         <description>lift_coefficient as function of flap_inner_deflection, alpha, beta, fixed Reynolds = 26246.72fixed Mach = 0.2</description>
         <table>
            <independentVar lookup="row">aero/alpha-deg</independentVar>
            <independentVar lookup="column">fcs/flap-pos-deg</independentVar>
            <independentVar lookup="table">aero/beta-deg</independentVar>
            <tableData breakPoint="0.0">
 	-3.0	3.0
-5.0	-0.05222	0.052899
0.0	-0.051774	0.050778
2.0	-0.051404	0.049844
4.0	-0.050725	0.04872
6.0	-0.049279	0.046914
10.0	-0.04586	0.04085
12.5	-0.049756	0.043681
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</tableData>
            <tableData breakPoint="10.0">
 	-3.0	3.0
-5.0	-0.051504	0.052092
0.0	-0.05164	0.050312
2.0	-0.051451	0.049397
4.0	-0.051494	0.048906
6.0	-0.066726	0.061691
10.0	-0.047148	0.044159
12.5	-0.047636	0.043393
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</tableData>
         </table>
      </function>
      <function name="aero/function/flap_inner_lift_coeff_basic_Reynolds0_Mach_1">
         <description>lift_coefficient as function of flap_inner_deflection, alpha, beta, fixed Reynolds = 0.0fixed Mach = 0.6</description>
         <table>
            <independentVar lookup="row">aero/alpha-deg</independentVar>
            <independentVar lookup="column">fcs/flap-pos-deg</independentVar>
            <independentVar lookup="table">aero/beta-deg</independentVar>
            <tableData breakPoint="0.0">
 	-3.0	3.0
-5.0	-0.063956	0.064787
0.0	-0.06341	0.06219
2.0	-0.062956	0.061046
4.0	-0.062125	0.059669
6.0	-0.060355	0.057458
10.0	-0.056167	0.050031
12.5	-0.060938	0.053499
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</tableData>
            <tableData breakPoint="10.0">
 	-3.0	3.0
-5.0	-0.063079	0.063799
0.0	-0.063245	0.06162
2.0	-0.063015	0.060499
4.0	-0.063066	0.059897
6.0	-0.081723	0.075556
10.0	-0.057745	0.054083
12.5	-0.058342	0.053145
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</tableData>
         </table>
      </function>
      <function name="aero/function/flap_inner_lift_coeff_basic_Reynolds1_Mach_1">
         <description>lift_coefficient as function of flap_inner_deflection, alpha, beta, fixed Reynolds = 6561.68fixed Mach = 0.6</description>
         <table>
            <independentVar lookup="row">aero/alpha-deg</independentVar>
            <independentVar lookup="column">fcs/flap-pos-deg</independentVar>
            <independentVar lookup="table">aero/beta-deg</independentVar>
            <tableData breakPoint="0.0">
 	-3.0	3.0
-5.0	-0.063956	0.064787
0.0	-0.06341	0.06219
2.0	-0.062956	0.061046
4.0	-0.062125	0.059669
6.0	-0.060355	0.057458
10.0	-0.056167	0.050031
12.5	-0.060938	0.053499
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</tableData>
            <tableData breakPoint="10.0">
 	-3.0	3.0
-5.0	-0.063079	0.063799
0.0	-0.063245	0.06162
2.0	-0.063015	0.060499
4.0	-0.063066	0.059897
6.0	-0.081723	0.075556
10.0	-0.057745	0.054083
12.5	-0.058342	0.053145
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</tableData>
         </table>
      </function>
      <function name="aero/function/flap_inner_lift_coeff_basic_Reynolds2_Mach_1">
         <description>lift_coefficient as function of flap_inner_deflection, alpha, beta, fixed Reynolds = 16404.2fixed Mach = 0.6</description>
         <table>
            <independentVar lookup="row">aero/alpha-deg</independentVar>
            <independentVar lookup="column">fcs/flap-pos-deg</independentVar>
            <independentVar lookup="table">aero/beta-deg</independentVar>
            <tableData breakPoint="0.0">
 	-3.0	3.0
-5.0	-0.063956	0.064787
0.0	-0.06341	0.06219
2.0	-0.062956	0.061046
4.0	-0.062125	0.059669
6.0	-0.060355	0.057458
10.0	-0.056167	0.050031
12.5	-0.060938	0.053499
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</tableData>
            <tableData breakPoint="10.0">
 	-3.0	3.0
-5.0	-0.063079	0.063799
0.0	-0.063245	0.06162
2.0	-0.063015	0.060499
4.0	-0.063066	0.059897
6.0	-0.081723	0.075556
10.0	-0.057745	0.054083
12.5	-0.058342	0.053145
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</tableData>
         </table>
      </function>
      <function name="aero/function/flap_inner_lift_coeff_basic_Reynolds3_Mach_1">
         <description>lift_coefficient as function of flap_inner_deflection, alpha, beta, fixed Reynolds = 26246.72fixed Mach = 0.6</description>
         <table>
            <independentVar lookup="row">aero/alpha-deg</independentVar>
            <independentVar lookup="column">fcs/flap-pos-deg</independentVar>
            <independentVar lookup="table">aero/beta-deg</independentVar>
            <tableData breakPoint="0.0">
 	-3.0	3.0
-5.0	-0.063956	0.064787
0.0	-0.06341	0.06219
2.0	-0.062956	0.061046
4.0	-0.062125	0.059669
6.0	-0.060355	0.057458
10.0	-0.056167	0.050031
12.5	-0.060938	0.053499
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</tableData>
            <tableData breakPoint="10.0">
 	-3.0	3.0
-5.0	-0.063079	0.063799
0.0	-0.063245	0.06162
2.0	-0.063015	0.060499
4.0	-0.063066	0.059897
6.0	-0.081723	0.075556
10.0	-0.057745	0.054083
12.5	-0.058342	0.053145
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</tableData>
         </table>
      </function>
      <function name="aero/function/flap_inner_lift_coeff_basic_Reynolds0_Mach_2">
         <description>lift_coefficient as function of flap_inner_deflection, alpha, beta, fixed Reynolds = 0.0fixed Mach = 0.78</description>
         <table>
            <independentVar lookup="row">aero/alpha-deg</independentVar>
            <independentVar lookup="column">fcs/flap-pos-deg</independentVar>
            <independentVar lookup="table">aero/beta-deg</independentVar>
            <tableData breakPoint="0.0">
 	-3.0	3.0
-5.0	-0.081762	0.082825
0.0	-0.081064	0.079505
2.0	-0.080484	0.078042
4.0	-0.079421	0.076282
6.0	-0.077158	0.073454
10.0	-0.071804	0.063959
12.5	-0.077903	0.068393
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</tableData>
            <tableData breakPoint="10.0">
 	-3.0	3.0
-5.0	-0.080641	0.081561
0.0	-0.080853	0.078775
2.0	-0.080558	0.077343
4.0	-0.080625	0.076573
6.0	-0.10447	0.096591
10.0	-0.073821	0.06914
12.5	-0.074584	0.067941
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</tableData>
         </table>
      </function>
      <function name="aero/function/flap_inner_lift_coeff_basic_Reynolds1_Mach_2">
         <description>lift_coefficient as function of flap_inner_deflection, alpha, beta, fixed Reynolds = 6561.68fixed Mach = 0.78</description>
         <table>
            <independentVar lookup="row">aero/alpha-deg</independentVar>
            <independentVar lookup="column">fcs/flap-pos-deg</independentVar>
            <independentVar lookup="table">aero/beta-deg</independentVar>
            <tableData breakPoint="0.0">
 	-3.0	3.0
-5.0	-0.081762	0.082825
0.0	-0.081064	0.079505
2.0	-0.080484	0.078042
4.0	-0.079421	0.076282
6.0	-0.077158	0.073454
10.0	-0.071804	0.063959
12.5	-0.077903	0.068393
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</tableData>
            <tableData breakPoint="10.0">
 	-3.0	3.0
-5.0	-0.080641	0.081561
0.0	-0.080853	0.078775
2.0	-0.080558	0.077343
4.0	-0.080625	0.076573
6.0	-0.10447	0.096591
10.0	-0.073821	0.06914
12.5	-0.074584	0.067941
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</tableData>
         </table>
      </function>
      <function name="aero/function/flap_inner_lift_coeff_basic_Reynolds2_Mach_2">
         <description>lift_coefficient as function of flap_inner_deflection, alpha, beta, fixed Reynolds = 16404.2fixed Mach = 0.78</description>
         <table>
            <independentVar lookup="row">aero/alpha-deg</independentVar>
            <independentVar lookup="column">fcs/flap-pos-deg</independentVar>
            <independentVar lookup="table">aero/beta-deg</independentVar>
            <tableData breakPoint="0.0">
 	-3.0	3.0
-5.0	-0.081762	0.082825
0.0	-0.081064	0.079505
2.0	-0.080484	0.078042
4.0	-0.079421	0.076282
6.0	-0.077158	0.073454
10.0	-0.071804	0.063959
12.5	-0.077903	0.068393
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</tableData>
            <tableData breakPoint="10.0">
 	-3.0	3.0
-5.0	-0.080641	0.081561
0.0	-0.080853	0.078775
2.0	-0.080558	0.077343
4.0	-0.080625	0.076573
6.0	-0.10447	0.096591
10.0	-0.073821	0.06914
12.5	-0.074584	0.067941
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</tableData>
         </table>
      </function>
      <function name="aero/function/flap_inner_lift_coeff_basic_Reynolds3_Mach_2">
         <description>lift_coefficient as function of flap_inner_deflection, alpha, beta, fixed Reynolds = 26246.72fixed Mach = 0.78</description>
         <table>
            <independentVar lookup="row">aero/alpha-deg</independentVar>
            <independentVar lookup="column">fcs/flap-pos-deg</independentVar>
            <independentVar lookup="table">aero/beta-deg</independentVar>
            <tableData breakPoint="0.0">
 	-3.0	3.0
-5.0	-0.081762	0.082825
0.0	-0.081064	0.079505
2.0	-0.080484	0.078042
4.0	-0.079421	0.076282
6.0	-0.077158	0.073454
10.0	-0.071804	0.063959
12.5	-0.077903	0.068393
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</tableData>
            <tableData breakPoint="10.0">
 	-3.0	3.0
-5.0	-0.080641	0.081561
0.0	-0.080853	0.078775
2.0	-0.080558	0.077343
4.0	-0.080625	0.076573
6.0	-0.10447	0.096591
10.0	-0.073821	0.06914
12.5	-0.074584	0.067941
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</tableData>
         </table>
      </function>
      <function name="aero/function/flap_inner_lift_coeff_basic_Reynolds0_Mach_3">
         <description>lift_coefficient as function of flap_inner_deflection, alpha, beta, fixed Reynolds = 0.0fixed Mach = 0.8</description>
         <table>
            <independentVar lookup="row">aero/alpha-deg</independentVar>
            <independentVar lookup="column">fcs/flap-pos-deg</independentVar>
            <independentVar lookup="table">aero/beta-deg</independentVar>
            <tableData breakPoint="0.0">
 	-3.0	3.0
-5.0	-0.085275	0.086383
0.0	-0.084547	0.082921
2.0	-0.083942	0.081395
4.0	-0.082833	0.079559
6.0	-0.080473	0.07661
10.0	-0.074889	0.066707
12.5	-0.081251	0.071331
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</tableData>
            <tableData breakPoint="10.0">
 	-3.0	3.0
-5.0	-0.084105	0.085066
0.0	-0.084327	0.08216
2.0	-0.08402	0.080666
4.0	-0.084089	0.079863
6.0	-0.10896	0.10074
10.0	-0.076993	0.072111
12.5	-0.077789	0.07086
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</tableData>
         </table>
      </function>
      <function name="aero/function/flap_inner_lift_coeff_basic_Reynolds1_Mach_3">
         <description>lift_coefficient as function of flap_inner_deflection, alpha, beta, fixed Reynolds = 6561.68fixed Mach = 0.8</description>
         <table>
            <independentVar lookup="row">aero/alpha-deg</independentVar>
            <independentVar lookup="column">fcs/flap-pos-deg</independentVar>
            <independentVar lookup="table">aero/beta-deg</independentVar>
            <tableData breakPoint="0.0">
 	-3.0	3.0
-5.0	-0.085275	0.086383
0.0	-0.084547	0.082921
2.0	-0.083942	0.081395
4.0	-0.082833	0.079559
6.0	-0.080473	0.07661
10.0	-0.074889	0.066707
12.5	-0.081251	0.071331
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</tableData>
            <tableData breakPoint="10.0">
 	-3.0	3.0
-5.0	-0.084105	0.085066
0.0	-0.084327	0.08216
2.0	-0.08402	0.080666
4.0	-0.084089	0.079863
6.0	-0.10896	0.10074
10.0	-0.076993	0.072111
12.5	-0.077789	0.07086
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</tableData>
         </table>
      </function>
      <function name="aero/function/flap_inner_lift_coeff_basic_Reynolds2_Mach_3">
         <description>lift_coefficient as function of flap_inner_deflection, alpha, beta, fixed Reynolds = 16404.2fixed Mach = 0.8</description>
         <table>
            <independentVar lookup="row">aero/alpha-deg</independentVar>
            <independentVar lookup="column">fcs/flap-pos-deg</independentVar>
            <independentVar lookup="table">aero/beta-deg</independentVar>
            <tableData breakPoint="0.0">
 	-3.0	3.0
-5.0	-0.085275	0.086383
0.0	-0.084547	0.082921
2.0	-0.083942	0.081395
4.0	-0.082833	0.079559
6.0	-0.080473	0.07661
10.0	-0.074889	0.066707
12.5	-0.081251	0.071331
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</tableData>
            <tableData breakPoint="10.0">
 	-3.0	3.0
-5.0	-0.084105	0.085066
0.0	-0.084327	0.08216
2.0	-0.08402	0.080666
4.0	-0.084089	0.079863
6.0	-0.10896	0.10074
10.0	-0.076993	0.072111
12.5	-0.077789	0.07086
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</tableData>
         </table>
      </function>
      <function name="aero/function/flap_inner_lift_coeff_basic_Reynolds3_Mach_3">
         <description>lift_coefficient as function of flap_inner_deflection, alpha, beta, fixed Reynolds = 26246.72fixed Mach = 0.8</description>
         <table>
            <independentVar lookup="row">aero/alpha-deg</independentVar>
            <independentVar lookup="column">fcs/flap-pos-deg</independentVar>
            <independentVar lookup="table">aero/beta-deg</independentVar>
            <tableData breakPoint="0.0">
 	-3.0	3.0
-5.0	-0.085275	0.086383
0.0	-0.084547	0.082921
2.0	-0.083942	0.081395
4.0	-0.082833	0.079559
6.0	-0.080473	0.07661
10.0	-0.074889	0.066707
12.5	-0.081251	0.071331
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</tableData>
            <tableData breakPoint="10.0">
 	-3.0	3.0
-5.0	-0.084105	0.085066
0.0	-0.084327	0.08216
2.0	-0.08402	0.080666
4.0	-0.084089	0.079863
6.0	-0.10896	0.10074
10.0	-0.076993	0.072111
12.5	-0.077789	0.07086
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</tableData>
         </table>
      </function>
      <function name="aero/function/flap_inner_lift_coeff_basic_deflection_Mach_0">
         <description>lift_coefficient as function of flap_inner_deflection, alpha, beta, Reynolds, fixed Mach = 0.2</description>
         <interpolate1d>
            <p>position/h-sl-ft</p>
            <v>0.000000</v>
            <p>aero/function/flap_inner_lift_coeff_basic_Reynolds0_Mach_0</p>
            <v>6561.6800</v>
            <p>aero/function/flap_inner_lift_coeff_basic_Reynolds1_Mach_0</p>
            <v>16404.2000</v>
            <p>aero/function/flap_inner_lift_coeff_basic_Reynolds2_Mach_0</p>
            <v>26246.7200</v>
            <p>aero/function/flap_inner_lift_coeff_basic_Reynolds3_Mach_0</p>
         </interpolate1d>
      </function>
      <function name="aero/function/flap_inner_lift_coeff_basic_deflection_Mach_1">
         <description>lift_coefficient as function of flap_inner_deflection, alpha, beta, Reynolds, fixed Mach = 0.6</description>
         <interpolate1d>
            <p>position/h-sl-ft</p>
            <v>0.000000</v>
            <p>aero/function/flap_inner_lift_coeff_basic_Reynolds0_Mach_1</p>
            <v>6561.6800</v>
            <p>aero/function/flap_inner_lift_coeff_basic_Reynolds1_Mach_1</p>
            <v>16404.2000</v>
            <p>aero/function/flap_inner_lift_coeff_basic_Reynolds2_Mach_1</p>
            <v>26246.7200</v>
            <p>aero/function/flap_inner_lift_coeff_basic_Reynolds3_Mach_1</p>
         </interpolate1d>
      </function>
      <function name="aero/function/flap_inner_lift_coeff_basic_deflection_Mach_2">
         <description>lift_coefficient as function of flap_inner_deflection, alpha, beta, Reynolds, fixed Mach = 0.78</description>
         <interpolate1d>
            <p>position/h-sl-ft</p>
            <v>0.000000</v>
            <p>aero/function/flap_inner_lift_coeff_basic_Reynolds0_Mach_2</p>
            <v>6561.6800</v>
            <p>aero/function/flap_inner_lift_coeff_basic_Reynolds1_Mach_2</p>
            <v>16404.2000</v>
            <p>aero/function/flap_inner_lift_coeff_basic_Reynolds2_Mach_2</p>
            <v>26246.7200</v>
            <p>aero/function/flap_inner_lift_coeff_basic_Reynolds3_Mach_2</p>
         </interpolate1d>
      </function>
      <function name="aero/function/flap_inner_lift_coeff_basic_deflection_Mach_3">
         <description>lift_coefficient as function of flap_inner_deflection, alpha, beta, Reynolds, fixed Mach = 0.8</description>
         <interpolate1d>
            <p>position/h-sl-ft</p>
            <v>0.000000</v>
            <p>aero/function/flap_inner_lift_coeff_basic_Reynolds0_Mach_3</p>
            <v>6561.6800</v>
            <p>aero/function/flap_inner_lift_coeff_basic_Reynolds1_Mach_3</p>
            <v>16404.2000</v>
            <p>aero/function/flap_inner_lift_coeff_basic_Reynolds2_Mach_3</p>
            <v>26246.7200</v>
            <p>aero/function/flap_inner_lift_coeff_basic_Reynolds3_Mach_3</p>
         </interpolate1d>
      </function>
      <function name="aero/function/flap_inner_lift_coeff_basic_Mach">
         <description>lift_coefficient as function of flap_inner_deflection, alpha, beta, Reynolds, Mach </description>
         <interpolate1d>
            <p>velocities/mach</p>
            <v>0.2000</v>
            <p>aero/function/flap_inner_lift_coeff_basic_deflection_Mach_0</p>
            <v>0.6000</v>
            <p>aero/function/flap_inner_lift_coeff_basic_deflection_Mach_1</p>
            <v>0.7800</v>
            <p>aero/function/flap_inner_lift_coeff_basic_deflection_Mach_2</p>
            <v>0.8000</v>
            <p>aero/function/flap_inner_lift_coeff_basic_deflection_Mach_3</p>
         </interpolate1d>
      </function>
      <function name="aero/function/flap_inner_roll_coeff_basic_Reynolds0_Mach_0">
         <description>roll_coefficient as function of flap_inner_deflection, alpha, beta, fixed Reynolds = 0.0fixed Mach = 0.2</description>
         <table>
            <independentVar lookup="row">aero/alpha-deg</independentVar>
            <independentVar lookup="column">fcs/flap-pos-deg</independentVar>
            <independentVar lookup="table">aero/beta-deg</independentVar>
            <tableData breakPoint="0.0">
 	-3.0	3.0
-5.0	1.3532E-10	-1.3696E-10
0.0	1.6672E-10	-1.6208E-10
2.0	1.8008E-10	-1.7207E-10
4.0	1.9616E-10	-1.8356E-10
6.0	2.6413E-10	-2.4211E-10
10.0	6.4705E-10	-6.9834E-10
12.5	5.6556E-10	-6.2999E-10
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</tableData>
            <tableData breakPoint="10.0">
 	-3.0	3.0
-5.0	-2.5366E-4	2.5605E-4
0.0	-2.1414E-4	2.2952E-4
2.0	-1.9403E-4	2.1935E-4
4.0	-1.9661E-4	2.468E-4
6.0	-7.3995E-4	9.9853E-4
10.0	8.1283E-4	-8.6648E-4
12.5	8.161E-4	-8.6698E-4
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</tableData>
         </table>
      </function>
      <function name="aero/function/flap_inner_roll_coeff_basic_Reynolds1_Mach_0">
         <description>roll_coefficient as function of flap_inner_deflection, alpha, beta, fixed Reynolds = 6561.68fixed Mach = 0.2</description>
         <table>
            <independentVar lookup="row">aero/alpha-deg</independentVar>
            <independentVar lookup="column">fcs/flap-pos-deg</independentVar>
            <independentVar lookup="table">aero/beta-deg</independentVar>
            <tableData breakPoint="0.0">
 	-3.0	3.0
-5.0	1.3532E-10	-1.3696E-10
0.0	1.6672E-10	-1.6208E-10
2.0	1.8008E-10	-1.7207E-10
4.0	1.9616E-10	-1.8356E-10
6.0	2.6413E-10	-2.4211E-10
10.0	6.4705E-10	-6.9834E-10
12.5	5.6556E-10	-6.2999E-10
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</tableData>
            <tableData breakPoint="10.0">
 	-3.0	3.0
-5.0	-2.5366E-4	2.5605E-4
0.0	-2.1414E-4	2.2952E-4
2.0	-1.9403E-4	2.1935E-4
4.0	-1.9661E-4	2.468E-4
6.0	-7.3995E-4	9.9853E-4
10.0	8.1283E-4	-8.6648E-4
12.5	8.161E-4	-8.6698E-4
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</tableData>
         </table>
      </function>
      <function name="aero/function/flap_inner_roll_coeff_basic_Reynolds2_Mach_0">
         <description>roll_coefficient as function of flap_inner_deflection, alpha, beta, fixed Reynolds = 16404.2fixed Mach = 0.2</description>
         <table>
            <independentVar lookup="row">aero/alpha-deg</independentVar>
            <independentVar lookup="column">fcs/flap-pos-deg</independentVar>
            <independentVar lookup="table">aero/beta-deg</independentVar>
            <tableData breakPoint="0.0">
 	-3.0	3.0
-5.0	1.3532E-10	-1.3696E-10
0.0	1.6672E-10	-1.6208E-10
2.0	1.8008E-10	-1.7207E-10
4.0	1.9616E-10	-1.8356E-10
6.0	2.6413E-10	-2.4211E-10
10.0	6.4705E-10	-6.9834E-10
12.5	5.6556E-10	-6.2999E-10
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</tableData>
            <tableData breakPoint="10.0">
 	-3.0	3.0
-5.0	-2.5366E-4	2.5605E-4
0.0	-2.1414E-4	2.2952E-4
2.0	-1.9403E-4	2.1935E-4
4.0	-1.9661E-4	2.468E-4
6.0	-7.3995E-4	9.9853E-4
10.0	8.1283E-4	-8.6648E-4
12.5	8.161E-4	-8.6698E-4
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</tableData>
         </table>
      </function>
      <function name="aero/function/flap_inner_roll_coeff_basic_Reynolds3_Mach_0">
         <description>roll_coefficient as function of flap_inner_deflection, alpha, beta, fixed Reynolds = 26246.72fixed Mach = 0.2</description>
         <table>
            <independentVar lookup="row">aero/alpha-deg</independentVar>
            <independentVar lookup="column">fcs/flap-pos-deg</independentVar>
            <independentVar lookup="table">aero/beta-deg</independentVar>
            <tableData breakPoint="0.0">
 	-3.0	3.0
-5.0	1.3532E-10	-1.3696E-10
0.0	1.6672E-10	-1.6208E-10
2.0	1.8008E-10	-1.7207E-10
4.0	1.9616E-10	-1.8356E-10
6.0	2.6413E-10	-2.4211E-10
10.0	6.4705E-10	-6.9834E-10
12.5	5.6556E-10	-6.2999E-10
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</tableData>
            <tableData breakPoint="10.0">
 	-3.0	3.0
-5.0	-2.5366E-4	2.5605E-4
0.0	-2.1414E-4	2.2952E-4
2.0	-1.9403E-4	2.1935E-4
4.0	-1.9661E-4	2.468E-4
6.0	-7.3995E-4	9.9853E-4
10.0	8.1283E-4	-8.6648E-4
12.5	8.161E-4	-8.6698E-4
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</tableData>
         </table>
      </function>
      <function name="aero/function/flap_inner_roll_coeff_basic_Reynolds0_Mach_1">
         <description>roll_coefficient as function of flap_inner_deflection, alpha, beta, fixed Reynolds = 0.0fixed Mach = 0.6</description>
         <table>
            <independentVar lookup="row">aero/alpha-deg</independentVar>
            <independentVar lookup="column">fcs/flap-pos-deg</independentVar>
            <independentVar lookup="table">aero/beta-deg</independentVar>
            <tableData breakPoint="0.0">
 	-3.0	3.0
-5.0	1.6573E-10	-1.6774E-10
0.0	2.0419E-10	-1.9851E-10
2.0	2.2055E-10	-2.1074E-10
4.0	2.4024E-10	-2.2481E-10
6.0	3.2349E-10	-2.9653E-10
10.0	7.9247E-10	-8.5529E-10
12.5	6.9266E-10	-7.7157E-10
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</tableData>
            <tableData breakPoint="10.0">
 	-3.0	3.0
-5.0	-3.1067E-4	3.136E-4
0.0	-2.6226E-4	2.8111E-4
2.0	-2.3764E-4	2.6865E-4
4.0	-2.408E-4	3.0227E-4
6.0	-9.0625E-4	0.0012229
10.0	9.9551E-4	-0.0010612
12.5	9.9951E-4	-0.0010618
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</tableData>
         </table>
      </function>
      <function name="aero/function/flap_inner_roll_coeff_basic_Reynolds1_Mach_1">
         <description>roll_coefficient as function of flap_inner_deflection, alpha, beta, fixed Reynolds = 6561.68fixed Mach = 0.6</description>
         <table>
            <independentVar lookup="row">aero/alpha-deg</independentVar>
            <independentVar lookup="column">fcs/flap-pos-deg</independentVar>
            <independentVar lookup="table">aero/beta-deg</independentVar>
            <tableData breakPoint="0.0">
 	-3.0	3.0
-5.0	1.6573E-10	-1.6774E-10
0.0	2.0419E-10	-1.9851E-10
2.0	2.2055E-10	-2.1074E-10
4.0	2.4024E-10	-2.2481E-10
6.0	3.2349E-10	-2.9653E-10
10.0	7.9247E-10	-8.5529E-10
12.5	6.9266E-10	-7.7157E-10
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</tableData>
            <tableData breakPoint="10.0">
 	-3.0	3.0
-5.0	-3.1067E-4	3.136E-4
0.0	-2.6226E-4	2.8111E-4
2.0	-2.3764E-4	2.6865E-4
4.0	-2.408E-4	3.0227E-4
6.0	-9.0625E-4	0.0012229
10.0	9.9551E-4	-0.0010612
12.5	9.9951E-4	-0.0010618
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</tableData>
         </table>
      </function>
      <function name="aero/function/flap_inner_roll_coeff_basic_Reynolds2_Mach_1">
         <description>roll_coefficient as function of flap_inner_deflection, alpha, beta, fixed Reynolds = 16404.2fixed Mach = 0.6</description>
         <table>
            <independentVar lookup="row">aero/alpha-deg</independentVar>
            <independentVar lookup="column">fcs/flap-pos-deg</independentVar>
            <independentVar lookup="table">aero/beta-deg</independentVar>
            <tableData breakPoint="0.0">
 	-3.0	3.0
-5.0	1.6573E-10	-1.6774E-10
0.0	2.0419E-10	-1.9851E-10
2.0	2.2055E-10	-2.1074E-10
4.0	2.4024E-10	-2.2481E-10
6.0	3.2349E-10	-2.9653E-10
10.0	7.9247E-10	-8.5529E-10
12.5	6.9266E-10	-7.7157E-10
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</tableData>
            <tableData breakPoint="10.0">
 	-3.0	3.0
-5.0	-3.1067E-4	3.136E-4
0.0	-2.6226E-4	2.8111E-4
2.0	-2.3764E-4	2.6865E-4
4.0	-2.408E-4	3.0227E-4
6.0	-9.0625E-4	0.0012229
10.0	9.9551E-4	-0.0010612
12.5	9.9951E-4	-0.0010618
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</tableData>
         </table>
      </function>
      <function name="aero/function/flap_inner_roll_coeff_basic_Reynolds3_Mach_1">
         <description>roll_coefficient as function of flap_inner_deflection, alpha, beta, fixed Reynolds = 26246.72fixed Mach = 0.6</description>
         <table>
            <independentVar lookup="row">aero/alpha-deg</independentVar>
            <independentVar lookup="column">fcs/flap-pos-deg</independentVar>
            <independentVar lookup="table">aero/beta-deg</independentVar>
            <tableData breakPoint="0.0">
 	-3.0	3.0
-5.0	1.6573E-10	-1.6774E-10
0.0	2.0419E-10	-1.9851E-10
2.0	2.2055E-10	-2.1074E-10
4.0	2.4024E-10	-2.2481E-10
6.0	3.2349E-10	-2.9653E-10
10.0	7.9247E-10	-8.5529E-10
12.5	6.9266E-10	-7.7157E-10
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</tableData>
            <tableData breakPoint="10.0">
 	-3.0	3.0
-5.0	-3.1067E-4	3.136E-4
0.0	-2.6226E-4	2.8111E-4
2.0	-2.3764E-4	2.6865E-4
4.0	-2.408E-4	3.0227E-4
6.0	-9.0625E-4	0.0012229
10.0	9.9551E-4	-0.0010612
12.5	9.9951E-4	-0.0010618
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</tableData>
         </table>
      </function>
      <function name="aero/function/flap_inner_roll_coeff_basic_Reynolds0_Mach_2">
         <description>roll_coefficient as function of flap_inner_deflection, alpha, beta, fixed Reynolds = 0.0fixed Mach = 0.78</description>
         <table>
            <independentVar lookup="row">aero/alpha-deg</independentVar>
            <independentVar lookup="column">fcs/flap-pos-deg</independentVar>
            <independentVar lookup="table">aero/beta-deg</independentVar>
            <tableData breakPoint="0.0">
 	-3.0	3.0
-5.0	2.1187E-10	-2.1444E-10
0.0	2.6103E-10	-2.5377E-10
2.0	2.8195E-10	-2.6941E-10
4.0	3.0712E-10	-2.874E-10
6.0	4.1355E-10	-3.7908E-10
10.0	1.0131E-9	-1.0934E-9
12.5	8.8551E-10	-9.8638E-10
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</tableData>
            <tableData breakPoint="10.0">
 	-3.0	3.0
-5.0	-3.9716E-4	4.009E-4
0.0	-3.3528E-4	3.5937E-4
2.0	-3.038E-4	3.4344E-4
4.0	-3.0784E-4	3.8642E-4
6.0	-0.0011586	0.0015634
10.0	0.0012727	-0.0013567
12.5	0.0012778	-0.0013574
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</tableData>
         </table>
      </function>
      <function name="aero/function/flap_inner_roll_coeff_basic_Reynolds1_Mach_2">
         <description>roll_coefficient as function of flap_inner_deflection, alpha, beta, fixed Reynolds = 6561.68fixed Mach = 0.78</description>
         <table>
            <independentVar lookup="row">aero/alpha-deg</independentVar>
            <independentVar lookup="column">fcs/flap-pos-deg</independentVar>
            <independentVar lookup="table">aero/beta-deg</independentVar>
            <tableData breakPoint="0.0">
 	-3.0	3.0
-5.0	2.1187E-10	-2.1444E-10
0.0	2.6103E-10	-2.5377E-10
2.0	2.8195E-10	-2.6941E-10
4.0	3.0712E-10	-2.874E-10
6.0	4.1355E-10	-3.7908E-10
10.0	1.0131E-9	-1.0934E-9
12.5	8.8551E-10	-9.8638E-10
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</tableData>
            <tableData breakPoint="10.0">
 	-3.0	3.0
-5.0	-3.9716E-4	4.009E-4
0.0	-3.3528E-4	3.5937E-4
2.0	-3.038E-4	3.4344E-4
4.0	-3.0784E-4	3.8642E-4
6.0	-0.0011586	0.0015634
10.0	0.0012727	-0.0013567
12.5	0.0012778	-0.0013574
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</tableData>
         </table>
      </function>
      <function name="aero/function/flap_inner_roll_coeff_basic_Reynolds2_Mach_2">
         <description>roll_coefficient as function of flap_inner_deflection, alpha, beta, fixed Reynolds = 16404.2fixed Mach = 0.78</description>
         <table>
            <independentVar lookup="row">aero/alpha-deg</independentVar>
            <independentVar lookup="column">fcs/flap-pos-deg</independentVar>
            <independentVar lookup="table">aero/beta-deg</independentVar>
            <tableData breakPoint="0.0">
 	-3.0	3.0
-5.0	2.1187E-10	-2.1444E-10
0.0	2.6103E-10	-2.5377E-10
2.0	2.8195E-10	-2.6941E-10
4.0	3.0712E-10	-2.874E-10
6.0	4.1355E-10	-3.7908E-10
10.0	1.0131E-9	-1.0934E-9
12.5	8.8551E-10	-9.8638E-10
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</tableData>
            <tableData breakPoint="10.0">
 	-3.0	3.0
-5.0	-3.9716E-4	4.009E-4
0.0	-3.3528E-4	3.5937E-4
2.0	-3.038E-4	3.4344E-4
4.0	-3.0784E-4	3.8642E-4
6.0	-0.0011586	0.0015634
10.0	0.0012727	-0.0013567
12.5	0.0012778	-0.0013574
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</tableData>
         </table>
      </function>
      <function name="aero/function/flap_inner_roll_coeff_basic_Reynolds3_Mach_2">
         <description>roll_coefficient as function of flap_inner_deflection, alpha, beta, fixed Reynolds = 26246.72fixed Mach = 0.78</description>
         <table>
            <independentVar lookup="row">aero/alpha-deg</independentVar>
            <independentVar lookup="column">fcs/flap-pos-deg</independentVar>
            <independentVar lookup="table">aero/beta-deg</independentVar>
            <tableData breakPoint="0.0">
 	-3.0	3.0
-5.0	2.1187E-10	-2.1444E-10
0.0	2.6103E-10	-2.5377E-10
2.0	2.8195E-10	-2.6941E-10
4.0	3.0712E-10	-2.874E-10
6.0	4.1355E-10	-3.7908E-10
10.0	1.0131E-9	-1.0934E-9
12.5	8.8551E-10	-9.8638E-10
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</tableData>
            <tableData breakPoint="10.0">
 	-3.0	3.0
-5.0	-3.9716E-4	4.009E-4
0.0	-3.3528E-4	3.5937E-4
2.0	-3.038E-4	3.4344E-4
4.0	-3.0784E-4	3.8642E-4
6.0	-0.0011586	0.0015634
10.0	0.0012727	-0.0013567
12.5	0.0012778	-0.0013574
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</tableData>
         </table>
      </function>
      <function name="aero/function/flap_inner_roll_coeff_basic_Reynolds0_Mach_3">
         <description>roll_coefficient as function of flap_inner_deflection, alpha, beta, fixed Reynolds = 0.0fixed Mach = 0.8</description>
         <table>
            <independentVar lookup="row">aero/alpha-deg</independentVar>
            <independentVar lookup="column">fcs/flap-pos-deg</independentVar>
            <independentVar lookup="table">aero/beta-deg</independentVar>
            <tableData breakPoint="0.0">
 	-3.0	3.0
-5.0	2.2097E-10	-2.2365E-10
0.0	2.7225E-10	-2.6468E-10
2.0	2.9407E-10	-2.8099E-10
4.0	3.2032E-10	-2.9975E-10
6.0	4.3132E-10	-3.9537E-10
10.0	1.0566E-9	-1.1404E-9
12.5	9.2355E-10	-1.0288E-9
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</tableData>
            <tableData breakPoint="10.0">
 	-3.0	3.0
-5.0	-4.1422E-4	4.1813E-4
0.0	-3.4968E-4	3.7481E-4
2.0	-3.1685E-4	3.582E-4
4.0	-3.2106E-4	4.0302E-4
6.0	-0.0012083	0.0016306
10.0	0.0013273	-0.001415
12.5	0.0013327	-0.0014158
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</tableData>
         </table>
      </function>
      <function name="aero/function/flap_inner_roll_coeff_basic_Reynolds1_Mach_3">
         <description>roll_coefficient as function of flap_inner_deflection, alpha, beta, fixed Reynolds = 6561.68fixed Mach = 0.8</description>
         <table>
            <independentVar lookup="row">aero/alpha-deg</independentVar>
            <independentVar lookup="column">fcs/flap-pos-deg</independentVar>
            <independentVar lookup="table">aero/beta-deg</independentVar>
            <tableData breakPoint="0.0">
 	-3.0	3.0
-5.0	2.2097E-10	-2.2365E-10
0.0	2.7225E-10	-2.6468E-10
2.0	2.9407E-10	-2.8099E-10
4.0	3.2032E-10	-2.9975E-10
6.0	4.3132E-10	-3.9537E-10
10.0	1.0566E-9	-1.1404E-9
12.5	9.2355E-10	-1.0288E-9
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</tableData>
            <tableData breakPoint="10.0">
 	-3.0	3.0
-5.0	-4.1422E-4	4.1813E-4
0.0	-3.4968E-4	3.7481E-4
2.0	-3.1685E-4	3.582E-4
4.0	-3.2106E-4	4.0302E-4
6.0	-0.0012083	0.0016306
10.0	0.0013273	-0.001415
12.5	0.0013327	-0.0014158
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</tableData>
         </table>
      </function>
      <function name="aero/function/flap_inner_roll_coeff_basic_Reynolds2_Mach_3">
         <description>roll_coefficient as function of flap_inner_deflection, alpha, beta, fixed Reynolds = 16404.2fixed Mach = 0.8</description>
         <table>
            <independentVar lookup="row">aero/alpha-deg</independentVar>
            <independentVar lookup="column">fcs/flap-pos-deg</independentVar>
            <independentVar lookup="table">aero/beta-deg</independentVar>
            <tableData breakPoint="0.0">
 	-3.0	3.0
-5.0	2.2097E-10	-2.2365E-10
0.0	2.7225E-10	-2.6468E-10
2.0	2.9407E-10	-2.8099E-10
4.0	3.2032E-10	-2.9975E-10
6.0	4.3132E-10	-3.9537E-10
10.0	1.0566E-9	-1.1404E-9
12.5	9.2355E-10	-1.0288E-9
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</tableData>
            <tableData breakPoint="10.0">
 	-3.0	3.0
-5.0	-4.1422E-4	4.1813E-4
0.0	-3.4968E-4	3.7481E-4
2.0	-3.1685E-4	3.582E-4
4.0	-3.2106E-4	4.0302E-4
6.0	-0.0012083	0.0016306
10.0	0.0013273	-0.001415
12.5	0.0013327	-0.0014158
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</tableData>
         </table>
      </function>
      <function name="aero/function/flap_inner_roll_coeff_basic_Reynolds3_Mach_3">
         <description>roll_coefficient as function of flap_inner_deflection, alpha, beta, fixed Reynolds = 26246.72fixed Mach = 0.8</description>
         <table>
            <independentVar lookup="row">aero/alpha-deg</independentVar>
            <independentVar lookup="column">fcs/flap-pos-deg</independentVar>
            <independentVar lookup="table">aero/beta-deg</independentVar>
            <tableData breakPoint="0.0">
 	-3.0	3.0
-5.0	2.2097E-10	-2.2365E-10
0.0	2.7225E-10	-2.6468E-10
2.0	2.9407E-10	-2.8099E-10
4.0	3.2032E-10	-2.9975E-10
6.0	4.3132E-10	-3.9537E-10
10.0	1.0566E-9	-1.1404E-9
12.5	9.2355E-10	-1.0288E-9
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</tableData>
            <tableData breakPoint="10.0">
 	-3.0	3.0
-5.0	-4.1422E-4	4.1813E-4
0.0	-3.4968E-4	3.7481E-4
2.0	-3.1685E-4	3.582E-4
4.0	-3.2106E-4	4.0302E-4
6.0	-0.0012083	0.0016306
10.0	0.0013273	-0.001415
12.5	0.0013327	-0.0014158
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</tableData>
         </table>
      </function>
      <function name="aero/function/flap_inner_roll_coeff_basic_deflection_Mach_0">
         <description>roll_coefficient as function of flap_inner_deflection, alpha, beta, Reynolds, fixed Mach = 0.2</description>
         <interpolate1d>
            <p>position/h-sl-ft</p>
            <v>0.000000</v>
            <p>aero/function/flap_inner_roll_coeff_basic_Reynolds0_Mach_0</p>
            <v>6561.6800</v>
            <p>aero/function/flap_inner_roll_coeff_basic_Reynolds1_Mach_0</p>
            <v>16404.2000</v>
            <p>aero/function/flap_inner_roll_coeff_basic_Reynolds2_Mach_0</p>
            <v>26246.7200</v>
            <p>aero/function/flap_inner_roll_coeff_basic_Reynolds3_Mach_0</p>
         </interpolate1d>
      </function>
      <function name="aero/function/flap_inner_roll_coeff_basic_deflection_Mach_1">
         <description>roll_coefficient as function of flap_inner_deflection, alpha, beta, Reynolds, fixed Mach = 0.6</description>
         <interpolate1d>
            <p>position/h-sl-ft</p>
            <v>0.000000</v>
            <p>aero/function/flap_inner_roll_coeff_basic_Reynolds0_Mach_1</p>
            <v>6561.6800</v>
            <p>aero/function/flap_inner_roll_coeff_basic_Reynolds1_Mach_1</p>
            <v>16404.2000</v>
            <p>aero/function/flap_inner_roll_coeff_basic_Reynolds2_Mach_1</p>
            <v>26246.7200</v>
            <p>aero/function/flap_inner_roll_coeff_basic_Reynolds3_Mach_1</p>
         </interpolate1d>
      </function>
      <function name="aero/function/flap_inner_roll_coeff_basic_deflection_Mach_2">
         <description>roll_coefficient as function of flap_inner_deflection, alpha, beta, Reynolds, fixed Mach = 0.78</description>
         <interpolate1d>
            <p>position/h-sl-ft</p>
            <v>0.000000</v>
            <p>aero/function/flap_inner_roll_coeff_basic_Reynolds0_Mach_2</p>
            <v>6561.6800</v>
            <p>aero/function/flap_inner_roll_coeff_basic_Reynolds1_Mach_2</p>
            <v>16404.2000</v>
            <p>aero/function/flap_inner_roll_coeff_basic_Reynolds2_Mach_2</p>
            <v>26246.7200</v>
            <p>aero/function/flap_inner_roll_coeff_basic_Reynolds3_Mach_2</p>
         </interpolate1d>
      </function>
      <function name="aero/function/flap_inner_roll_coeff_basic_deflection_Mach_3">
         <description>roll_coefficient as function of flap_inner_deflection, alpha, beta, Reynolds, fixed Mach = 0.8</description>
         <interpolate1d>
            <p>position/h-sl-ft</p>
            <v>0.000000</v>
            <p>aero/function/flap_inner_roll_coeff_basic_Reynolds0_Mach_3</p>
            <v>6561.6800</v>
            <p>aero/function/flap_inner_roll_coeff_basic_Reynolds1_Mach_3</p>
            <v>16404.2000</v>
            <p>aero/function/flap_inner_roll_coeff_basic_Reynolds2_Mach_3</p>
            <v>26246.7200</v>
            <p>aero/function/flap_inner_roll_coeff_basic_Reynolds3_Mach_3</p>
         </interpolate1d>
      </function>
      <function name="aero/function/flap_inner_roll_coeff_basic_Mach">
         <description>roll_coefficient as function of flap_inner_deflection, alpha, beta, Reynolds, Mach </description>
         <interpolate1d>
            <p>velocities/mach</p>
            <v>0.2000</v>
            <p>aero/function/flap_inner_roll_coeff_basic_deflection_Mach_0</p>
            <v>0.6000</v>
            <p>aero/function/flap_inner_roll_coeff_basic_deflection_Mach_1</p>
            <v>0.7800</v>
            <p>aero/function/flap_inner_roll_coeff_basic_deflection_Mach_2</p>
            <v>0.8000</v>
            <p>aero/function/flap_inner_roll_coeff_basic_deflection_Mach_3</p>
         </interpolate1d>
      </function>
      <function name="aero/function/flap_inner_pitch_coeff_basic_Reynolds0_Mach_0">
         <description>pitch_coefficient as function of flap_inner_deflection, alpha, beta, fixed Reynolds = 0.0fixed Mach = 0.2</description>
         <table>
            <independentVar lookup="row">aero/alpha-deg</independentVar>
            <independentVar lookup="column">fcs/flap-pos-deg</independentVar>
            <independentVar lookup="table">aero/beta-deg</independentVar>
            <tableData breakPoint="0.0">
 	-3.0	3.0
-5.0	-0.015519	0.015261
0.0	-0.022166	0.020419
2.0	-0.025205	0.022416
4.0	-0.029164	0.024874
6.0	-0.036033	0.029905
10.0	-0.052281	0.050805
12.5	-0.037134	0.036255
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</tableData>
            <tableData breakPoint="10.0">
 	-3.0	3.0
-5.0	-0.010916	0.010883
0.0	-0.015045	0.014739
2.0	-0.017313	0.01673
4.0	-0.018369	0.016796
6.0	0.041926	-0.036586
10.0	-0.040087	0.033226
12.5	-0.035034	0.028189
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</tableData>
         </table>
      </function>
      <function name="aero/function/flap_inner_pitch_coeff_basic_Reynolds1_Mach_0">
         <description>pitch_coefficient as function of flap_inner_deflection, alpha, beta, fixed Reynolds = 6561.68fixed Mach = 0.2</description>
         <table>
            <independentVar lookup="row">aero/alpha-deg</independentVar>
            <independentVar lookup="column">fcs/flap-pos-deg</independentVar>
            <independentVar lookup="table">aero/beta-deg</independentVar>
            <tableData breakPoint="0.0">
 	-3.0	3.0
-5.0	-0.015519	0.015261
0.0	-0.022166	0.020419
2.0	-0.025205	0.022416
4.0	-0.029164	0.024874
6.0	-0.036033	0.029905
10.0	-0.052281	0.050805
12.5	-0.037134	0.036255
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</tableData>
            <tableData breakPoint="10.0">
 	-3.0	3.0
-5.0	-0.010916	0.010883
0.0	-0.015045	0.014739
2.0	-0.017313	0.01673
4.0	-0.018369	0.016796
6.0	0.041926	-0.036586
10.0	-0.040087	0.033226
12.5	-0.035034	0.028189
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</tableData>
         </table>
      </function>
      <function name="aero/function/flap_inner_pitch_coeff_basic_Reynolds2_Mach_0">
         <description>pitch_coefficient as function of flap_inner_deflection, alpha, beta, fixed Reynolds = 16404.2fixed Mach = 0.2</description>
         <table>
            <independentVar lookup="row">aero/alpha-deg</independentVar>
            <independentVar lookup="column">fcs/flap-pos-deg</independentVar>
            <independentVar lookup="table">aero/beta-deg</independentVar>
            <tableData breakPoint="0.0">
 	-3.0	3.0
-5.0	-0.015519	0.015261
0.0	-0.022166	0.020419
2.0	-0.025205	0.022416
4.0	-0.029164	0.024874
6.0	-0.036033	0.029905
10.0	-0.052281	0.050805
12.5	-0.037134	0.036255
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</tableData>
            <tableData breakPoint="10.0">
 	-3.0	3.0
-5.0	-0.010916	0.010883
0.0	-0.015045	0.014739
2.0	-0.017313	0.01673
4.0	-0.018369	0.016796
6.0	0.041926	-0.036586
10.0	-0.040087	0.033226
12.5	-0.035034	0.028189
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</tableData>
         </table>
      </function>
      <function name="aero/function/flap_inner_pitch_coeff_basic_Reynolds3_Mach_0">
         <description>pitch_coefficient as function of flap_inner_deflection, alpha, beta, fixed Reynolds = 26246.72fixed Mach = 0.2</description>
         <table>
            <independentVar lookup="row">aero/alpha-deg</independentVar>
            <independentVar lookup="column">fcs/flap-pos-deg</independentVar>
            <independentVar lookup="table">aero/beta-deg</independentVar>
            <tableData breakPoint="0.0">
 	-3.0	3.0
-5.0	-0.015519	0.015261
0.0	-0.022166	0.020419
2.0	-0.025205	0.022416
4.0	-0.029164	0.024874
6.0	-0.036033	0.029905
10.0	-0.052281	0.050805
12.5	-0.037134	0.036255
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</tableData>
            <tableData breakPoint="10.0">
 	-3.0	3.0
-5.0	-0.010916	0.010883
0.0	-0.015045	0.014739
2.0	-0.017313	0.01673
4.0	-0.018369	0.016796
6.0	0.041926	-0.036586
10.0	-0.040087	0.033226
12.5	-0.035034	0.028189
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</tableData>
         </table>
      </function>
      <function name="aero/function/flap_inner_pitch_coeff_basic_Reynolds0_Mach_1">
         <description>pitch_coefficient as function of flap_inner_deflection, alpha, beta, fixed Reynolds = 0.0fixed Mach = 0.6</description>
         <table>
            <independentVar lookup="row">aero/alpha-deg</independentVar>
            <independentVar lookup="column">fcs/flap-pos-deg</independentVar>
            <independentVar lookup="table">aero/beta-deg</independentVar>
            <tableData breakPoint="0.0">
 	-3.0	3.0
-5.0	-0.019007	0.018691
0.0	-0.027148	0.025008
2.0	-0.030869	0.027453
4.0	-0.035718	0.030464
6.0	-0.044131	0.036626
10.0	-0.064031	0.062223
12.5	-0.045479	0.044403
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</tableData>
            <tableData breakPoint="10.0">
 	-3.0	3.0
-5.0	-0.013369	0.013329
0.0	-0.018426	0.018051
2.0	-0.021204	0.02049
4.0	-0.022497	0.020571
6.0	0.051349	-0.044809
10.0	-0.049097	0.040693
12.5	-0.042908	0.034524
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</tableData>
         </table>
      </function>
      <function name="aero/function/flap_inner_pitch_coeff_basic_Reynolds1_Mach_1">
         <description>pitch_coefficient as function of flap_inner_deflection, alpha, beta, fixed Reynolds = 6561.68fixed Mach = 0.6</description>
         <table>
            <independentVar lookup="row">aero/alpha-deg</independentVar>
            <independentVar lookup="column">fcs/flap-pos-deg</independentVar>
            <independentVar lookup="table">aero/beta-deg</independentVar>
            <tableData breakPoint="0.0">
 	-3.0	3.0
-5.0	-0.019007	0.018691
0.0	-0.027148	0.025008
2.0	-0.030869	0.027453
4.0	-0.035718	0.030464
6.0	-0.044131	0.036626
10.0	-0.064031	0.062223
12.5	-0.045479	0.044403
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</tableData>
            <tableData breakPoint="10.0">
 	-3.0	3.0
-5.0	-0.013369	0.013329
0.0	-0.018426	0.018051
2.0	-0.021204	0.02049
4.0	-0.022497	0.020571
6.0	0.051349	-0.044809
10.0	-0.049097	0.040693
12.5	-0.042908	0.034524
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</tableData>
         </table>
      </function>
      <function name="aero/function/flap_inner_pitch_coeff_basic_Reynolds2_Mach_1">
         <description>pitch_coefficient as function of flap_inner_deflection, alpha, beta, fixed Reynolds = 16404.2fixed Mach = 0.6</description>
         <table>
            <independentVar lookup="row">aero/alpha-deg</independentVar>
            <independentVar lookup="column">fcs/flap-pos-deg</independentVar>
            <independentVar lookup="table">aero/beta-deg</independentVar>
            <tableData breakPoint="0.0">
 	-3.0	3.0
-5.0	-0.019007	0.018691
0.0	-0.027148	0.025008
2.0	-0.030869	0.027453
4.0	-0.035718	0.030464
6.0	-0.044131	0.036626
10.0	-0.064031	0.062223
12.5	-0.045479	0.044403
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</tableData>
            <tableData breakPoint="10.0">
 	-3.0	3.0
-5.0	-0.013369	0.013329
0.0	-0.018426	0.018051
2.0	-0.021204	0.02049
4.0	-0.022497	0.020571
6.0	0.051349	-0.044809
10.0	-0.049097	0.040693
12.5	-0.042908	0.034524
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</tableData>
         </table>
      </function>
      <function name="aero/function/flap_inner_pitch_coeff_basic_Reynolds3_Mach_1">
         <description>pitch_coefficient as function of flap_inner_deflection, alpha, beta, fixed Reynolds = 26246.72fixed Mach = 0.6</description>
         <table>
            <independentVar lookup="row">aero/alpha-deg</independentVar>
            <independentVar lookup="column">fcs/flap-pos-deg</independentVar>
            <independentVar lookup="table">aero/beta-deg</independentVar>
            <tableData breakPoint="0.0">
 	-3.0	3.0
-5.0	-0.019007	0.018691
0.0	-0.027148	0.025008
2.0	-0.030869	0.027453
4.0	-0.035718	0.030464
6.0	-0.044131	0.036626
10.0	-0.064031	0.062223
12.5	-0.045479	0.044403
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</tableData>
            <tableData breakPoint="10.0">
 	-3.0	3.0
-5.0	-0.013369	0.013329
0.0	-0.018426	0.018051
2.0	-0.021204	0.02049
4.0	-0.022497	0.020571
6.0	0.051349	-0.044809
10.0	-0.049097	0.040693
12.5	-0.042908	0.034524
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</tableData>
         </table>
      </function>
      <function name="aero/function/flap_inner_pitch_coeff_basic_Reynolds0_Mach_2">
         <description>pitch_coefficient as function of flap_inner_deflection, alpha, beta, fixed Reynolds = 0.0fixed Mach = 0.78</description>
         <table>
            <independentVar lookup="row">aero/alpha-deg</independentVar>
            <independentVar lookup="column">fcs/flap-pos-deg</independentVar>
            <independentVar lookup="table">aero/beta-deg</independentVar>
            <tableData breakPoint="0.0">
 	-3.0	3.0
-5.0	-0.024299	0.023894
0.0	-0.034706	0.031971
2.0	-0.039463	0.035097
4.0	-0.045663	0.038945
6.0	-0.056418	0.046823
10.0	-0.081858	0.079546
12.5	-0.058141	0.056765
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</tableData>
            <tableData breakPoint="10.0">
 	-3.0	3.0
-5.0	-0.017091	0.01704
0.0	-0.023557	0.023076
2.0	-0.027107	0.026194
4.0	-0.028761	0.026298
6.0	0.065645	-0.057284
10.0	-0.062765	0.052023
12.5	-0.054854	0.044136
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</tableData>
         </table>
      </function>
      <function name="aero/function/flap_inner_pitch_coeff_basic_Reynolds1_Mach_2">
         <description>pitch_coefficient as function of flap_inner_deflection, alpha, beta, fixed Reynolds = 6561.68fixed Mach = 0.78</description>
         <table>
            <independentVar lookup="row">aero/alpha-deg</independentVar>
            <independentVar lookup="column">fcs/flap-pos-deg</independentVar>
            <independentVar lookup="table">aero/beta-deg</independentVar>
            <tableData breakPoint="0.0">
 	-3.0	3.0
-5.0	-0.024299	0.023894
0.0	-0.034706	0.031971
2.0	-0.039463	0.035097
4.0	-0.045663	0.038945
6.0	-0.056418	0.046823
10.0	-0.081858	0.079546
12.5	-0.058141	0.056765
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</tableData>
            <tableData breakPoint="10.0">
 	-3.0	3.0
-5.0	-0.017091	0.01704
0.0	-0.023557	0.023076
2.0	-0.027107	0.026194
4.0	-0.028761	0.026298
6.0	0.065645	-0.057284
10.0	-0.062765	0.052023
12.5	-0.054854	0.044136
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</tableData>
         </table>
      </function>
      <function name="aero/function/flap_inner_pitch_coeff_basic_Reynolds2_Mach_2">
         <description>pitch_coefficient as function of flap_inner_deflection, alpha, beta, fixed Reynolds = 16404.2fixed Mach = 0.78</description>
         <table>
            <independentVar lookup="row">aero/alpha-deg</independentVar>
            <independentVar lookup="column">fcs/flap-pos-deg</independentVar>
            <independentVar lookup="table">aero/beta-deg</independentVar>
            <tableData breakPoint="0.0">
 	-3.0	3.0
-5.0	-0.024299	0.023894
0.0	-0.034706	0.031971
2.0	-0.039463	0.035097
4.0	-0.045663	0.038945
6.0	-0.056418	0.046823
10.0	-0.081858	0.079546
12.5	-0.058141	0.056765
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</tableData>
            <tableData breakPoint="10.0">
 	-3.0	3.0
-5.0	-0.017091	0.01704
0.0	-0.023557	0.023076
2.0	-0.027107	0.026194
4.0	-0.028761	0.026298
6.0	0.065645	-0.057284
10.0	-0.062765	0.052023
12.5	-0.054854	0.044136
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</tableData>
         </table>
      </function>
      <function name="aero/function/flap_inner_pitch_coeff_basic_Reynolds3_Mach_2">
         <description>pitch_coefficient as function of flap_inner_deflection, alpha, beta, fixed Reynolds = 26246.72fixed Mach = 0.78</description>
         <table>
            <independentVar lookup="row">aero/alpha-deg</independentVar>
            <independentVar lookup="column">fcs/flap-pos-deg</independentVar>
            <independentVar lookup="table">aero/beta-deg</independentVar>
            <tableData breakPoint="0.0">
 	-3.0	3.0
-5.0	-0.024299	0.023894
0.0	-0.034706	0.031971
2.0	-0.039463	0.035097
4.0	-0.045663	0.038945
6.0	-0.056418	0.046823
10.0	-0.081858	0.079546
12.5	-0.058141	0.056765
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</tableData>
            <tableData breakPoint="10.0">
 	-3.0	3.0
-5.0	-0.017091	0.01704
0.0	-0.023557	0.023076
2.0	-0.027107	0.026194
4.0	-0.028761	0.026298
6.0	0.065645	-0.057284
10.0	-0.062765	0.052023
12.5	-0.054854	0.044136
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</tableData>
         </table>
      </function>
      <function name="aero/function/flap_inner_pitch_coeff_basic_Reynolds0_Mach_3">
         <description>pitch_coefficient as function of flap_inner_deflection, alpha, beta, fixed Reynolds = 0.0fixed Mach = 0.8</description>
         <table>
            <independentVar lookup="row">aero/alpha-deg</independentVar>
            <independentVar lookup="column">fcs/flap-pos-deg</independentVar>
            <independentVar lookup="table">aero/beta-deg</independentVar>
            <tableData breakPoint="0.0">
 	-3.0	3.0
-5.0	-0.025343	0.024921
0.0	-0.036197	0.033344
2.0	-0.041159	0.036604
4.0	-0.047625	0.040618
6.0	-0.058842	0.048835
10.0	-0.085375	0.082964
12.5	-0.060639	0.059204
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</tableData>
            <tableData breakPoint="10.0">
 	-3.0	3.0
-5.0	-0.017826	0.017772
0.0	-0.024569	0.024068
2.0	-0.028272	0.027319
4.0	-0.029996	0.027428
6.0	0.068465	-0.059745
10.0	-0.065462	0.054258
12.5	-0.057211	0.046032
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</tableData>
         </table>
      </function>
      <function name="aero/function/flap_inner_pitch_coeff_basic_Reynolds1_Mach_3">
         <description>pitch_coefficient as function of flap_inner_deflection, alpha, beta, fixed Reynolds = 6561.68fixed Mach = 0.8</description>
         <table>
            <independentVar lookup="row">aero/alpha-deg</independentVar>
            <independentVar lookup="column">fcs/flap-pos-deg</independentVar>
            <independentVar lookup="table">aero/beta-deg</independentVar>
            <tableData breakPoint="0.0">
 	-3.0	3.0
-5.0	-0.025343	0.024921
0.0	-0.036197	0.033344
2.0	-0.041159	0.036604
4.0	-0.047625	0.040618
6.0	-0.058842	0.048835
10.0	-0.085375	0.082964
12.5	-0.060639	0.059204
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</tableData>
            <tableData breakPoint="10.0">
 	-3.0	3.0
-5.0	-0.017826	0.017772
0.0	-0.024569	0.024068
2.0	-0.028272	0.027319
4.0	-0.029996	0.027428
6.0	0.068465	-0.059745
10.0	-0.065462	0.054258
12.5	-0.057211	0.046032
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</tableData>
         </table>
      </function>
      <function name="aero/function/flap_inner_pitch_coeff_basic_Reynolds2_Mach_3">
         <description>pitch_coefficient as function of flap_inner_deflection, alpha, beta, fixed Reynolds = 16404.2fixed Mach = 0.8</description>
         <table>
            <independentVar lookup="row">aero/alpha-deg</independentVar>
            <independentVar lookup="column">fcs/flap-pos-deg</independentVar>
            <independentVar lookup="table">aero/beta-deg</independentVar>
            <tableData breakPoint="0.0">
 	-3.0	3.0
-5.0	-0.025343	0.024921
0.0	-0.036197	0.033344
2.0	-0.041159	0.036604
4.0	-0.047625	0.040618
6.0	-0.058842	0.048835
10.0	-0.085375	0.082964
12.5	-0.060639	0.059204
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</tableData>
            <tableData breakPoint="10.0">
 	-3.0	3.0
-5.0	-0.017826	0.017772
0.0	-0.024569	0.024068
2.0	-0.028272	0.027319
4.0	-0.029996	0.027428
6.0	0.068465	-0.059745
10.0	-0.065462	0.054258
12.5	-0.057211	0.046032
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</tableData>
         </table>
      </function>
      <function name="aero/function/flap_inner_pitch_coeff_basic_Reynolds3_Mach_3">
         <description>pitch_coefficient as function of flap_inner_deflection, alpha, beta, fixed Reynolds = 26246.72fixed Mach = 0.8</description>
         <table>
            <independentVar lookup="row">aero/alpha-deg</independentVar>
            <independentVar lookup="column">fcs/flap-pos-deg</independentVar>
            <independentVar lookup="table">aero/beta-deg</independentVar>
            <tableData breakPoint="0.0">
 	-3.0	3.0
-5.0	-0.025343	0.024921
0.0	-0.036197	0.033344
2.0	-0.041159	0.036604
4.0	-0.047625	0.040618
6.0	-0.058842	0.048835
10.0	-0.085375	0.082964
12.5	-0.060639	0.059204
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</tableData>
            <tableData breakPoint="10.0">
 	-3.0	3.0
-5.0	-0.017826	0.017772
0.0	-0.024569	0.024068
2.0	-0.028272	0.027319
4.0	-0.029996	0.027428
6.0	0.068465	-0.059745
10.0	-0.065462	0.054258
12.5	-0.057211	0.046032
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</tableData>
         </table>
      </function>
      <function name="aero/function/flap_inner_pitch_coeff_basic_deflection_Mach_0">
         <description>pitch_coefficient as function of flap_inner_deflection, alpha, beta, Reynolds, fixed Mach = 0.2</description>
         <interpolate1d>
            <p>position/h-sl-ft</p>
            <v>0.000000</v>
            <p>aero/function/flap_inner_pitch_coeff_basic_Reynolds0_Mach_0</p>
            <v>6561.6800</v>
            <p>aero/function/flap_inner_pitch_coeff_basic_Reynolds1_Mach_0</p>
            <v>16404.2000</v>
            <p>aero/function/flap_inner_pitch_coeff_basic_Reynolds2_Mach_0</p>
            <v>26246.7200</v>
            <p>aero/function/flap_inner_pitch_coeff_basic_Reynolds3_Mach_0</p>
         </interpolate1d>
      </function>
      <function name="aero/function/flap_inner_pitch_coeff_basic_deflection_Mach_1">
         <description>pitch_coefficient as function of flap_inner_deflection, alpha, beta, Reynolds, fixed Mach = 0.6</description>
         <interpolate1d>
            <p>position/h-sl-ft</p>
            <v>0.000000</v>
            <p>aero/function/flap_inner_pitch_coeff_basic_Reynolds0_Mach_1</p>
            <v>6561.6800</v>
            <p>aero/function/flap_inner_pitch_coeff_basic_Reynolds1_Mach_1</p>
            <v>16404.2000</v>
            <p>aero/function/flap_inner_pitch_coeff_basic_Reynolds2_Mach_1</p>
            <v>26246.7200</v>
            <p>aero/function/flap_inner_pitch_coeff_basic_Reynolds3_Mach_1</p>
         </interpolate1d>
      </function>
      <function name="aero/function/flap_inner_pitch_coeff_basic_deflection_Mach_2">
         <description>pitch_coefficient as function of flap_inner_deflection, alpha, beta, Reynolds, fixed Mach = 0.78</description>
         <interpolate1d>
            <p>position/h-sl-ft</p>
            <v>0.000000</v>
            <p>aero/function/flap_inner_pitch_coeff_basic_Reynolds0_Mach_2</p>
            <v>6561.6800</v>
            <p>aero/function/flap_inner_pitch_coeff_basic_Reynolds1_Mach_2</p>
            <v>16404.2000</v>
            <p>aero/function/flap_inner_pitch_coeff_basic_Reynolds2_Mach_2</p>
            <v>26246.7200</v>
            <p>aero/function/flap_inner_pitch_coeff_basic_Reynolds3_Mach_2</p>
         </interpolate1d>
      </function>
      <function name="aero/function/flap_inner_pitch_coeff_basic_deflection_Mach_3">
         <description>pitch_coefficient as function of flap_inner_deflection, alpha, beta, Reynolds, fixed Mach = 0.8</description>
         <interpolate1d>
            <p>position/h-sl-ft</p>
            <v>0.000000</v>
            <p>aero/function/flap_inner_pitch_coeff_basic_Reynolds0_Mach_3</p>
            <v>6561.6800</v>
            <p>aero/function/flap_inner_pitch_coeff_basic_Reynolds1_Mach_3</p>
            <v>16404.2000</v>
            <p>aero/function/flap_inner_pitch_coeff_basic_Reynolds2_Mach_3</p>
            <v>26246.7200</v>
            <p>aero/function/flap_inner_pitch_coeff_basic_Reynolds3_Mach_3</p>
         </interpolate1d>
      </function>
      <function name="aero/function/flap_inner_pitch_coeff_basic_Mach">
         <description>pitch_coefficient as function of flap_inner_deflection, alpha, beta, Reynolds, Mach </description>
         <interpolate1d>
            <p>velocities/mach</p>
            <v>0.2000</v>
            <p>aero/function/flap_inner_pitch_coeff_basic_deflection_Mach_0</p>
            <v>0.6000</v>
            <p>aero/function/flap_inner_pitch_coeff_basic_deflection_Mach_1</p>
            <v>0.7800</v>
            <p>aero/function/flap_inner_pitch_coeff_basic_deflection_Mach_2</p>
            <v>0.8000</v>
            <p>aero/function/flap_inner_pitch_coeff_basic_deflection_Mach_3</p>
         </interpolate1d>
      </function>
      <function name="aero/function/flap_inner_yaw_coeff_basic_Reynolds0_Mach_0">
         <description>yaw_coefficient as function of flap_inner_deflection, alpha, beta, fixed Reynolds = 0.0fixed Mach = 0.2</description>
         <table>
            <independentVar lookup="row">aero/alpha-deg</independentVar>
            <independentVar lookup="column">fcs/flap-pos-deg</independentVar>
            <independentVar lookup="table">aero/beta-deg</independentVar>
            <tableData breakPoint="0.0">
 	-3.0	3.0
-5.0	3.5696E-11	-2.7767E-11
0.0	3.9058E-11	-1.6365E-11
2.0	5.6123E-11	-2.6757E-11
4.0	1.2227E-10	-9.0854E-11
6.0	2.1724E-11	-3.757E-11
10.0	-2.225E-9	2.5314E-9
12.5	-2.0245E-9	2.6322E-9
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</tableData>
            <tableData breakPoint="10.0">
 	-3.0	3.0
-5.0	6.8863E-5	-1.0995E-4
0.0	2.1511E-4	-2.3661E-4
2.0	2.9694E-4	-2.9929E-4
4.0	3.629E-4	-3.3067E-4
6.0	9.1128E-4	-3.0409E-4
10.0	-8.2923E-4	-3.7821E-5
12.5	-0.0035827	0.0036323
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</tableData>
         </table>
      </function>
      <function name="aero/function/flap_inner_yaw_coeff_basic_Reynolds1_Mach_0">
         <description>yaw_coefficient as function of flap_inner_deflection, alpha, beta, fixed Reynolds = 6561.68fixed Mach = 0.2</description>
         <table>
            <independentVar lookup="row">aero/alpha-deg</independentVar>
            <independentVar lookup="column">fcs/flap-pos-deg</independentVar>
            <independentVar lookup="table">aero/beta-deg</independentVar>
            <tableData breakPoint="0.0">
 	-3.0	3.0
-5.0	3.5696E-11	-2.7767E-11
0.0	3.9058E-11	-1.6365E-11
2.0	5.6123E-11	-2.6757E-11
4.0	1.2227E-10	-9.0854E-11
6.0	2.1724E-11	-3.757E-11
10.0	-2.225E-9	2.5314E-9
12.5	-2.0245E-9	2.6322E-9
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</tableData>
            <tableData breakPoint="10.0">
 	-3.0	3.0
-5.0	6.8863E-5	-1.0995E-4
0.0	2.1511E-4	-2.3661E-4
2.0	2.9694E-4	-2.9929E-4
4.0	3.629E-4	-3.3067E-4
6.0	9.1128E-4	-3.0409E-4
10.0	-8.2923E-4	-3.7821E-5
12.5	-0.0035827	0.0036323
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</tableData>
         </table>
      </function>
      <function name="aero/function/flap_inner_yaw_coeff_basic_Reynolds2_Mach_0">
         <description>yaw_coefficient as function of flap_inner_deflection, alpha, beta, fixed Reynolds = 16404.2fixed Mach = 0.2</description>
         <table>
            <independentVar lookup="row">aero/alpha-deg</independentVar>
            <independentVar lookup="column">fcs/flap-pos-deg</independentVar>
            <independentVar lookup="table">aero/beta-deg</independentVar>
            <tableData breakPoint="0.0">
 	-3.0	3.0
-5.0	3.5696E-11	-2.7767E-11
0.0	3.9058E-11	-1.6365E-11
2.0	5.6123E-11	-2.6757E-11
4.0	1.2227E-10	-9.0854E-11
6.0	2.1724E-11	-3.757E-11
10.0	-2.225E-9	2.5314E-9
12.5	-2.0245E-9	2.6322E-9
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</tableData>
            <tableData breakPoint="10.0">
 	-3.0	3.0
-5.0	6.8863E-5	-1.0995E-4
0.0	2.1511E-4	-2.3661E-4
2.0	2.9694E-4	-2.9929E-4
4.0	3.629E-4	-3.3067E-4
6.0	9.1128E-4	-3.0409E-4
10.0	-8.2923E-4	-3.7821E-5
12.5	-0.0035827	0.0036323
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</tableData>
         </table>
      </function>
      <function name="aero/function/flap_inner_yaw_coeff_basic_Reynolds3_Mach_0">
         <description>yaw_coefficient as function of flap_inner_deflection, alpha, beta, fixed Reynolds = 26246.72fixed Mach = 0.2</description>
         <table>
            <independentVar lookup="row">aero/alpha-deg</independentVar>
            <independentVar lookup="column">fcs/flap-pos-deg</independentVar>
            <independentVar lookup="table">aero/beta-deg</independentVar>
            <tableData breakPoint="0.0">
 	-3.0	3.0
-5.0	3.5696E-11	-2.7767E-11
0.0	3.9058E-11	-1.6365E-11
2.0	5.6123E-11	-2.6757E-11
4.0	1.2227E-10	-9.0854E-11
6.0	2.1724E-11	-3.757E-11
10.0	-2.225E-9	2.5314E-9
12.5	-2.0245E-9	2.6322E-9
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</tableData>
            <tableData breakPoint="10.0">
 	-3.0	3.0
-5.0	6.8863E-5	-1.0995E-4
0.0	2.1511E-4	-2.3661E-4
2.0	2.9694E-4	-2.9929E-4
4.0	3.629E-4	-3.3067E-4
6.0	9.1128E-4	-3.0409E-4
10.0	-8.2923E-4	-3.7821E-5
12.5	-0.0035827	0.0036323
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</tableData>
         </table>
      </function>
      <function name="aero/function/flap_inner_yaw_coeff_basic_Reynolds0_Mach_1">
         <description>yaw_coefficient as function of flap_inner_deflection, alpha, beta, fixed Reynolds = 0.0fixed Mach = 0.6</description>
         <table>
            <independentVar lookup="row">aero/alpha-deg</independentVar>
            <independentVar lookup="column">fcs/flap-pos-deg</independentVar>
            <independentVar lookup="table">aero/beta-deg</independentVar>
            <tableData breakPoint="0.0">
 	-3.0	3.0
-5.0	4.3719E-11	-3.4008E-11
0.0	4.7835E-11	-2.0042E-11
2.0	6.8736E-11	-3.277E-11
4.0	1.4975E-10	-1.1127E-10
6.0	2.6606E-11	-4.6013E-11
10.0	-2.7251E-9	3.1003E-9
12.5	-2.4795E-9	3.2238E-9
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</tableData>
            <tableData breakPoint="10.0">
 	-3.0	3.0
-5.0	8.434E-5	-1.3466E-4
0.0	2.6345E-4	-2.8978E-4
2.0	3.6368E-4	-3.6655E-4
4.0	4.4446E-4	-4.0499E-4
6.0	0.0011161	-3.7243E-4
10.0	-0.0010156	-4.6321E-5
12.5	-0.0043879	0.0044487
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</tableData>
         </table>
      </function>
      <function name="aero/function/flap_inner_yaw_coeff_basic_Reynolds1_Mach_1">
         <description>yaw_coefficient as function of flap_inner_deflection, alpha, beta, fixed Reynolds = 6561.68fixed Mach = 0.6</description>
         <table>
            <independentVar lookup="row">aero/alpha-deg</independentVar>
            <independentVar lookup="column">fcs/flap-pos-deg</independentVar>
            <independentVar lookup="table">aero/beta-deg</independentVar>
            <tableData breakPoint="0.0">
 	-3.0	3.0
-5.0	4.3719E-11	-3.4008E-11
0.0	4.7835E-11	-2.0042E-11
2.0	6.8736E-11	-3.277E-11
4.0	1.4975E-10	-1.1127E-10
6.0	2.6606E-11	-4.6013E-11
10.0	-2.7251E-9	3.1003E-9
12.5	-2.4795E-9	3.2238E-9
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</tableData>
            <tableData breakPoint="10.0">
 	-3.0	3.0
-5.0	8.434E-5	-1.3466E-4
0.0	2.6345E-4	-2.8978E-4
2.0	3.6368E-4	-3.6655E-4
4.0	4.4446E-4	-4.0499E-4
6.0	0.0011161	-3.7243E-4
10.0	-0.0010156	-4.6321E-5
12.5	-0.0043879	0.0044487
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</tableData>
         </table>
      </function>
      <function name="aero/function/flap_inner_yaw_coeff_basic_Reynolds2_Mach_1">
         <description>yaw_coefficient as function of flap_inner_deflection, alpha, beta, fixed Reynolds = 16404.2fixed Mach = 0.6</description>
         <table>
            <independentVar lookup="row">aero/alpha-deg</independentVar>
            <independentVar lookup="column">fcs/flap-pos-deg</independentVar>
            <independentVar lookup="table">aero/beta-deg</independentVar>
            <tableData breakPoint="0.0">
 	-3.0	3.0
-5.0	4.3719E-11	-3.4008E-11
0.0	4.7835E-11	-2.0042E-11
2.0	6.8736E-11	-3.277E-11
4.0	1.4975E-10	-1.1127E-10
6.0	2.6606E-11	-4.6013E-11
10.0	-2.7251E-9	3.1003E-9
12.5	-2.4795E-9	3.2238E-9
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</tableData>
            <tableData breakPoint="10.0">
 	-3.0	3.0
-5.0	8.434E-5	-1.3466E-4
0.0	2.6345E-4	-2.8978E-4
2.0	3.6368E-4	-3.6655E-4
4.0	4.4446E-4	-4.0499E-4
6.0	0.0011161	-3.7243E-4
10.0	-0.0010156	-4.6321E-5
12.5	-0.0043879	0.0044487
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</tableData>
         </table>
      </function>
      <function name="aero/function/flap_inner_yaw_coeff_basic_Reynolds3_Mach_1">
         <description>yaw_coefficient as function of flap_inner_deflection, alpha, beta, fixed Reynolds = 26246.72fixed Mach = 0.6</description>
         <table>
            <independentVar lookup="row">aero/alpha-deg</independentVar>
            <independentVar lookup="column">fcs/flap-pos-deg</independentVar>
            <independentVar lookup="table">aero/beta-deg</independentVar>
            <tableData breakPoint="0.0">
 	-3.0	3.0
-5.0	4.3719E-11	-3.4008E-11
0.0	4.7835E-11	-2.0042E-11
2.0	6.8736E-11	-3.277E-11
4.0	1.4975E-10	-1.1127E-10
6.0	2.6606E-11	-4.6013E-11
10.0	-2.7251E-9	3.1003E-9
12.5	-2.4795E-9	3.2238E-9
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</tableData>
            <tableData breakPoint="10.0">
 	-3.0	3.0
-5.0	8.434E-5	-1.3466E-4
0.0	2.6345E-4	-2.8978E-4
2.0	3.6368E-4	-3.6655E-4
4.0	4.4446E-4	-4.0499E-4
6.0	0.0011161	-3.7243E-4
10.0	-0.0010156	-4.6321E-5
12.5	-0.0043879	0.0044487
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</tableData>
         </table>
      </function>
      <function name="aero/function/flap_inner_yaw_coeff_basic_Reynolds0_Mach_2">
         <description>yaw_coefficient as function of flap_inner_deflection, alpha, beta, fixed Reynolds = 0.0fixed Mach = 0.78</description>
         <table>
            <independentVar lookup="row">aero/alpha-deg</independentVar>
            <independentVar lookup="column">fcs/flap-pos-deg</independentVar>
            <independentVar lookup="table">aero/beta-deg</independentVar>
            <tableData breakPoint="0.0">
 	-3.0	3.0
-5.0	5.589E-11	-4.3475E-11
0.0	6.1153E-11	-2.5622E-11
2.0	8.7873E-11	-4.1894E-11
4.0	1.9144E-10	-1.4225E-10
6.0	3.4014E-11	-5.8823E-11
10.0	-3.4837E-9	3.9634E-9
12.5	-3.1699E-9	4.1213E-9
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</tableData>
            <tableData breakPoint="10.0">
 	-3.0	3.0
-5.0	1.0782E-4	-1.7215E-4
0.0	3.368E-4	-3.7046E-4
2.0	4.6493E-4	-4.686E-4
4.0	5.682E-4	-5.1774E-4
6.0	0.0014268	-4.7611E-4
10.0	-0.0012983	-5.9217E-5
12.5	-0.0056096	0.0056872
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</tableData>
         </table>
      </function>
      <function name="aero/function/flap_inner_yaw_coeff_basic_Reynolds1_Mach_2">
         <description>yaw_coefficient as function of flap_inner_deflection, alpha, beta, fixed Reynolds = 6561.68fixed Mach = 0.78</description>
         <table>
            <independentVar lookup="row">aero/alpha-deg</independentVar>
            <independentVar lookup="column">fcs/flap-pos-deg</independentVar>
            <independentVar lookup="table">aero/beta-deg</independentVar>
            <tableData breakPoint="0.0">
 	-3.0	3.0
-5.0	5.589E-11	-4.3475E-11
0.0	6.1153E-11	-2.5622E-11
2.0	8.7873E-11	-4.1894E-11
4.0	1.9144E-10	-1.4225E-10
6.0	3.4014E-11	-5.8823E-11
10.0	-3.4837E-9	3.9634E-9
12.5	-3.1699E-9	4.1213E-9
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</tableData>
            <tableData breakPoint="10.0">
 	-3.0	3.0
-5.0	1.0782E-4	-1.7215E-4
0.0	3.368E-4	-3.7046E-4
2.0	4.6493E-4	-4.686E-4
4.0	5.682E-4	-5.1774E-4
6.0	0.0014268	-4.7611E-4
10.0	-0.0012983	-5.9217E-5
12.5	-0.0056096	0.0056872
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</tableData>
         </table>
      </function>
      <function name="aero/function/flap_inner_yaw_coeff_basic_Reynolds2_Mach_2">
         <description>yaw_coefficient as function of flap_inner_deflection, alpha, beta, fixed Reynolds = 16404.2fixed Mach = 0.78</description>
         <table>
            <independentVar lookup="row">aero/alpha-deg</independentVar>
            <independentVar lookup="column">fcs/flap-pos-deg</independentVar>
            <independentVar lookup="table">aero/beta-deg</independentVar>
            <tableData breakPoint="0.0">
 	-3.0	3.0
-5.0	5.589E-11	-4.3475E-11
0.0	6.1153E-11	-2.5622E-11
2.0	8.7873E-11	-4.1894E-11
4.0	1.9144E-10	-1.4225E-10
6.0	3.4014E-11	-5.8823E-11
10.0	-3.4837E-9	3.9634E-9
12.5	-3.1699E-9	4.1213E-9
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</tableData>
            <tableData breakPoint="10.0">
 	-3.0	3.0
-5.0	1.0782E-4	-1.7215E-4
0.0	3.368E-4	-3.7046E-4
2.0	4.6493E-4	-4.686E-4
4.0	5.682E-4	-5.1774E-4
6.0	0.0014268	-4.7611E-4
10.0	-0.0012983	-5.9217E-5
12.5	-0.0056096	0.0056872
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</tableData>
         </table>
      </function>
      <function name="aero/function/flap_inner_yaw_coeff_basic_Reynolds3_Mach_2">
         <description>yaw_coefficient as function of flap_inner_deflection, alpha, beta, fixed Reynolds = 26246.72fixed Mach = 0.78</description>
         <table>
            <independentVar lookup="row">aero/alpha-deg</independentVar>
            <independentVar lookup="column">fcs/flap-pos-deg</independentVar>
            <independentVar lookup="table">aero/beta-deg</independentVar>
            <tableData breakPoint="0.0">
 	-3.0	3.0
-5.0	5.589E-11	-4.3475E-11
0.0	6.1153E-11	-2.5622E-11
2.0	8.7873E-11	-4.1894E-11
4.0	1.9144E-10	-1.4225E-10
6.0	3.4014E-11	-5.8823E-11
10.0	-3.4837E-9	3.9634E-9
12.5	-3.1699E-9	4.1213E-9
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</tableData>
            <tableData breakPoint="10.0">
 	-3.0	3.0
-5.0	1.0782E-4	-1.7215E-4
0.0	3.368E-4	-3.7046E-4
2.0	4.6493E-4	-4.686E-4
4.0	5.682E-4	-5.1774E-4
6.0	0.0014268	-4.7611E-4
10.0	-0.0012983	-5.9217E-5
12.5	-0.0056096	0.0056872
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</tableData>
         </table>
      </function>
      <function name="aero/function/flap_inner_yaw_coeff_basic_Reynolds0_Mach_3">
         <description>yaw_coefficient as function of flap_inner_deflection, alpha, beta, fixed Reynolds = 0.0fixed Mach = 0.8</description>
         <table>
            <independentVar lookup="row">aero/alpha-deg</independentVar>
            <independentVar lookup="column">fcs/flap-pos-deg</independentVar>
            <independentVar lookup="table">aero/beta-deg</independentVar>
            <tableData breakPoint="0.0">
 	-3.0	3.0
-5.0	5.8291E-11	-4.5343E-11
0.0	6.3781E-11	-2.6723E-11
2.0	9.1648E-11	-4.3694E-11
4.0	1.9967E-10	-1.4836E-10
6.0	3.5475E-11	-6.1351E-11
10.0	-3.6334E-9	4.1337E-9
12.5	-3.3061E-9	4.2984E-9
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</tableData>
            <tableData breakPoint="10.0">
 	-3.0	3.0
-5.0	1.1245E-4	-1.7955E-4
0.0	3.5127E-4	-3.8638E-4
2.0	4.849E-4	-4.8873E-4
4.0	5.9261E-4	-5.3998E-4
6.0	0.0014881	-4.9657E-4
10.0	-0.0013541	-6.1761E-5
12.5	-0.0058506	0.0059315
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</tableData>
         </table>
      </function>
      <function name="aero/function/flap_inner_yaw_coeff_basic_Reynolds1_Mach_3">
         <description>yaw_coefficient as function of flap_inner_deflection, alpha, beta, fixed Reynolds = 6561.68fixed Mach = 0.8</description>
         <table>
            <independentVar lookup="row">aero/alpha-deg</independentVar>
            <independentVar lookup="column">fcs/flap-pos-deg</independentVar>
            <independentVar lookup="table">aero/beta-deg</independentVar>
            <tableData breakPoint="0.0">
 	-3.0	3.0
-5.0	5.8291E-11	-4.5343E-11
0.0	6.3781E-11	-2.6723E-11
2.0	9.1648E-11	-4.3694E-11
4.0	1.9967E-10	-1.4836E-10
6.0	3.5475E-11	-6.1351E-11
10.0	-3.6334E-9	4.1337E-9
12.5	-3.3061E-9	4.2984E-9
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</tableData>
            <tableData breakPoint="10.0">
 	-3.0	3.0
-5.0	1.1245E-4	-1.7955E-4
0.0	3.5127E-4	-3.8638E-4
2.0	4.849E-4	-4.8873E-4
4.0	5.9261E-4	-5.3998E-4
6.0	0.0014881	-4.9657E-4
10.0	-0.0013541	-6.1761E-5
12.5	-0.0058506	0.0059315
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</tableData>
         </table>
      </function>
      <function name="aero/function/flap_inner_yaw_coeff_basic_Reynolds2_Mach_3">
         <description>yaw_coefficient as function of flap_inner_deflection, alpha, beta, fixed Reynolds = 16404.2fixed Mach = 0.8</description>
         <table>
            <independentVar lookup="row">aero/alpha-deg</independentVar>
            <independentVar lookup="column">fcs/flap-pos-deg</independentVar>
            <independentVar lookup="table">aero/beta-deg</independentVar>
            <tableData breakPoint="0.0">
 	-3.0	3.0
-5.0	5.8291E-11	-4.5343E-11
0.0	6.3781E-11	-2.6723E-11
2.0	9.1648E-11	-4.3694E-11
4.0	1.9967E-10	-1.4836E-10
6.0	3.5475E-11	-6.1351E-11
10.0	-3.6334E-9	4.1337E-9
12.5	-3.3061E-9	4.2984E-9
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</tableData>
            <tableData breakPoint="10.0">
 	-3.0	3.0
-5.0	1.1245E-4	-1.7955E-4
0.0	3.5127E-4	-3.8638E-4
2.0	4.849E-4	-4.8873E-4
4.0	5.9261E-4	-5.3998E-4
6.0	0.0014881	-4.9657E-4
10.0	-0.0013541	-6.1761E-5
12.5	-0.0058506	0.0059315
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</tableData>
         </table>
      </function>
      <function name="aero/function/flap_inner_yaw_coeff_basic_Reynolds3_Mach_3">
         <description>yaw_coefficient as function of flap_inner_deflection, alpha, beta, fixed Reynolds = 26246.72fixed Mach = 0.8</description>
         <table>
            <independentVar lookup="row">aero/alpha-deg</independentVar>
            <independentVar lookup="column">fcs/flap-pos-deg</independentVar>
            <independentVar lookup="table">aero/beta-deg</independentVar>
            <tableData breakPoint="0.0">
 	-3.0	3.0
-5.0	5.8291E-11	-4.5343E-11
0.0	6.3781E-11	-2.6723E-11
2.0	9.1648E-11	-4.3694E-11
4.0	1.9967E-10	-1.4836E-10
6.0	3.5475E-11	-6.1351E-11
10.0	-3.6334E-9	4.1337E-9
12.5	-3.3061E-9	4.2984E-9
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</tableData>
            <tableData breakPoint="10.0">
 	-3.0	3.0
-5.0	1.1245E-4	-1.7955E-4
0.0	3.5127E-4	-3.8638E-4
2.0	4.849E-4	-4.8873E-4
4.0	5.9261E-4	-5.3998E-4
6.0	0.0014881	-4.9657E-4
10.0	-0.0013541	-6.1761E-5
12.5	-0.0058506	0.0059315
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</tableData>
         </table>
      </function>
      <function name="aero/function/flap_inner_yaw_coeff_basic_deflection_Mach_0">
         <description>yaw_coefficient as function of flap_inner_deflection, alpha, beta, Reynolds, fixed Mach = 0.2</description>
         <interpolate1d>
            <p>position/h-sl-ft</p>
            <v>0.000000</v>
            <p>aero/function/flap_inner_yaw_coeff_basic_Reynolds0_Mach_0</p>
            <v>6561.6800</v>
            <p>aero/function/flap_inner_yaw_coeff_basic_Reynolds1_Mach_0</p>
            <v>16404.2000</v>
            <p>aero/function/flap_inner_yaw_coeff_basic_Reynolds2_Mach_0</p>
            <v>26246.7200</v>
            <p>aero/function/flap_inner_yaw_coeff_basic_Reynolds3_Mach_0</p>
         </interpolate1d>
      </function>
      <function name="aero/function/flap_inner_yaw_coeff_basic_deflection_Mach_1">
         <description>yaw_coefficient as function of flap_inner_deflection, alpha, beta, Reynolds, fixed Mach = 0.6</description>
         <interpolate1d>
            <p>position/h-sl-ft</p>
            <v>0.000000</v>
            <p>aero/function/flap_inner_yaw_coeff_basic_Reynolds0_Mach_1</p>
            <v>6561.6800</v>
            <p>aero/function/flap_inner_yaw_coeff_basic_Reynolds1_Mach_1</p>
            <v>16404.2000</v>
            <p>aero/function/flap_inner_yaw_coeff_basic_Reynolds2_Mach_1</p>
            <v>26246.7200</v>
            <p>aero/function/flap_inner_yaw_coeff_basic_Reynolds3_Mach_1</p>
         </interpolate1d>
      </function>
      <function name="aero/function/flap_inner_yaw_coeff_basic_deflection_Mach_2">
         <description>yaw_coefficient as function of flap_inner_deflection, alpha, beta, Reynolds, fixed Mach = 0.78</description>
         <interpolate1d>
            <p>position/h-sl-ft</p>
            <v>0.000000</v>
            <p>aero/function/flap_inner_yaw_coeff_basic_Reynolds0_Mach_2</p>
            <v>6561.6800</v>
            <p>aero/function/flap_inner_yaw_coeff_basic_Reynolds1_Mach_2</p>
            <v>16404.2000</v>
            <p>aero/function/flap_inner_yaw_coeff_basic_Reynolds2_Mach_2</p>
            <v>26246.7200</v>
            <p>aero/function/flap_inner_yaw_coeff_basic_Reynolds3_Mach_2</p>
         </interpolate1d>
      </function>
      <function name="aero/function/flap_inner_yaw_coeff_basic_deflection_Mach_3">
         <description>yaw_coefficient as function of flap_inner_deflection, alpha, beta, Reynolds, fixed Mach = 0.8</description>
         <interpolate1d>
            <p>position/h-sl-ft</p>
            <v>0.000000</v>
            <p>aero/function/flap_inner_yaw_coeff_basic_Reynolds0_Mach_3</p>
            <v>6561.6800</v>
            <p>aero/function/flap_inner_yaw_coeff_basic_Reynolds1_Mach_3</p>
            <v>16404.2000</v>
            <p>aero/function/flap_inner_yaw_coeff_basic_Reynolds2_Mach_3</p>
            <v>26246.7200</v>
            <p>aero/function/flap_inner_yaw_coeff_basic_Reynolds3_Mach_3</p>
         </interpolate1d>
      </function>
      <function name="aero/function/flap_inner_yaw_coeff_basic_Mach">
         <description>yaw_coefficient as function of flap_inner_deflection, alpha, beta, Reynolds, Mach </description>
         <interpolate1d>
            <p>velocities/mach</p>
            <v>0.2000</v>
            <p>aero/function/flap_inner_yaw_coeff_basic_deflection_Mach_0</p>
            <v>0.6000</v>
            <p>aero/function/flap_inner_yaw_coeff_basic_deflection_Mach_1</p>
            <v>0.7800</v>
            <p>aero/function/flap_inner_yaw_coeff_basic_deflection_Mach_2</p>
            <v>0.8000</v>
            <p>aero/function/flap_inner_yaw_coeff_basic_deflection_Mach_3</p>
         </interpolate1d>
      </function>
      <function name="aero/function/flap_outer_drag_coeff_basic_Reynolds0_Mach_0">
         <description>drag_coefficient as function of flap_outer_deflection, alpha, beta, fixed Reynolds = 0.0fixed Mach = 0.2</description>
         <table>
            <independentVar lookup="row">aero/alpha-deg</independentVar>
            <independentVar lookup="column">fcs/flap-pos-deg</independentVar>
            <independentVar lookup="table">aero/beta-deg</independentVar>
            <tableData breakPoint="0.0">
 	-3.0	3.0
-5.0	3.2796E-4	1.8183E-4
0.0	-5.3079E-4	0.0010254
2.0	-8.8873E-4	0.0013617
4.0	-0.0012668	0.001708
6.0	-0.0016918	0.0020882
10.0	-0.0023584	0.0026739
12.5	-0.0026339	0.0029053
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</tableData>
            <tableData breakPoint="10.0">
 	-3.0	3.0
-5.0	2.9414E-4	1.9565E-4
0.0	-5.344E-4	0.0010123
2.0	-8.7247E-4	0.0013308
4.0	-0.0011837	0.0016086
6.0	-4.8781E-4	6.6004E-4
10.0	-0.0024346	0.0026052
12.5	-0.0025114	0.002766
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</tableData>
         </table>
      </function>
      <function name="aero/function/flap_outer_drag_coeff_basic_Reynolds1_Mach_0">
         <description>drag_coefficient as function of flap_outer_deflection, alpha, beta, fixed Reynolds = 6561.68fixed Mach = 0.2</description>
         <table>
            <independentVar lookup="row">aero/alpha-deg</independentVar>
            <independentVar lookup="column">fcs/flap-pos-deg</independentVar>
            <independentVar lookup="table">aero/beta-deg</independentVar>
            <tableData breakPoint="0.0">
 	-3.0	3.0
-5.0	3.2796E-4	1.8183E-4
0.0	-5.3079E-4	0.0010254
2.0	-8.8873E-4	0.0013617
4.0	-0.0012668	0.001708
6.0	-0.0016918	0.0020882
10.0	-0.0023584	0.0026739
12.5	-0.0026339	0.0029053
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</tableData>
            <tableData breakPoint="10.0">
 	-3.0	3.0
-5.0	2.9414E-4	1.9565E-4
0.0	-5.344E-4	0.0010123
2.0	-8.7247E-4	0.0013308
4.0	-0.0011837	0.0016086
6.0	-4.8781E-4	6.6004E-4
10.0	-0.0024346	0.0026052
12.5	-0.0025114	0.002766
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</tableData>
         </table>
      </function>
      <function name="aero/function/flap_outer_drag_coeff_basic_Reynolds2_Mach_0">
         <description>drag_coefficient as function of flap_outer_deflection, alpha, beta, fixed Reynolds = 16404.2fixed Mach = 0.2</description>
         <table>
            <independentVar lookup="row">aero/alpha-deg</independentVar>
            <independentVar lookup="column">fcs/flap-pos-deg</independentVar>
            <independentVar lookup="table">aero/beta-deg</independentVar>
            <tableData breakPoint="0.0">
 	-3.0	3.0
-5.0	3.2796E-4	1.8183E-4
0.0	-5.3079E-4	0.0010254
2.0	-8.8873E-4	0.0013617
4.0	-0.0012668	0.001708
6.0	-0.0016918	0.0020882
10.0	-0.0023584	0.0026739
12.5	-0.0026339	0.0029053
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</tableData>
            <tableData breakPoint="10.0">
 	-3.0	3.0
-5.0	2.9414E-4	1.9565E-4
0.0	-5.344E-4	0.0010123
2.0	-8.7247E-4	0.0013308
4.0	-0.0011837	0.0016086
6.0	-4.8781E-4	6.6004E-4
10.0	-0.0024346	0.0026052
12.5	-0.0025114	0.002766
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</tableData>
         </table>
      </function>
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