<?xml version="1.0" encoding="UTF-8"?>
<turbine_engine name="D150_AGILE_engine">
   <milthrust unit="N">104530.000</milthrust>
   <bypassratio>1.5000</bypassratio>
   <idlen1>30</idlen1>
   <idlen2>60</idlen2>
   <maxn1>100</maxn1>
   <maxn2>100</maxn2>
   <augmented>0</augmented>
   <injected>0</injected>
  <function name="IdleThrust">
   <table>
    <independentVar lookup="row">velocities/mach</independentVar>
    <independentVar lookup="column">atmosphere/density-altitude</independentVar>
    <tableData>
           0     60000
     0.0 0.0436  0.0436
     1.0 0.0436  0.0436
    </tableData>
   </table>
  </function>

  <function name="MilThrust">
   <table>
    <independentVar lookup="row">velocities/mach</independentVar>
    <independentVar lookup="column">atmosphere/density-altitude</independentVar>
    <tableData>
           0     60000
     0.0 1.0  1.0
     1.0 1.0  1.0
    </tableData>
   </table>
  </function>
</turbine_engine>
